mN := N*10^-3
MN = 1000000 N
m_i(i) := {
    if i == 1
        30
    else if i == 2
        60
    else if i == 3
        40
    else if i == 4
        30
    else if i == 5
        3500
    else if i == 6
        50
    else if i == 7
        35
    else if i == 8
        2500
    else if i == 9
        50
}*kg/m
EJ_i(i) := {
    if i == 1
        40
    else if i == 2
        90
    else if i == 3
        60
    else if i == 4
        44
    else if i == 5
        44
    else if i == 6
        60
    else if i == 7
        55
    else if i == 8
        55
    else if i == 9
        60
}*MN*m^2
x(i) := {
    if i == 1
        1.7
    else if i == 2
        3.5
    else if i == 3
        4
    else if i == 4
        7
    else if i == 5
        10
    else if i == 6
        11
    else if i == 7
        15
    else if i == 8
        19
    else if i == 9
        21
}*m
i(x) :=
    x ← x/m
    if x < 1.7
        1
    else if x < 3.5
        2
    else if x < 4
        3
    else if x < 7
        4
    else if x < 10
        5
    else if x < 11
        6
    else if x < 15
        7
    else if x < 19
        8
    else if x ≤ 21
        9
J_0 := 3000 tonne*m^2
M_1 := 2 tonne
M_2 := 2 tonne
l_i(i) :=
    if i == 1
        x(i)
    else
        x(i) - x(i - 1)
L := 21 m
b_i(ω, i) := nthroot(ω^2*m_i(i)/EJ_i(i), 4)
S(x, ω, i) := 1/2*(cosh(b_i(ω, i)*x) + cos(b_i(ω, i)*x))
T(x, ω, i) := 1/2*(sinh(b_i(ω, i)*x) + sin(b_i(ω, i)*x))
U(x, ω, i) := 1/2*(cosh(b_i(ω, i)*x) - cos(b_i(ω, i)*x))
V(x, ω, i) := 1/2*(sinh(b_i(ω, i)*x) - sin(b_i(ω, i)*x))
B_i(i, ω) :=
    if i == 1
        [1, 0*m, 0*1/N, 0*s^2/kg; 0*1/m, 1, 0*1/J, 0*1/N; 0*N, 0*J, 1, 0*m; M_1*ω^2, 0*N, 0*1/m, 1]
    else if i == 8
        [1, 0*m, 0*1/N, 0*s^2/kg; 0*1/m, 1, 0*1/J, 0*1/N; 0*N, -J_0*ω^2, 1, 0*m; M_2*ω^2, 0*N, 0*1/m, 1]
    else
        [1, 0*m, 0*1/N, 0*s^2/kg; 0*1/m, 1, 0*1/J, 0*1/N; 0*N, 0*J, 1, 0*m; 0*kg/s^2, 0*N, 0*1/m, 1]
A_i(x, ω, i) := [
    S(x, ω, i), T(x, ω, i)/b_i(ω, i), U(x, ω, i)/(EJ_i(i)*b_i(ω, i)^2), V(x, ω, i)/(EJ_i(i)*b_i(ω, i)^3);
    V(x, ω, i)*b_i(ω, i), S(x, ω, i), T(x, ω, i)/(EJ_i(i)*b_i(ω, i)), U(x, ω, i)/(EJ_i(i)*b_i(ω, i)^2);
    U(x, ω, i)*EJ_i(i)*b_i(ω, i)^2, V(x, ω, i)*EJ_i(i)*b_i(ω, i), S(x, ω, i), T(x, ω, i)/b_i(ω, i);
    V(x, ω, i)*EJ_i(i)*b_i(ω, i)^3, U(x, ω, i)*EJ_i(i)*b_i(ω, i)^2, V(x, ω, i)*b_i(ω, i), S(x, ω, i)
]
P_L(ω) := product(B_i(i, ω)*A_i(l_i(i), ω, i), i = 9 .. 1)
P_L(1/s) = [
    1.07076, 21.2538 m, 4.35267e-6 1/N, 2.97363e-5 s^2/kg;
    0.0109732 1/m, 0.97406, 3.74048e-7 1/J, 3.78986e-6 1/N;
    54256.6 N, -2320865 J, -0.00027089, 11.2915 m;
    4570.67 kg/s^2, 82643.6 N, 0.016901 1/m, 1.11046
]
D(ω) := P_L(ω)[2, 0]*P_L(ω)[3, 1] - P_L(ω)[2, 1]*P_L(ω)[3, 0]
ω := 0 rad/s, 0.1*rad/s .. 20*rad/s
# [plot: D(ω) vs ω]
# pic2
solve block
    # guess values
    ω := 5*rad/s
    # constraints
    D(ω) == 0
    # solver
    ω_1 := find(ω) = 4.57275 1/s
end solve block
solve block
    # guess values
    ω := 20*rad/s
    # constraints
    D(ω) == 0
    # solver
    ω_2 := find(ω) = 19.1913 1/s
end solve block
# Построение собственных форм колебаний
P(ω, x) :=
    if i(x) > 1
        A_i(x - sum(l_i(j), j = 1 .. i(x) - 1), ω, i(x))*product(B_i(j, ω)*A_i(l_i(j), ω, j), j = i(x) - 1 .. 1)
    else
        A_i(x, ω, 1)
u_0(ω) := [1; -P_L(ω)[2, 0]/P_L(ω)[2, 1]; 0*N; 0*kg/s^2]
u(x, ω) := P(ω, x)*u_0(ω)
# [plot: u(L, ω)[2] vs ω]
solve block
    # guess values
    ω := 5*rad/s
    # constraints
    u(L, ω)[2] == 0
    u(L, ω)[3] == 0
    # solver
    ω_1 := find(ω)
end solve block
solve block
    # guess values
    ω := 20*rad/s
    # constraints
    u(L, ω)[2] == 0
    u(L, ω)[3] == 0
    # solver
    ω_2 := find(ω)
end solve block
ω_1 = 4.57275 1/s
ω_2 = 19.1913 1/s
# [plot: u(L, ω)[3] vs ω]
u(L, ω_1) = [-0.117115; 0.00733667 1/m; -3.72529e-9 N; 5.82077e-11 kg/s^2]
u(L, ω_2) = [0.00385178; -0.00159977 1/m; 1.90735e-6 N; 1.49012e-8 kg/s^2]
f(x, ω) := u(x, ω)[0]
θ(x, ω) := u(x, ω)[1]
M(x, ω) := u(x, ω)[2]
Q(x, ω) := u(x, ω)[3]
x := 0, 0.1 m .. 21 m
# [plot: f(x, ω_1), f(x, ω_2) vs x]
# pic3
# [plot: θ(x, ω_1), θ(x, ω_2) vs x]
# pic4
# [plot: M(x, ω_1), M(x, ω_2) vs x]
# pic5
# [plot: Q(x, ω_1) (N/m), Q(x, ω_2) (N/m) vs x]
# pic6
# Расчет приведенных масс
m_n(ω) := integral(m_i(i(x))*f(x, ω)^2, x = 0 .. L)
m_n(ω_1) = 969.81 kg
m_n(ω_2) = 2589.96 kg
# Расчет полностью заправленной ракеты
m_i(i) := {
    if i == 1
        30
    else if i == 2
        60
    else if i == 3
        40
    else if i == 4
        3500
    else if i == 5
        3500
    else if i == 6
        50
    else if i == 7
        2500
    else if i == 8
        2500
    else if i == 9
        50
}*kg/m
EJ_i(i) := {
    if i == 1
        40
    else if i == 2
        90
    else if i == 3
        60
    else if i == 4
        44
    else if i == 5
        44
    else if i == 6
        60
    else if i == 7
        55
    else if i == 8
        55
    else if i == 9
        60
}*MN*m^2
x(i) := {
    if i == 1
        1.7
    else if i == 2
        3.5
    else if i == 3
        4
    else if i == 4
        7
    else if i == 5
        10
    else if i == 6
        11
    else if i == 7
        15
    else if i == 8
        19
    else if i == 9
        21
}*m
i(x) :=
    x ← x/m
    if x < 1.7
        1
    else if x < 3.5
        2
    else if x < 4
        3
    else if x < 7
        4
    else if x < 10
        5
    else if x < 11
        6
    else if x < 15
        7
    else if x < 19
        8
    else if x ≤ 21
        9
b_i(ω, i) := nthroot(ω^2*m_i(i)/EJ_i(i), 4)
S(x, ω, i) := 1/2*(cosh(b_i(ω, i)*x) + cos(b_i(ω, i)*x))
T(x, ω, i) := 1/2*(sinh(b_i(ω, i)*x) + sin(b_i(ω, i)*x))
U(x, ω, i) := 1/2*(cosh(b_i(ω, i)*x) - cos(b_i(ω, i)*x))
V(x, ω, i) := 1/2*(sinh(b_i(ω, i)*x) - sin(b_i(ω, i)*x))
B_i(i, ω) :=
    if i == 1
        [1, 0*m, 0*1/N, 0*s^2/kg; 0*1/m, 1, 0*1/J, 0*1/N; 0*N, 0*J, 1, 0*m; M_1*ω^2, 0*N, 0*1/m, 1]
    else if i == 8
        [1, 0*m, 0*1/N, 0*s^2/kg; 0*1/m, 1, 0*1/J, 0*1/N; 0*N, -J_0*ω^2, 1, 0*m; M_2*ω^2, 0*N, 0*1/m, 1]
    else
        [1, 0*m, 0*1/N, 0*s^2/kg; 0*1/m, 1, 0*1/J, 0*1/N; 0*N, 0*J, 1, 0*m; 0*kg/s^2, 0*N, 0*1/m, 1]
A_i(x, ω, i) := [
    S(x, ω, i), T(x, ω, i)/b_i(ω, i), U(x, ω, i)/(EJ_i(i)*b_i(ω, i)^2), V(x, ω, i)/(EJ_i(i)*b_i(ω, i)^3);
    V(x, ω, i)*b_i(ω, i), S(x, ω, i), T(x, ω, i)/(EJ_i(i)*b_i(ω, i)), U(x, ω, i)/(EJ_i(i)*b_i(ω, i)^2);
    U(x, ω, i)*EJ_i(i)*b_i(ω, i)^2, V(x, ω, i)*EJ_i(i)*b_i(ω, i), S(x, ω, i), T(x, ω, i)/b_i(ω, i);
    V(x, ω, i)*EJ_i(i)*b_i(ω, i)^3, U(x, ω, i)*EJ_i(i)*b_i(ω, i)^2, V(x, ω, i)*b_i(ω, i), S(x, ω, i)
]
P_L(ω) := product(B_i(i, ω)*A_i(l_i(i), ω, i), i = 9 .. 1)
P_L(1/s) = [
    1.11699, 21.6943 m, 4.39139e-6 1/N, 2.98584e-5 s^2/kg;
    0.0178312 1/m, 1.05693, 3.82657e-7 1/J, 3.82168e-6 1/N;
    76097.8 N, -1835424 J, 0.0663556, 11.5952 m;
    5171.24 kg/s^2, 122574 N, 0.0236552 1/m, 1.14565
]
D(ω) := P_L(ω)[2, 0]*P_L(ω)[3, 1] - P_L(ω)[2, 1]*P_L(ω)[3, 0]
ω := 0 rad/s, 0.1*rad/s .. 13*rad/s
# [plot: D(ω) vs ω]
# pic7
solve block
    # guess values
    ω := 3*rad/s
    # constraints
    D(ω) == 0
    # solver
    ω_1 := find(ω) = 3.33781 1/s
end solve block
solve block
    # guess values
    ω := 12*rad/s
    # constraints
    D(ω) == 0
    # solver
    ω_2 := find(ω) = 12.9063 1/s
end solve block
# Построение собственных форм колебаний
P(ω, x) :=
    if i(x) > 1
        A_i(x - sum(l_i(j), j = 1 .. i(x) - 1), ω, i(x))*product(B_i(j, ω)*A_i(l_i(j), ω, j), j = i(x) - 1 .. 1)
    else
        A_i(x, ω, 1)
u_0(ω) := [1; -P_L(ω)[2, 0]/P_L(ω)[2, 1]; 0*N; 0*kg/s^2]
u(x, ω) := P(ω, x)*u_0(ω)
# [plot: u(L, ω)[2] vs ω]
solve block
    # guess values
    ω := 3*rad/s
    # constraints
    u(L, ω)[2] == 0
    u(L, ω)[3] == 0
    # solver
    ω_1 := find(ω)
end solve block
solve block
    # guess values
    ω := 13*rad/s
    # constraints
    u(L, ω)[2] == 0
    u(L, ω)[3] == 0
    # solver
    ω_2 := find(ω)
end solve block
ω_1 = 3.33781 1/s
ω_2 = 12.9063 1/s
# [plot: u(L, ω)[3] vs ω]
u(L, ω_1) = [0.180507; 0.0123186 1/m; -9.31323e-10 N; -2.91038e-11 kg/s^2]
u(L, ω_2) = [0.103601; -0.00172246 1/m; 0 N; 7.45058e-9 kg/s^2]
f(x, ω) := u(x, ω)[0]
θ(x, ω) := u(x, ω)[1]
M(x, ω) := u(x, ω)[2]
Q(x, ω) := u(x, ω)[3]
x := 0, 0.1 m .. 21 m
# [plot: f(x, ω_1), f(x, ω_2) vs x]
# pic8
# [plot: θ(x, ω_1), θ(x, ω_2) vs x]
# pic9
# [plot: M(x, ω_1), M(x, ω_2) vs x]
# pic10
# [plot: Q(x, ω_1) (N/m), Q(x, ω_2) (N/m) vs x]
# pic11
# Расчет приведенных масс
m_n(ω) := integral(m_i(i(x))*f(x, ω)^2, x = 0 .. L)
m_n(ω_1) = 6.43649 tonne
m_n(ω_2) = 796.542 kg
# Расчет сухой ракеты
m_i(i) := {
    if i == 1
        30
    else if i == 2
        60
    else if i == 3
        40
    else if i == 4
        30
    else if i == 5
        30
    else if i == 6
        50
    else if i == 7
        35
    else if i == 8
        35
    else if i == 9
        50
}*kg/m
EJ_i(i) := {
    if i == 1
        40
    else if i == 2
        90
    else if i == 3
        60
    else if i == 4
        44
    else if i == 5
        44
    else if i == 6
        60
    else if i == 7
        55
    else if i == 8
        55
    else if i == 9
        60
}*MN*m^2
x(i) := {
    if i == 1
        1.7
    else if i == 2
        3.5
    else if i == 3
        4
    else if i == 4
        7
    else if i == 5
        10
    else if i == 6
        11
    else if i == 7
        15
    else if i == 8
        19
    else if i == 9
        21
}*m
i(x) :=
    x ← x/m
    if x < 1.7
        1
    else if x < 3.5
        2
    else if x < 4
        3
    else if x < 7
        4
    else if x < 10
        5
    else if x < 11
        6
    else if x < 15
        7
    else if x < 19
        8
    else if x ≤ 21
        9
b_i(ω, i) := nthroot(ω^2*m_i(i)/EJ_i(i), 4)
S(x, ω, i) := 1/2*(cosh(b_i(ω, i)*x) + cos(b_i(ω, i)*x))
T(x, ω, i) := 1/2*(sinh(b_i(ω, i)*x) + sin(b_i(ω, i)*x))
U(x, ω, i) := 1/2*(cosh(b_i(ω, i)*x) - cos(b_i(ω, i)*x))
V(x, ω, i) := 1/2*(sinh(b_i(ω, i)*x) - sin(b_i(ω, i)*x))
B_i(i, ω) :=
    if i == 1
        [1, 0*m, 0*1/N, 0*s^2/kg; 0*1/m, 1, 0*1/J, 0*1/N; 0*N, 0*J, 1, 0*m; M_1*ω^2, 0*N, 0*1/m, 1]
    else if i == 8
        [1, 0*m, 0*1/N, 0*s^2/kg; 0*1/m, 1, 0*1/J, 0*1/N; 0*N, -J_0*ω^2, 1, 0*m; M_2*ω^2, 0*N, 0*1/m, 1]
    else
        [1, 0*m, 0*1/N, 0*s^2/kg; 0*1/m, 1, 0*1/J, 0*1/N; 0*N, 0*J, 1, 0*m; 0*kg/s^2, 0*N, 0*1/m, 1]
A_i(x, ω, i) := [
    S(x, ω, i), T(x, ω, i)/b_i(ω, i), U(x, ω, i)/(EJ_i(i)*b_i(ω, i)^2), V(x, ω, i)/(EJ_i(i)*b_i(ω, i)^3);
    V(x, ω, i)*b_i(ω, i), S(x, ω, i), T(x, ω, i)/(EJ_i(i)*b_i(ω, i)), U(x, ω, i)/(EJ_i(i)*b_i(ω, i)^2);
    U(x, ω, i)*EJ_i(i)*b_i(ω, i)^2, V(x, ω, i)*EJ_i(i)*b_i(ω, i), S(x, ω, i), T(x, ω, i)/b_i(ω, i);
    V(x, ω, i)*EJ_i(i)*b_i(ω, i)^3, U(x, ω, i)*EJ_i(i)*b_i(ω, i)^2, V(x, ω, i)*b_i(ω, i), S(x, ω, i)
]
P_L(ω) := product(B_i(i, ω)*A_i(l_i(i), ω, i), i = 9 .. 1)
P_L(1/s) = [
    1.04724, 20.9899 m, 4.32404e-6 1/N, 2.96311e-5 s^2/kg;
    0.00656469 1/m, 0.914111, 3.66402e-7 1/J, 3.75683e-6 1/N;
    26399.7 N, -2871105 J, -0.0903799, 10.8111 m;
    4073.42 kg/s^2, 42642.6 N, 0.00749144 1/m, 1.04662
]
D(ω) := P_L(ω)[2, 0]*P_L(ω)[3, 1] - P_L(ω)[2, 1]*P_L(ω)[3, 0]
ω := 0 rad/s, 1*rad/s .. 150*rad/s
# [plot: D(ω) vs ω]
# pic12
solve block
    # guess values
    ω := 5.8*rad/s
    # constraints
    D(ω) == 0
    # solver
    ω_1 := find(ω)  # error: Решение не найдено. Попробуйте изменить начальное приближение либо значение TOL или CTOL.
end solve block
solve block
    # guess values
    ω := 120*rad/s
    # constraints
    D(ω) == 0
    # solver
    ω_2 := find(ω) = 124.806 1/s
end solve block
# Построение собственных форм колебаний
P(ω, x) :=
    if i(x) > 1
        A_i(x - sum(l_i(j), j = 1 .. i(x) - 1), ω, i(x))*product(B_i(j, ω)*A_i(l_i(j), ω, j), j = i(x) - 1 .. 1)
    else
        A_i(x, ω, 1)
u_0(ω) := [1; -P_L(ω)[2, 0]/P_L(ω)[2, 1]; 0*N; 0*kg/s^2]
u(x, ω) := P(ω, x)*u_0(ω)
# [plot: u(L, ω)[2] vs ω]
solve block
    # guess values
    ω := 6*rad/s
    # constraints
    u(L, ω)[2] == 0
    u(L, ω)[3] == 0
    # solver
    ω_1 := find(ω)
end solve block
solve block
    # guess values
    ω := 120*rad/s
    # constraints
    u(L, ω)[2] == 0
    u(L, ω)[3] == 0
    # solver
    ω_2 := find(ω)
end solve block
ω_1 = 5.8255 1/s
ω_2 = 124.806 1/s
# [plot: u(L, ω)[3] vs ω]
u(L, ω_1) = [-0.706666; 0.00855496 1/m; -3.72529e-9 N; 5.82077e-11 kg/s^2]
u(L, ω_2) = [-0.0234542; 0.000692995 1/m; 0 N; 0 kg/s^2]
f(x, ω) := u(x, ω)[0]
θ(x, ω) := u(x, ω)[1]
M(x, ω) := u(x, ω)[2]
Q(x, ω) := u(x, ω)[3]
x := 0, 0.1 m .. 21 m
# [plot: f(x, ω_1), f(x, ω_2) vs x]
# pic13
# [plot: θ(x, ω_1), θ(x, ω_2) vs x]
# pic14
# [plot: M(x, ω_1), M(x, ω_2) vs x]
# pic15
# [plot: Q(x, ω_1) (N/m), Q(x, ω_2) (N/m) vs x]
# pic16
# Расчет приведенных масс
m_n(ω) := integral(m_i(i(x))*f(x, ω)^2, x = 0 .. L)
m_n(ω_1) = 261.885 kg
m_n(ω_2) = 897.738 kg
