# Worksheet setting: ORIGIN = 1
# ПРИЛОЖЕНИЕ
# Исходные данные
# Координаты точек сечений [м]
# X := transpose([0, 2, 4, 5.5, 9.5, 11.5, 12.5, 15.1, 16.5, 20.0]).
# Погонная масса [кг/м]
# m := transpose([30, 60, 40, 30, 3500, 50, 35, 2500, 50]).
# Изгибная жесткость [МН*м^2]
# EJ := transpose([40, 90, 60, 44, 44, 60, 55, 55, 60])*10^6.
# Сосредоточенные массы [кг]
# M := transpose([1500, 0, 0, 0, 0, 0, 0, 1000, 0]).
# Сосредоточенные моменты инерции [кг*м^2]
# J := transpose([0, 0, 0, 0, 0, 0, 0, 3000, 0]).
# Решение для расчётного случая
# Вычислим длины каждого участка [м]:
# l(i) := X[i + 1] - X[i], L := sum(l(k), k = 1 .. 9) = 20
# Введем коэффициенты b_i:
# b(ω) := nthroot(m/EJ*ω^2, 4).
# Запишем балочные функции Крылова:
# S(ω, i, x) := 1/2*(cosh(b(ω)[i]*x) + cos(b(ω)[i]*x)),
# T(ω, i, x) := 1/2*(sinh(b(ω)[i]*x) + sin(b(ω)[i]*x)),
# U(ω, i, x) := 1/2*(cosh(b(ω)[i]*x) - cos(b(ω)[i]*x)),
# V(ω, i, x) := 1/2*(sinh(b(ω)[i]*x) - sin(b(ω)[i]*x)).
# Введем матрицу связывающую начало i-го участка с любой точкой на этом участке:A(ω, i, x) := [ S(ω, i, x), T(ω, i, x)/b(ω)[i], U(ω, i, x)/(EJ[i]*b(ω)[i]^2), V(ω, i, x)/(EJ[i]*b(ω)[i]^3); b(ω)[i]*V(ω, i, x), S(ω, i, x), T(ω, i, x)/(EJ[i]*b(ω)[i]), U(ω, i, x)/(EJ[i]*b(ω)[i]^2); EJ[i]*b(ω)[i]^2*U(ω, i, x), EJ[i]*b(ω)[i]*V(ω, i, x), S(ω, i, x), T(ω, i, x)/b(ω)[i]; EJ[i]*b(ω)[i]^3*T(ω, i, x), EJ[i]*b(ω)[i]^2*U(ω, i, x), b(ω)[i]*V(ω, i, x), S(ω, i, x) ].
# Введем матрицу перехода через стык участков:
# B(ω, i) := [1, 0, 0, 0; 0, 1, 0, 0; 0, -J[i]*ω^2, 1, 0; M[i]*ω^2, 0, 0, 1].
# Матрица связывающая вектор формы в начале первого отрезка и в конце последнего
# P(ω) := A(ω, 9, l(9))*product(B(ω, k)*A(ω, k, l(k)), k = 8 .. 1).
# Характеристическое уравнение, соответствующее нетривиальному решению
# D(ω) := P(ω)[3, 1]*P(ω)[4, 2] - P(ω)[3, 2]*P(ω)[4, 1].
# Построим график последнего выражения на промежутке ω := 0, 0.1 .. 100 [рад/с] (D(ω) принимает огромные значения, поэтому ограничимся диапазоном от -5 до 5).
# [chart]
    X[1] := ω
    Y[1] := D(ω)
solve block
    # guess values
    ω := 14
    # constraints
    D(ω) == 0
    # solver
    ω_1 := Find(ω) = 16.3011
end solve block
solve block
    # guess values
    ω := 70
    # constraints
    D(ω) == 0
    # solver
    ω_2 := Find(ω) = 75.3803
end solve block
# Перейдем к построению эпюр. Для этого введем вектор формы в начале ракеты:
# u_0(ω) := transpose([1, -P(ω)[3, 1]/P(ω)[3, 2], 0, 0]).
# Тогда вектор формы для в любой точке будет определяться по следующей зависимости
# u(ω, x) := i ← 1 while x > sum(l(j), j = 1 .. i) i ← i + 1 if i == 1 A(ω, 1, x)*u_0(ω) if i ≠ 1 A(ω, i, x - X[i])*product(B(ω, k)*A(ω, k, l(k)), k = i - 1 .. 1)*u_0(ω).
# Определим приведенную массу
# m_пр(ω) := sum(M[k]*u(ω, X[k + 1])[1]^2 + J[k]*u(ω, X[k + 1])[2]^2 + integral(m[k]*u(ω, x)[1]^2, x = X[k] .. X[k + 1]), k = 1 .. 9).
# Тогда по первому тону имеем
# m_пр1 := m_пр(ω_1) = 2146.14,
# и, аналогично, по второму тону имеем
# m_пр2 := m_пр(ω_2) = 9431.72.
#
# Теперь строим эпюры по длине ракеты x := 0, 0.1 .. L
# [chart]
    Y[1] := u(ω_1, x)[1]
    X[1] := x
    Y[2] := u(ω_2, x)[1]
    X[2] := x
# [chart]
    Y[1] := u(ω_1, x)[2]
    X[1] := x
    Y[2] := u(ω_2, x)[2]
    X[2] := x
# [chart]
    Y[1] := u(ω_1, x)[3]
    X[1] := x
    Y[2] := u(ω_2, x)[3]
    X[2] := x
# [chart]
    Y[1] := u(ω_1, x)[4]
    X[1] := x
    Y[2] := u(ω_2, x)[4]
    X[2] := x
# Решение для полностью заправленной ракеты
# Проделаем все тоже самое для полностью заправленной ракеты. Поменяем вектор приведенной массы
# m := transpose([30, 60, 40, 3500, 3500, 50, 2500, 2500, 50]).
# Введем коэффициенты b_i:
# b(ω) := nthroot(m/EJ*ω^2, 4).
# Запишем балочные функции Крылова:
# S(ω, i, x) := 1/2*(cosh(b(ω)[i]*x) + cos(b(ω)[i]*x)),
# T(ω, i, x) := 1/2*(sinh(b(ω)[i]*x) + sin(b(ω)[i]*x)),
# U(ω, i, x) := 1/2*(cosh(b(ω)[i]*x) - cos(b(ω)[i]*x)),
# V(ω, i, x) := 1/2*(sinh(b(ω)[i]*x) - sin(b(ω)[i]*x)).
# Введем матрицу связывающую начало i-го участка с любой точкой на этом участке:A(ω, i, x) := [ S(ω, i, x), T(ω, i, x)/b(ω)[i], U(ω, i, x)/(EJ[i]*b(ω)[i]^2), V(ω, i, x)/(EJ[i]*b(ω)[i]^3); b(ω)[i]*V(ω, i, x), S(ω, i, x), T(ω, i, x)/(EJ[i]*b(ω)[i]), U(ω, i, x)/(EJ[i]*b(ω)[i]^2); EJ[i]*b(ω)[i]^2*U(ω, i, x), EJ[i]*b(ω)[i]*V(ω, i, x), S(ω, i, x), T(ω, i, x)/b(ω)[i]; EJ[i]*b(ω)[i]^3*T(ω, i, x), EJ[i]*b(ω)[i]^2*U(ω, i, x), b(ω)[i]*V(ω, i, x), S(ω, i, x) ]
# Введем матрицу перехода через стык участков:
# B(ω, i) := [1, 0, 0, 0; 0, 1, 0, 0; 0, -J[i]*ω^2, 1, 0; M[i]*ω^2, 0, 0, 1].
# Матрица связывающая вектор формы в начале первого отрезка и в конце последнего
# P(ω) := A(ω, 9, l(9))*product(B(ω, k)*A(ω, k, l(k)), k = 8 .. 1).
# Характеристическое уравнение, соответствующее нетривиальному решению
# D(ω) := P(ω)[3, 1]*P(ω)[4, 2] - P(ω)[3, 2]*P(ω)[4, 1].
# Построим график последнего выражения на промежутке ω := 0, 0.1 .. 100 [рад/с] (D(ω) принимает огромные значения, поэтому ограничимся диапазоном от -5 до 5).
# [chart]
    X[1] := ω
    Y[1] := D(ω)
solve block
    # guess values
    ω := 12
    # constraints
    D(ω) == 0
    # solver
    ω_1 := Find(ω) = 14.5055
end solve block
solve block
    # guess values
    ω := 40
    # constraints
    D(ω) == 0
    # solver
    ω_2 := Find(ω) = 37.3117
end solve block
# Перейдем к построению эпюр. Для этого введем вектор формы в начале ракеты:
# u_0(ω) := transpose([1, -P(ω)[3, 1]/P(ω)[3, 2], 0, 0]).
# Тогда вектор формы для в любой точке будет определяться по следующей зависимости
# u(ω, x) := i ← 1 while x > sum(l(j), j = 1 .. i) i ← i + 1 if i == 1 A(ω, 1, x)*u_0(ω) if i ≠ 1 A(ω, i, x - X[i])*product(B(ω, k)*A(ω, k, l(k)), k = i - 1 .. 1)*u_0(ω).
# Определим приведенную массу
# m_пр(ω) := sum(M[k]*u(ω, X[k + 1])[1]^2 + J[k]*u(ω, X[k + 1])[2]^2 + integral(m[k]*u(ω, x)[1]^2, x = X[k] .. X[k + 1]), k = 1 .. 9).
# Тогда по первому тону имеем
# m_пр1 := m_пр(ω_1) = 1694.12,
# и, аналогично, по второму тону имеем
# m_пр2 := m_пр(ω_2) = 2361.67.
#
# Теперь строим эпюры по длине ракеты x := 0, 0.1 .. L
# [chart]
    Y[1] := u(ω_1, x)[1]
    X[1] := x
    Y[2] := u(ω_2, x)[1]
    X[2] := x
# [chart]
    Y[1] := u(ω_1, x)[2]
    X[1] := x
    Y[2] := u(ω_2, x)[2]
    X[2] := x
# [chart]
    Y[1] := u(ω_1, x)[3]
    X[1] := x
    Y[2] := u(ω_2, x)[3]
    X[2] := x
# [chart]
    Y[1] := u(ω_1, x)[4]
    X[1] := x
    Y[2] := u(ω_2, x)[4]
    X[2] := x
# Решение для пустой ракеты
# Проделаем все тоже самое для пустой ракеты. Поменяем вектор приведенной массы
# m := transpose([30, 60, 40, 30, 30, 50, 35, 35, 50]).
# Введем коэффициенты b_i:
# b(ω) := nthroot(m/EJ*ω^2, 4).
# Запишем балочные функции Крылова:
# S(ω, i, x) := 1/2*(cosh(b(ω)[i]*x) + cos(b(ω)[i]*x)),
# T(ω, i, x) := 1/2*(sinh(b(ω)[i]*x) + sin(b(ω)[i]*x)),
# U(ω, i, x) := 1/2*(cosh(b(ω)[i]*x) - cos(b(ω)[i]*x)),
# V(ω, i, x) := 1/2*(sinh(b(ω)[i]*x) - sin(b(ω)[i]*x)).
# Введем матрицу связывающую начало i-го участка с любой точкой на этом участке:A(ω, i, x) := [ S(ω, i, x), T(ω, i, x)/b(ω)[i], U(ω, i, x)/(EJ[i]*b(ω)[i]^2), V(ω, i, x)/(EJ[i]*b(ω)[i]^3); b(ω)[i]*V(ω, i, x), S(ω, i, x), T(ω, i, x)/(EJ[i]*b(ω)[i]), U(ω, i, x)/(EJ[i]*b(ω)[i]^2); EJ[i]*b(ω)[i]^2*U(ω, i, x), EJ[i]*b(ω)[i]*V(ω, i, x), S(ω, i, x), T(ω, i, x)/b(ω)[i]; EJ[i]*b(ω)[i]^3*T(ω, i, x), EJ[i]*b(ω)[i]^2*U(ω, i, x), b(ω)[i]*V(ω, i, x), S(ω, i, x) ]
# Введем матрицу перехода через стык участков:
# B(ω, i) := [1, 0, 0, 0; 0, 1, 0, 0; 0, -J[i]*ω^2, 1, 0; M[i]*ω^2, 0, 0, 1].
# Матрица связывающая вектор формы в начале первого отрезка и в конце последнего
# P(ω) := A(ω, 9, l(9))*product(B(ω, k)*A(ω, k, l(k)), k = 8 .. 1).
# Характеристическое уравнение, соответствующее нетривиальному решению
# D(ω) := P(ω)[3, 1]*P(ω)[4, 2] - P(ω)[3, 2]*P(ω)[4, 1].
# Построим график последнего выражения на промежутке ω := 0, 0.1 .. 150 [рад/с] (D(ω) принимает огромные значения, поэтому ограничимся диапазоном от -5 до 5).
# [chart]
    X[1] := ω
    Y[1] := D(ω)
solve block
    # guess values
    ω := 40
    # constraints
    D(ω) == 0
    # solver
    ω_1 := Find(ω) = 41.8131
end solve block
solve block
    # guess values
    ω := 110
    # constraints
    D(ω) == 0
    # solver
    ω_2 := Find(ω) = 118.253
end solve block
# Перейдем к построению эпюр. Для этого введем вектор формы в начале ракеты:
# u_0(ω) := transpose([1, -P(ω)[3, 1]/P(ω)[3, 2], 0, 0]).
# Тогда вектор формы для в любой точке будет определяться по следующей зависимости
# u(ω, x) := i ← 1 while x > sum(l(j), j = 1 .. i) i ← i + 1 if i == 1 A(ω, 1, x)*u_0(ω) if i ≠ 1 A(ω, i, x - X[i])*product(B(ω, k)*A(ω, k, l(k)), k = i - 1 .. 1)*u_0(ω).
# Определим приведенную массу
# m_пр(ω) := sum(M[k]*u(ω, X[k + 1])[1]^2 + J[k]*u(ω, X[k + 1])[2]^2 + integral(m[k]*u(ω, x)[1]^2, x = X[k] .. X[k + 1]), k = 1 .. 9).
# Тогда по первому тону имеем
# m_пр1 := m_пр(ω_1) = 1820.39,
# и, аналогично, по второму тону имеем
# m_пр2 := m_пр(ω_2) = 710.414.
# Теперь строим эпюры по длине ракеты x := 0, 0.1 .. L
# [chart]
    Y[1] := u(ω_1, x)[1]
    X[1] := x
    Y[2] := u(ω_2, x)[1]
    X[2] := x
# [chart]
    Y[1] := u(ω_1, x)[2]
    X[1] := x
    Y[2] := u(ω_2, x)[2]
    X[2] := x
# [chart]
    Y[1] := u(ω_1, x)[3]
    X[1] := x
    Y[2] := u(ω_2, x)[3]
    X[2] := x
# [chart]
    Y[1] := u(ω_1, x)[4]
    X[1] := x
    Y[2] := u(ω_2, x)[4]
    X[2] := x
