# Дано:
M_1 := 1200  # кг
M_2 := 1000  # кг
x_1 := 1.5
x_6 := 12
x_7 := 16
x_2 := 3
x_8 := 17.5
x_3 := 4
x_9 := 19
x_4 := 6
x_5 := 8
# 1. Исходный вариант распределения топлива в ракете:
# Матрица столбец координат стыков и длин участков:
ORIGIN := 1
X := [0; x_1 - 0.1; x_1; x_1 + 0.1; x_2; x_3; x_4; x_5; x_6; x_7; x_8 - 0.1; x_8; x_8 + 0.1; x_9]
L :=
    for i ∈ 1 .. 13
        L[i] ← X[i + 1] - X[i]
    L
    = [1.4; 0.1; 0.1; 1.4; 1; 2; 2; 4; 4; 1.4; 0.1; 0.1; 1.4]
# Зададим вектор столбец погонных масс в начале и в конце участка полета:
# Зададим матрицу погонных жесткостей:
EJ := [22; 22; 45; 45; 34; 22; 22; 30; 30; 30; 40; 40; 40]*1000000
m_0 := [
    24;
    (24*L[2] + M_1/2)/L[2];
    (48*L[3] + M_1/2)/L[3];
    48;
    36;
    20;
    2800;
    25;
    1600;
    40;
    (40*L[11] + M_2/2)/L[11];
    (40*L[12] + M_2/2)/L[12];
    40
] = [24; 6024; 6048; 48; 36; 20; 2800; 25; 1600; 40; 5040; 5040; 40]
# Зададимся матрицей коэффициентов форм колебаний:
b(w) :=
    for i ∈ 1, 2 .. 13
        b[i] ← (m_0[i]*w^2/EJ[i])^0.25
    b
# Введем функции Крылова:
S(x) := 0.5*(cosh(x) + cos(x))
T(x) := 0.5*(sinh(x) + sin(x))
U(x) := 0.5*(cosh(x) - cos(x))
V(x) := 0.5*(sinh(x) - sin(x))
# Запишем матрицу перехода между участками:
A(i, w, x) := [
    S(b(w)[i]*x), T(b(w)[i]*x)/b(w)[i], U(b(w)[i]*x)/(EJ[i]*b(w)[i]^2), V(b(w)[i]*x)/(EJ[i]*b(w)[i]^3);
    b(w)[i]*V(b(w)[i]*x), S(b(w)[i]*x), T(b(w)[i]*x)/(EJ[i]*b(w)[i]), U(b(w)[i]*x)/(EJ[i]*b(w)[i]^2);
    EJ[i]*b(w)[i]^2*U(b(w)[i]*x), EJ[i]*b(w)[i]*V(b(w)[i]*x), S(b(w)[i]*x), T(b(w)[i]*x)/b(w)[i];
    EJ[i]*b(w)[i]^3*T(b(w)[i]*x), EJ[i]*b(w)[i]^2*U(b(w)[i]*x), b(w)[i]*V(b(w)[i]*x), S(b(w)[i]*x)
]
P(w) := product(A(i, w, L[i]), i = 13 .. 1)
D(w) := P(w)[3, 1]*P(w)[4, 2] - P(w)[3, 2]*P(w)[4, 1]
# Теперь необходимо определить собственные частоты перебором:
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w_10 := 14
w_10 := root(D(w_10), w_10) = 14.4154
w_20 := root(D(w_20), w_20, 15, 80) = 33.3892
# Запишем вектор формы для крайнего участка
u_0(w) := [1; -P(w)[3, 1]/P(w)[3, 2]; 0; 0]
# Форма собственных колебаний:
# Запишем формулу колебаний:
y(i, w, x) :=
    A(i, w, x) if i == 1
    A(i, w, x)*product(A(j, w, L[j]), j = i - 1 .. 1) otherwise
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P_x(w, x) :=
    y(1, w, x) if X[1] ≤ x ≤ X[2]
    y(2, w, x - X[2]) if X[2] ≤ x ≤ X[3]
    y(3, w, x - X[3]) if X[3] ≤ x ≤ X[4]
    y(4, w, x - X[4]) if X[4] ≤ x ≤ X[5]
    y(5, w, x - X[5]) if X[5] ≤ x ≤ X[6]
    y(6, w, x - X[6]) if X[6] ≤ x ≤ X[7]
    y(7, w, x - X[7]) if X[7] ≤ x ≤ X[8]
    y(8, w, x - X[8]) if X[8] ≤ x ≤ X[9]
    y(9, w, x - X[9]) if X[9] ≤ x ≤ X[10]
    y(10, w, x - X[10]) if X[10] ≤ x ≤ X[11]
    y(11, w, x - X[11]) if X[11] ≤ x ≤ X[12]
    y(12, w, x - X[12]) if X[12] ≤ x ≤ X[13]
    y(13, w, x - X[13]) if X[13] ≤ x ≤ X[14]
f_10(x) := P_x(w_10, x)[1, 1] - P(w_10)[3, 1]/P(w_10)[3, 2]*P_x(w_10, x)[1, 2]
f_20(x) := P_x(w_20, x)[1, 1] - (P(w_20)[3, 1]/P(w_20)[3, 2])*P_x(w_20, x)[1, 2]
θ_10(x) := P_x(w_10, x)[2, 1] - P(w_10)[3, 1]/P(w_10)[3, 2]*P_x(w_10, x)[2, 2]
θ_20(x) := P_x(w_20, x)[2, 1] - (P(w_20)[3, 1]/P(w_20)[3, 2])*P_x(w_20, x)[2, 2]
x := 0, 0.1 .. X[14]
X[14] = 19
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# График форм колебаний:
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# График поворота сечения:
M_10(x) := P_x(w_10, x)[3, 1] - P(w_10)[3, 1]/P(w_10)[3, 2]*P_x(w_10, x)[3, 2]
M_20(x) := P_x(w_20, x)[3, 1] - (P(w_20)[3, 1]/P(w_20)[3, 2])*P_x(w_20, x)[3, 2]
Q_10(x) := P_x(w_10, x)[4, 1] - P(w_10)[3, 1]/P(w_10)[3, 2]*P_x(w_10, x)[4, 2]
Q_20(x) := P_x(w_20, x)[4, 1] - (P(w_20)[3, 1]/P(w_20)[3, 2])*P_x(w_20, x)[4, 2]
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# Форма изгибающих моментов:
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# График поперечных сил:
# Вычисления коэффициента приведения масс:
M_0pr(x) :=
    m_0[1] if X[1] ≤ x ≤ X[2]
    m_0[2] if X[2] ≤ x ≤ X[3]
    m_0[3] if X[3] ≤ x ≤ X[4]
    m_0[4] if X[4] ≤ x ≤ X[5]
    m_0[5] if X[5] ≤ x ≤ X[6]
    m_0[6] if X[6] ≤ x ≤ X[7]
    m_0[7] if X[7] ≤ x ≤ X[8]
    m_0[8] if X[8] ≤ x ≤ X[9]
    m_0[9] if X[9] ≤ x ≤ X[10]
    m_0[10] if X[10] ≤ x ≤ X[11]
    m_0[11] if X[11] ≤ x ≤ X[12]
    m_0[12] if X[12] ≤ x ≤ X[13]
    m_0[13] if X[13] ≤ x ≤ X[14]
m_10 := integral(M_0pr(x)*f_10(x)^2, x = X[1] .. X[14]) = 1245.02
m_20 := integral(M_0pr(x)*f_20(x)^2, x = X[1] .. X[14]) = 5115.47
# Проверка устойчивости:
X_GP := 3.5
f_10(X[14]) = 0.626848
f_10(X_GP) = 0.292404
f_20(X[14]) = -2.25774
f_20(X_GP) = -0.0815939
f_10(X[14])*(d/dx(f_10(x)))
# 2. Заправленная ракета:
# Зададим вектор столбец погонных масс в начале и в конце участка полета:
m_1 := [
    24;
    (24*L[2] + M_1/2)/L[2];
    (48*L[3] + M_1/2)/L[3];
    48;
    36;
    2800;
    2800;
    1600;
    1600;
    40;
    (40*L[11] + M_2/2)/L[11];
    (40*L[12] + M_2/2)/L[12];
    40
] = [24; 6024; 6048; 48; 36; 2800; 2800; 1600; 1600; 40; 5040; 5040; 40]
# Зададимся матрицей коэффициентов форм колебаний:
b(w) :=
    for i ∈ 1, 2 .. 13
        b[i] ← (m_1[i]*w^2/EJ[i])^0.25
    b
# Запишем матрицу перехода между участками:
A(i, w, x) := [
    S(b(w)[i]*x), T(b(w)[i]*x)/b(w)[i], U(b(w)[i]*x)/(EJ[i]*b(w)[i]^2), V(b(w)[i]*x)/(EJ[i]*b(w)[i]^3);
    b(w)[i]*V(b(w)[i]*x), S(b(w)[i]*x), T(b(w)[i]*x)/(EJ[i]*b(w)[i]), U(b(w)[i]*x)/(EJ[i]*b(w)[i]^2);
    EJ[i]*b(w)[i]^2*U(b(w)[i]*x), EJ[i]*b(w)[i]*V(b(w)[i]*x), S(b(w)[i]*x), T(b(w)[i]*x)/b(w)[i];
    EJ[i]*b(w)[i]^3*T(b(w)[i]*x), EJ[i]*b(w)[i]^2*U(b(w)[i]*x), b(w)[i]*V(b(w)[i]*x), S(b(w)[i]*x)
]
P(w) := product(A(i, w, L[i]), i = 13 .. 1)
D(w) := P(w)[3, 1]*P(w)[4, 2] - P(w)[3, 2]*P(w)[4, 1]
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# Теперь необходимо определить собственные частоты перебором:
w_11 := 11
w_11 := root(D(w_11), w_11) = 12.1362
w_21 := root(D(w_21), w_21, 14, 40) = 28.2653
# Запишем формулу колебаний:
y(i, w, x) :=
    A(i, w, x) if i == 1
    A(i, w, x)*product(A(j, w, L[j]), j = i - 1 .. 1) otherwise
P_x(w, x) :=
    y(1, w, x) if X[1] ≤ x ≤ X[2]
    y(2, w, x - X[2]) if X[2] ≤ x ≤ X[3]
    y(3, w, x - X[3]) if X[3] ≤ x ≤ X[4]
    y(4, w, x - X[4]) if X[4] ≤ x ≤ X[5]
    y(5, w, x - X[5]) if X[5] ≤ x ≤ X[6]
    y(6, w, x - X[6]) if X[6] ≤ x ≤ X[7]
    y(7, w, x - X[7]) if X[7] ≤ x ≤ X[8]
    y(8, w, x - X[8]) if X[8] ≤ x ≤ X[9]
    y(9, w, x - X[9]) if X[9] ≤ x ≤ X[10]
    y(10, w, x - X[10]) if X[10] ≤ x ≤ X[11]
    y(11, w, x - X[11]) if X[11] ≤ x ≤ X[12]
    y(12, w, x - X[12]) if X[12] ≤ x ≤ X[13]
    y(13, w, x - X[13]) if X[13] ≤ x ≤ X[14]
f_11(x) := P_x(w_11, x)[1, 1] - P(w_11)[3, 1]/P(w_11)[3, 2]*P_x(w_11, x)[1, 2]
f_21(x) := P_x(w_21, x)[1, 1] - (P(w_21)[3, 1]/P(w_21)[3, 2])*P_x(w_21, x)[1, 2]
θ_11(x) := P_x(w_11, x)[2, 1] - P(w_11)[3, 1]/P(w_11)[3, 2]*P_x(w_11, x)[2, 2]
θ_21(x) := P_x(w_21, x)[2, 1] - (P(w_21)[3, 1]/P(w_21)[3, 2])*P_x(w_21, x)[2, 2]
x := 0, 0.1 .. X[14]
X[14] = 19
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# График форм колебаний:
# График поворота сечения:
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M_11(x) := P_x(w_11, x)[3, 1] - P(w_11)[3, 1]/P(w_11)[3, 2]*P_x(w_11, x)[3, 2]
M_21(x) := P_x(w_21, x)[3, 1] - (P(w_21)[3, 1]/P(w_21)[3, 2])*P_x(w_21, x)[3, 2]
Q_11(x) := P_x(w_11, x)[4, 1] - P(w_11)[3, 1]/P(w_11)[3, 2]*P_x(w_11, x)[4, 2]
Q_21(x) := P_x(w_21, x)[4, 1] - (P(w_21)[3, 1]/P(w_21)[3, 2])*P_x(w_21, x)[4, 2]
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# Форма изгибающих моментов:
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# График поперечных сил:
# Вычисления коэффициента приведения масс:
M_1pr(x) :=
    m_1[1] if X[1] ≤ x ≤ X[2]
    m_1[2] if X[2] ≤ x ≤ X[3]
    m_1[3] if X[3] ≤ x ≤ X[4]
    m_1[4] if X[4] ≤ x ≤ X[5]
    m_1[5] if X[5] ≤ x ≤ X[6]
    m_1[6] if X[6] ≤ x ≤ X[7]
    m_1[7] if X[7] ≤ x ≤ X[8]
    m_1[8] if X[8] ≤ x ≤ X[9]
    m_1[9] if X[9] ≤ x ≤ X[10]
    m_1[10] if X[10] ≤ x ≤ X[11]
    m_1[11] if X[11] ≤ x ≤ X[12]
    m_1[12] if X[12] ≤ x ≤ X[13]
    m_1[13] if X[13] ≤ x ≤ X[14]
m_11 := integral(M_1pr(x)*f_11(x)^2, x = X[1] .. X[14]) = 1874.37
m_21 := integral(M_1pr(x)*f_21(x)^2, x = X[1] .. X[14]) = 1978.7
# 3. Сухая ракета:
# Зададим вектор столбец погонных масс в начале и в конце участка полета:
m_2 := [
    24;
    (24*L[2] + M_1/2)/L[2];
    (48*L[3] + M_1/2)/L[3];
    48;
    36;
    20;
    20;
    25;
    25;
    40;
    (40*L[11] + M_2/2)/L[11];
    (40*L[12] + M_2/2)/L[12];
    40
] = [24; 6024; 6048; 48; 36; 20; 20; 25; 25; 40; 5040; 5040; 40]
# Зададимся матрицей коэффициентов форм колебаний:
b(w) :=
    for i ∈ 1, 2 .. 13
        b[i] ← (m_2[i]*w^2/EJ[i])^0.25
    b
# Запишем матрицу перехода между участками:
A(i, w, x) := [
    S(b(w)[i]*x), T(b(w)[i]*x)/b(w)[i], U(b(w)[i]*x)/(EJ[i]*b(w)[i]^2), V(b(w)[i]*x)/(EJ[i]*b(w)[i]^3);
    b(w)[i]*V(b(w)[i]*x), S(b(w)[i]*x), T(b(w)[i]*x)/(EJ[i]*b(w)[i]), U(b(w)[i]*x)/(EJ[i]*b(w)[i]^2);
    EJ[i]*b(w)[i]^2*U(b(w)[i]*x), EJ[i]*b(w)[i]*V(b(w)[i]*x), S(b(w)[i]*x), T(b(w)[i]*x)/b(w)[i];
    EJ[i]*b(w)[i]^3*T(b(w)[i]*x), EJ[i]*b(w)[i]^2*U(b(w)[i]*x), b(w)[i]*V(b(w)[i]*x), S(b(w)[i]*x)
]
P(w) := product(A(i, w, L[i]), i = 13 .. 1)
D(w) := P(w)[3, 1]*P(w)[4, 2] - P(w)[3, 2]*P(w)[4, 1]
# Теперь необходимо определить собственные частоты перебором:
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w_12 := 43
w_12 := root(D(w_12), w_12) = 43.1997
w_22 := root(D(w_22), w_22, 45, 160) = 158.852
# Запишем формулу колебаний:
y(i, w, x) :=
    A(i, w, x) if i == 1
    A(i, w, x)*product(A(j, w, L[j]), j = i - 1 .. 1) otherwise
P_x(w, x) :=
    y(1, w, x) if X[1] ≤ x ≤ X[2]
    y(2, w, x - X[2]) if X[2] ≤ x ≤ X[3]
    y(3, w, x - X[3]) if X[3] ≤ x ≤ X[4]
    y(4, w, x - X[4]) if X[4] ≤ x ≤ X[5]
    y(5, w, x - X[5]) if X[5] ≤ x ≤ X[6]
    y(6, w, x - X[6]) if X[6] ≤ x ≤ X[7]
    y(7, w, x - X[7]) if X[7] ≤ x ≤ X[8]
    y(8, w, x - X[8]) if X[8] ≤ x ≤ X[9]
    y(9, w, x - X[9]) if X[9] ≤ x ≤ X[10]
    y(10, w, x - X[10]) if X[10] ≤ x ≤ X[11]
    y(11, w, x - X[11]) if X[11] ≤ x ≤ X[12]
    y(12, w, x - X[12]) if X[12] ≤ x ≤ X[13]
    y(13, w, x - X[13]) if X[13] ≤ x ≤ X[14]
f_12(x) := P_x(w_12, x)[1, 1] - P(w_12)[3, 1]/P(w_12)[3, 2]*P_x(w_12, x)[1, 2]
f_22(x) := P_x(w_22, x)[1, 1] - (P(w_22)[3, 1]/P(w_22)[3, 2])*P_x(w_22, x)[1, 2]
θ_12(x) := P_x(w_12, x)[2, 1] - P(w_12)[3, 1]/P(w_12)[3, 2]*P_x(w_12, x)[2, 2]
θ_22(x) := P_x(w_22, x)[2, 1] - (P(w_22)[3, 1]/P(w_22)[3, 2])*P_x(w_22, x)[2, 2]
x := 0, 0.1 .. X[14]
X[14] = 19
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# График форм колебаний:
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# График поворота сечения:
M_12(x) := P_x(w_12, x)[3, 1] - P(w_12)[3, 1]/P(w_12)[3, 2]*P_x(w_12, x)[3, 2]
M_22(x) := P_x(w_22, x)[3, 1] - (P(w_22)[3, 1]/P(w_22)[3, 2])*P_x(w_22, x)[3, 2]
Q_12(x) := P_x(w_12, x)[4, 1] - P(w_12)[3, 1]/P(w_12)[3, 2]*P_x(w_12, x)[4, 2]
Q_22(x) := P_x(w_22, x)[4, 1] - (P(w_22)[3, 1]/P(w_22)[3, 2])*P_x(w_22, x)[4, 2]
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# Форма изгибающих моментов:
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# График поперечных сил:
# Вычисления коэффициента приведения масс:
M_2pr(x) :=
    m_2[1] if X[1] ≤ x ≤ X[2]
    m_2[2] if X[2] ≤ x ≤ X[3]
    m_2[3] if X[3] ≤ x ≤ X[4]
    m_2[4] if X[4] ≤ x ≤ X[5]
    m_2[5] if X[5] ≤ x ≤ X[6]
    m_2[6] if X[6] ≤ x ≤ X[7]
    m_2[7] if X[7] ≤ x ≤ X[8]
    m_2[8] if X[8] ≤ x ≤ X[9]
    m_2[9] if X[9] ≤ x ≤ X[10]
    m_2[10] if X[10] ≤ x ≤ X[11]
    m_2[11] if X[11] ≤ x ≤ X[12]
    m_2[12] if X[12] ≤ x ≤ X[13]
    m_2[13] if X[13] ≤ x ≤ X[14]
m_12 := integral(M_2pr(x)*f_12(x)^2, x = X[1] .. X[14]) = 1176.61
m_22 := integral(M_2pr(x)*f_22(x)^2, x = X[1] .. X[14]) = 481.097
