# Степень заполнения ракеты:
s := 0.1
# Координаты сечений: | Жесткость участков ракеты:
# Погонная масса:
x_1 := 2.0
EJ_1 := 40*10^6
m_1 := 30
x_2 := 4.0
EJ_2 := 90*10^6
m_2 := 60
x_3 := 5.0
EJ_3 := 60*10^6
m_3 := 40
x_5 := 11.0
EJ_4 := 44*10^6
m_4 := 30
x_4 := x_3 + (x_5 - x_3)*(1 - s)
EJ_5 := 44*10^6
m_5 := 3500
x_6 := 12.0
EJ_6 := 60*10^6
m_6 := 50
x_8 := 16.0
EJ_7 := 55*10^6
m_7 := 35
x_7 := x_6 + (x_8 - x_6)*(1 - s)
EJ_8 := 55*10^6
m_8 := 2500
x_9 := 19.5
EJ_9 := 60*10^6
m_9 := 50
# Определим длины участков исходя из координат их границ:
l_1 := x_1 = 2
l_4 := x_4 - x_3 = 5.4
l_7 := x_7 - x_6 = 3.6
l_2 := x_2 - x_1 = 2
l_5 := x_5 - x_4 = 0.6
l_8 := x_8 - x_7 = 0.4
l_3 := x_3 - x_2 = 1
l_6 := x_6 - x_5 = 1
l_9 := x_9 - x_8 = 3.5
# Задаемся сосредоточенными массами и моментами инерции:
M_1 := 1000  # - сосредоточенная масса в сечении с координатой x_1
M_2 := 800  # - сосредоточенная масса в сечении с координатой x_8
J_8 := 1500  # - момент инерции за счет карданного подвеса ДУ в сеченииx_8
# Создадим вспомогательные вектора масс, жесткостей и длин участков, для дальнейшего обращения к ним в индексной форме:
X := [x_1; x_2; x_3; x_4; x_5; x_6; x_7; x_8; x_9]  # - вектор координат x_i
m := [m_1; m_2; m_3; m_4; m_5; m_6; m_7; m_8; m_9]  # - вектор распределения массы по участкам l_i
EJ := [EJ_1; EJ_2; EJ_3; EJ_4; EJ_5; EJ_6; EJ_7; EJ_8; EJ_9]  # - вектор распределения жесткости по участкам l_i
l := [l_1; l_2; l_3; l_4; l_5; l_6; l_7; l_8; l_9]  # - вектор длин участков l_i
# Общая длина ракеты:
L := sum(l[n], n = 0 .. 8) = 19.5
# Определим Функции Крылова:
i := 0, 1 .. 8
b(ω, i) := nthroot(ω^2*m[i]/EJ[i], 4)
S(ω, i, x) := 1/2*(cosh(b(ω, i)*x) + cos(b(ω, i)*x))
T(ω, i, x) := 1/2*(sinh(b(ω, i)*x) + sin(b(ω, i)*x))
U(ω, i, x) := 1/2*(cosh(b(ω, i)*x) - cos(b(ω, i)*x))
V(ω, i, x) := 1/2*(sinh(b(ω, i)*x) - sin(b(ω, i)*x))
# Запишем вспомогательные матрицы сосредоточенных масс и моментов инерции:
M := [M_1; 0; 0; 0; 0; 0; 0; M_2] = [1000; 0; 0; 0; 0; 0; 0; 800]
J := [0; 0; 0; 0; 0; 0; 0; J_8] = [0; 0; 0; 0; 0; 0; 0; 1500]
# Матрицы перехода через стыки участков в общем виде со сосредоточенной массой и моментом инерции:
B(ω, i) := [1, 0, 0, 0; 0, 1, 0, 0; 0, -(J[i]*ω^2), 1, 0; M[i]*ω^2, 0, 0, 1]  # - через стыки с координатами x_i
# Матрицы перехода через участки:
A(ω, i, x) := [
    S(ω, i, x), T(ω, i, x)/b(ω, i), U(ω, i, x)/(EJ[i]*b(ω, i)^2), V(ω, i, x)/(EJ[i]*b(ω, i)^3);
    b(ω, i)*V(ω, i, x), S(ω, i, x), T(ω, i, x)/(EJ[i]*b(ω, i)), U(ω, i, x)/(EJ[i]*b(ω, i)^2);
    EJ[i]*b(ω, i)^2*U(ω, i, x), EJ[i]*b(ω, i)*V(ω, i, x), S(ω, i, x), T(ω, i, x)/b(ω, i);
    EJ[i]*b(ω, i)^3*T(ω, i, x), EJ[i]*b(ω, i)^2*U(ω, i, x), b(ω, i)*V(ω, i, x), S(ω, i, x)
]
# Общая матрица перехода от первого до последнего участка есть произведение матриц перехода через участки на матрицы перехода через границы участков:
P(ω) := product(A(ω, j, l[j])*B(ω, j - 1), j = 8 .. 1)*A(ω, 0, l_1)
# Значение определителя, отвечающего за наличие ненулевых решений:
Δ(ω) := P(ω)[2, 0]*P(ω)[3, 1] - P(ω)[3, 0]*P(ω)[2, 1]
ω := 0, 0.1 .. 100
# [plot: Δ(ω) vs ω]
# Первая собственная частота:
solve block
    # guess values
    ω := 30
    # constraints
    P(ω)[2, 0]*P(ω)[3, 1] - P(ω)[2, 1]*P(ω)[3, 0] == 0
    # solver
    ω_1 := Find(ω) = 25.3586
end solve block
# Вторая собственная частота:
solve block
    # guess values
    ω := 100
    # constraints
    P(ω)[2, 0]*P(ω)[3, 1] - P(ω)[2, 1]*P(ω)[3, 0] == 0
    # solver
    ω_2 := Find(ω) = 3.18518e-82
end solve block
# Построение эпюр:
#
# Исходя из системы (21), приняв u_1(0) == 1, получим:
u_1(ω) := [1; -P(ω)[2, 0]/P(ω)[2, 1]; 0; 0]
# В уже проведенном расчете матрица перехода P соответствует всей длине ракеты. Запишем эту матрицу для неопределенной координаты x.
I(x) :=
    i ← 0
    while X[i] < x
        i ← i + 1
P(ω, x) :=
    if I(x) == 0
        P(ω, x) ← A(ω, I(x), x)
    if I(x) == 1
        P(ω, x) ← A(ω, I(x), x - X[I(x) - 1])*B(ω, I(x) - 1)*A(ω, 0, l_1)
    if I(x) > 1
        P(ω, x) ← A(ω, I(x), x - X[I(x) - 1])*B(ω, I(x) - 1)*product(A(ω, j, l[j])*B(ω, j - 1), j = I(x) - 1 .. 1)*A(ω, 0, l_1)
    P(ω, x)
xGP := 4.5
u(ω, x) := P(ω, x)*u_1(ω)
f10 := u(ω_1, x_9)[0, 0] = 1.35043
f20 := u(ω_2, x_9)[0, 0] = -1.70744
fp(ω, x) := d/dx(u(ω, x)[0, 0])
fp(ω_1, xGP)*f10 = -0.294639
fp(ω_2, xGP)*f20 = 0.237067
φ_1 := fp(ω_1, 0)*u(ω_1, xGP)[0, 0] = 0.0105895
φ_2(x) := fp(ω_2, x)*u(ω_2, x)[0, 0]
x := 0, 0.1 .. x_9
u(ω_1, xGP)[0, 0] = -0.0449803
fp(ω_1, 0) = -0.235425
# [plot: φ_1(x) vs x]
# [plot: φ_2(x) vs x]
m(x) :=
    for i ∈ 0, 1 .. 7
        if X[i] < x < X[i + 1]
            m[i + 1]
        else if 0 < x < X[0]
            24
f_n(ω, x) := u(ω, x)[0, 0]
m_s := integral(m(x)*f_n(ω_1, x)^2, x = 0 .. L) = 1238.99
i := sqrt(-1)
R := 12260*0.5*9.81 = 60135.3
φn(ω) := arg(-1*R*fp(ω_1, 0)*u(ω_1, xGP)[0, 0]/((20^2 + i*ω*2*0.001 - ω^2)*m_s))
An(ω) := Re(1*R*fp(ω_1, 0)*u(ω_1, xGP)[0, 0]/((ω_1^2 + i*ω*2*0.001 - ω^2)*m_s))
φn(10) = 3.14153
A(ω) := 0.5*e^(0.01*(20 - ω))
φ(ω) := π/30*(20 - ω) + φn(ω)
A(20) = 0.5
Z(ω) := An(ω)*A(ω)
ω := 0, 1 .. 40
An(20) = 0.00211459
# [plot: An(ω) vs 1*R*fp(ω, 0)*u(ω, xGP)[0, 0]]
# Повторно выразим формул для перемещений
f_n(w, x) := u(w, x)[0, 0]
# По первому тону
x_p := x_9 = 19.5
x_гп := 13.5
f_1(w_1, x) := u(w_1, x)[0, 0]
f_1'(x) := u(ω_1, x)[1, 0]
f_1(ω_1, 0.99*x_p) = 1.29809
f_1'(x_гп) = 0.214083
f_1(ω_1, 0.99*x_p)*f_1'(x_гп) = 0.277899
m_1пр := M_1 + M_2 + integral(m(x)*f_n(ω_1, x)^2, x = 0 .. L) = 3038.99
# По второму тону
f_2(x) := u(ω_2, x)[0, 0]
f_2'(x) := u(ω_2, x)[1, 0]
f_2(0.99*x_p) = -1.68037
f_2'(x_гп) = -0.138843
f_2(0.99*x_p)*f_2'(x_гп) = 0.233308
m_2пр := M_1 + M_2 + integral(m(x)*f_n(ω_2, x)^2, x = 0 .. L) = 4317.95
m_4 := 3500
m_7 := 2500
m := [m_1; m_2; m_3; m_4; m_5; m_6; m_7; m_8; m_9] = [30; 60; 40; 3500; 3500; 50; 2500; 2500; 50]
M_0 := M_1 + M_2 + sum(m[i]*l[i], i = 0 .. 8) = 33245
k_p := 0.5
Rz := k_p*M_0*9.81 = 163067
ε := 0.001
c_qnqn' := 2*ε = 0.002
c_qnqn(w_n) := w_n^2
U_n(w, f_nf_n', m_пр, w_n) := Rz/m_пр*f_nf_n'*(c_qnqn(w_n) - w^2)/((c_qnqn(w_n) - w^2)^2 + c_qnqn'^2*w^2)
V_n(w, f_nf_n', m_пр, w_n) := -Rz/m_пр*f_nf_n'*(c_qnqn'*w)/((c_qnqn(w_n) - w^2)^2 + c_qnqn'^2*w^2)
# Модуль комплексного числа
A_n(w, f_nf_n', m_пр, w_n) := sqrt(U_n(w, f_nf_n', m_пр, w_n)^2 + V_n(w, f_nf_n', m_пр, w_n)^2)
w_0 := 20
w_π := 50
w_2π := 110
A_AC(w) := 0.5*exp(0.01*(w_0 - w))
solve block
    # guess values
    f_nf_n' := 0
    w := 0, 1 .. w_2π
    # constraints
    A_n(w, f_nf_n', m_1пр, ω_1)*A_AC(w) == 1
    # solver
    FF(w) := Find(f_nf_n')
end solve block
A_n(10, 15, m_1пр, ω_1)*A_AC(10) = 0.818992
# [plot: w vs FF(w)]
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solve block
    # guess values
    f_nf_n' := 0
    # constraints
    A_n(w, f_nf_n', m_1пр, ω_1)*A_AC(w) == 1
    f_nf_n' < 0
    # solver
    FF(w) := Find(f_nf_n')
end solve block
# [plot: w vs FF(w)]
A_n(10, -100, m_1пр, ω_1)*A_AC(10) = 5.45995
