mN := N*10^-3
MN = 1000000 N
m_i(i) := {
    if i == 1
        24
    else if i == 2
        48
    else if i == 3
        36
    else if i == 4
        20
    else if i == 5
        2800
    else if i == 6
        25
    else if i == 7
        1600
    else if i == 8
        40
    else if i == 9
        40
}*kg/m
EJ_i(i) := {
    if i == 1
        22
    else if i == 2
        45
    else if i == 3
        34
    else if i == 4
        22
    else if i == 5
        22
    else if i == 6
        30
    else if i == 7
        30
    else if i == 8
        40
    else if i == 9
        40
}*MN*m^2
x(i) := {
    if i == 1
        1.5
    else if i == 2
        3.0
    else if i == 3
        4.0
    else if i == 4
        7.0
    else if i == 5
        10.0
    else if i == 6
        13.0
    else if i == 7
        15.0
    else if i == 8
        16.0
    else if i == 9
        18.5
}*m
i(x) :=
    x ← x/m
    if x < 1.5
        1
    else if x < 3.0
        2
    else if x < 4.0
        3
    else if x < 7.0
        4
    else if x < 10.0
        5
    else if x < 13.0
        6
    else if x < 15.0
        7
    else if x < 16.0
        8
    else if x ≤ 18.5
        9
J_0 := 3000 tonne*m^2
M_1 := 1 tonne
M_2 := 1 tonne
l_i(i) :=
    if i == 1
        x(i)
    else
        x(i) - x(i - 1)
L := 18.5 m
b_i(ω, i) := nthroot(ω^2*m_i(i)/EJ_i(i), 4)
S(x, ω, i) := 1/2*(cosh(b_i(ω, i)*x) + cos(b_i(ω, i)*x))
T(x, ω, i) := 1/2*(sinh(b_i(ω, i)*x) + sin(b_i(ω, i)*x))
U(x, ω, i) := 1/2*(cosh(b_i(ω, i)*x) - cos(b_i(ω, i)*x))
V(x, ω, i) := 1/2*(sinh(b_i(ω, i)*x) - sin(b_i(ω, i)*x))
B_i(i, ω) :=
    if i == 1
        [1, 0*m, 0*1/N, 0*s^2/kg; 0*1/m, 1, 0*1/J, 0*1/N; 0*N, 0*J, 1, 0*m; M_1*ω^2, 0*N, 0*1/m, 1]
    else if i == 8
        [1, 0*m, 0*1/N, 0*s^2/kg; 0*1/m, 1, 0*1/J, 0*1/N; 0*N, 0*J, 1, 0*m; M_2*ω^2, 0*N, 0*1/m, 1]
    else
        [1, 0*m, 0*1/N, 0*s^2/kg; 0*1/m, 1, 0*1/J, 0*1/N; 0*N, 0*J, 1, 0*m; 0*kg/s^2, 0*N, 0*1/m, 1]
A_i(x, ω, i) := [
    S(x, ω, i), T(x, ω, i)/b_i(ω, i), U(x, ω, i)/(EJ_i(i)*b_i(ω, i)^2), V(x, ω, i)/(EJ_i(i)*b_i(ω, i)^3);
    V(x, ω, i)*b_i(ω, i), S(x, ω, i), T(x, ω, i)/(EJ_i(i)*b_i(ω, i)), U(x, ω, i)/(EJ_i(i)*b_i(ω, i)^2);
    U(x, ω, i)*EJ_i(i)*b_i(ω, i)^2, V(x, ω, i)*EJ_i(i)*b_i(ω, i), S(x, ω, i), T(x, ω, i)/b_i(ω, i);
    V(x, ω, i)*EJ_i(i)*b_i(ω, i)^3, U(x, ω, i)*EJ_i(i)*b_i(ω, i)^2, V(x, ω, i)*b_i(ω, i), S(x, ω, i)
]
P_L(ω) := product(B_i(i, ω)*A_i(l_i(i), ω, i), i = 9 .. 1)
P_L(1/s) = [
    1.05267, 18.764 m, 6.52403e-6 1/N, 3.95489e-5 s^2/kg;
    0.00925442 1/m, 1.05873, 6.68707e-7 1/J, 5.72698e-6 1/N;
    37344 N, 346145 J, 1.08218, 18.8567 m;
    2220.38 kg/s^2, 35196.5 N, 0.0109632 1/m, 1.05651
]
D(ω) := P_L(ω)[2, 0]*P_L(ω)[3, 1] - P_L(ω)[2, 1]*P_L(ω)[3, 0]
ω := 0 rad/s, 0.1*rad/s .. 50*rad/s
# [plot: D(ω) vs ω]
solve block
    # guess values
    ω := 15*rad/s
    # constraints
    D(ω) == 0
    # solver
    ω_1 := find(ω) = 15.7751 1/s
end solve block
solve block
    # guess values
    ω := 40*rad/s
    # constraints
    D(ω) == 0
    # solver
    ω_2 := find(ω) = 40.0402 1/s
end solve block
ω_10 := ω_1 = 15.7751 1/s
ω_20 := ω_2 = 40.0402 1/s
# Построение собственных форм колебаний
P(ω, x) :=
    if i(x) > 1
        A_i(x - sum(l_i(j), j = 1 .. i(x) - 1), ω, i(x))*product(B_i(j, ω)*A_i(l_i(j), ω, j), j = i(x) - 1 .. 1)
    else
        A_i(x, ω, 1)
u_0(ω) := [1; -P_L(ω)[2, 0]/P_L(ω)[2, 1]; 0*N; 0*kg/s^2]
u(x, ω) := P(ω, x)*u_0(ω)
# [plot: u(L, ω)[2] vs ω]
solve block
    # guess values
    ω := 15*rad/s
    # constraints
    u(L, ω)[2] == 0
    u(L, ω)[3] == 0
    # solver
    ω_1 := find(ω)
end solve block
solve block
    # guess values
    ω := 40*rad/s
    # constraints
    u(L, ω)[2] == 0
    u(L, ω)[3] == 0
    # solver
    ω_2 := find(ω)
end solve block
ω_1 = 15.7751 1/s  # disabled
ω_2 = 40.0402 1/s  # disabled
# [plot: u(L, ω)[3] vs ω]
u(L, ω_1) = [0.346362; 0.0873242 1/m; -7.45058e-9 N; -9.31323e-10 kg/s^2]
u(L, ω_2) = [-0.544148; -0.185887 1/m; 0 N; 0 kg/s^2]
f(x, ω) := u(x, ω)[0]
θ(x, ω) := u(x, ω)[1]
M(x, ω) := u(x, ω)[2]
Q(x, ω) := u(x, ω)[3]
x := 0, 0.1 m .. 21 m
# [plot: f(x, ω_1), f(x, ω_2) vs x]
# [plot: θ(x, ω_1), θ(x, ω_2) vs x]
# pic4
# [plot: M(x, ω_1), M(x, ω_2) vs x]
# pic5
# [plot: Q(x, ω_1) (N/m), Q(x, ω_2) (N/m) vs x]
# pic6
# Расчет приведенных масс
m_n(ω) := integral(m_i(i(x))*f(x, ω)^2, x = 0 .. L)
m_n(ω_1) = 805.8 kg
m_n(ω_2) = 1837.32 kg
# Расчет полностью заправленной ракеты
m_i(i) := {
    if i == 1
        24
    else if i == 2
        48
    else if i == 3
        36
    else if i == 4
        2800
    else if i == 5
        2800
    else if i == 6
        1600
    else if i == 7
        1600
    else if i == 8
        40
    else if i == 9
        40
}*kg/m
EJ_i(i) := {
    if i == 1
        22
    else if i == 2
        45
    else if i == 3
        34
    else if i == 4
        22
    else if i == 5
        22
    else if i == 6
        30
    else if i == 7
        30
    else if i == 8
        40
    else if i == 9
        40
}*MN*m^2
x(i) := {
    if i == 1
        1.5
    else if i == 2
        3.0
    else if i == 3
        4.0
    else if i == 4
        7.0
    else if i == 5
        10.0
    else if i == 6
        13.0
    else if i == 7
        15.0
    else if i == 8
        16.0
    else if i == 9
        18.5
}*m
i(x) :=
    x ← x/m
    if x < 1.5
        1
    else if x < 3.0
        2
    else if x < 4.0
        3
    else if x < 7.0
        4
    else if x < 10.0
        5
    else if x < 13.0
        6
    else if x < 15.0
        7
    else if x < 16.0
        8
    else if x ≤ 18.5
        9
b_i(ω, i) := nthroot(ω^2*m_i(i)/EJ_i(i), 4)
S(x, ω, i) := 1/2*(cosh(b_i(ω, i)*x) + cos(b_i(ω, i)*x))
T(x, ω, i) := 1/2*(sinh(b_i(ω, i)*x) + sin(b_i(ω, i)*x))
U(x, ω, i) := 1/2*(cosh(b_i(ω, i)*x) - cos(b_i(ω, i)*x))
V(x, ω, i) := 1/2*(sinh(b_i(ω, i)*x) - sin(b_i(ω, i)*x))
B_i(i, ω) :=
    if i == 1
        [1, 0*m, 0*1/N, 0*s^2/kg; 0*1/m, 1, 0*1/J, 0*1/N; 0*N, 0*J, 1, 0*m; M_1*ω^2, 0*N, 0*1/m, 1]
    else if i == 8
        [1, 0*m, 0*1/N, 0*s^2/kg; 0*1/m, 1, 0*1/J, 0*1/N; 0*N, 0*J, 1, 0*m; M_2*ω^2, 0*N, 0*1/m, 1]
    else
        [1, 0*m, 0*1/N, 0*s^2/kg; 0*1/m, 1, 0*1/J, 0*1/N; 0*N, 0*J, 1, 0*m; 0*kg/s^2, 0*N, 0*1/m, 1]
A_i(x, ω, i) := [
    S(x, ω, i), T(x, ω, i)/b_i(ω, i), U(x, ω, i)/(EJ_i(i)*b_i(ω, i)^2), V(x, ω, i)/(EJ_i(i)*b_i(ω, i)^3);
    V(x, ω, i)*b_i(ω, i), S(x, ω, i), T(x, ω, i)/(EJ_i(i)*b_i(ω, i)), U(x, ω, i)/(EJ_i(i)*b_i(ω, i)^2);
    U(x, ω, i)*EJ_i(i)*b_i(ω, i)^2, V(x, ω, i)*EJ_i(i)*b_i(ω, i), S(x, ω, i), T(x, ω, i)/b_i(ω, i);
    V(x, ω, i)*EJ_i(i)*b_i(ω, i)^3, U(x, ω, i)*EJ_i(i)*b_i(ω, i)^2, V(x, ω, i)*b_i(ω, i), S(x, ω, i)
]
P_L(ω) := product(B_i(i, ω)*A_i(l_i(i), ω, i), i = 9 .. 1)
P_L(1/s) = [
    1.09728, 19.1236 m, 6.57375e-6 1/N, 3.96783e-5 s^2/kg;
    0.0164122 1/m, 1.1296, 6.79991e-7 1/J, 5.7609e-6 1/N;
    59554.4 N, 682607 J, 1.14827, 19.0942 m;
    2516.9 kg/s^2, 56501.8 N, 0.0164817 1/m, 1.08033
]
D(ω) := P_L(ω)[2, 0]*P_L(ω)[3, 1] - P_L(ω)[2, 1]*P_L(ω)[3, 0]
ω := 0 rad/s, 0.1*rad/s .. 15*rad/s
# [plot: D(ω) vs ω]
# pic7
solve block
    # guess values
    ω := 10*rad/s
    # constraints
    D(ω) == 0
    # solver
    ω_1 := find(ω) = 12.1899 1/s
end solve block
solve block
    # guess values
    ω := 30*rad/s
    # constraints
    D(ω) == 0
    # solver
    ω_2 := find(ω) = 29.9542 1/s
end solve block
# Построение собственных форм колебаний
P(ω, x) :=
    if i(x) > 1
        A_i(x - sum(l_i(j), j = 1 .. i(x) - 1), ω, i(x))*product(B_i(j, ω)*A_i(l_i(j), ω, j), j = i(x) - 1 .. 1)
    else
        A_i(x, ω, 1)
u_0(ω) := [1; -P_L(ω)[2, 0]/P_L(ω)[2, 1]; 0*N; 0*kg/s^2]
u(x, ω) := P(ω, x)*u_0(ω)
# [plot: u(L, ω)[2] vs ω]
solve block
    # guess values
    ω := 10*rad/s
    # constraints
    u(L, ω)[2] == 0
    u(L, ω)[3] == 0
    # solver
    ω_1 := find(ω)
end solve block
solve block
    # guess values
    ω := 30*rad/s
    # constraints
    u(L, ω)[2] == 0
    u(L, ω)[3] == 0
    # solver
    ω_2 := find(ω)
end solve block
ω_1 = 12.1899 1/s  # disabled
ω_2 = 29.9542 1/s  # disabled
# [plot: u(L, ω)[3] vs ω]
u(L, ω_1) = [0.544837; 0.0823776 1/m; 7.45058e-9 N; 0 kg/s^2]
u(L, ω_2) = [-0.306432; -0.0915246 1/m; -4.76837e-7 N; 0 kg/s^2]
f(x, ω) := u(x, ω)[0]
θ(x, ω) := u(x, ω)[1]
M(x, ω) := u(x, ω)[2]
Q(x, ω) := u(x, ω)[3]
x := 0, 0.1 m .. 21 m
# [plot: f(x, ω_1), f(x, ω_2) vs x]
# pic8
# [plot: θ(x, ω_1), θ(x, ω_2) vs x]
# pic9
# [plot: M(x, ω_1), M(x, ω_2) vs x]
# pic10
# [plot: Q(x, ω_1) (N/m), Q(x, ω_2) (N/m) vs x]
# pic11
# Расчет приведенных масс
m_n(ω) := integral(m_i(i(x))*f(x, ω)^2, x = 0 .. L)
m_n(ω_1) = 521.28 kg
m_n(ω_2) = 588.782 kg
# Расчет сухой ракеты
m_i(i) := {
    if i == 1
        24
    else if i == 2
        48
    else if i == 3
        36
    else if i == 4
        20
    else if i == 5
        20
    else if i == 6
        25
    else if i == 7
        25
    else if i == 8
        40
    else if i == 9
        40
}*kg/m
EJ_i(i) := {
    if i == 1
        22
    else if i == 2
        45
    else if i == 3
        34
    else if i == 4
        22
    else if i == 5
        22
    else if i == 6
        30
    else if i == 7
        30
    else if i == 8
        40
    else if i == 9
        40
}*MN*m^2
x(i) := {
    if i == 1
        1.5
    else if i == 2
        3.0
    else if i == 3
        4.0
    else if i == 4
        7.0
    else if i == 5
        10.0
    else if i == 6
        13.0
    else if i == 7
        15.0
    else if i == 8
        16.0
    else if i == 9
        18.5
}*m
i(x) :=
    x ← x/m
    if x < 1.5
        1
    else if x < 3.0
        2
    else if x < 4.0
        3
    else if x < 7.0
        4
    else if x < 10.0
        5
    else if x < 13.0
        6
    else if x < 15.0
        7
    else if x < 16.0
        8
    else if x ≤ 18.5
        9
b_i(ω, i) := nthroot(ω^2*m_i(i)/EJ_i(i), 4)
S(x, ω, i) := 1/2*(cosh(b_i(ω, i)*x) + cos(b_i(ω, i)*x))
T(x, ω, i) := 1/2*(sinh(b_i(ω, i)*x) + sin(b_i(ω, i)*x))
U(x, ω, i) := 1/2*(cosh(b_i(ω, i)*x) - cos(b_i(ω, i)*x))
V(x, ω, i) := 1/2*(sinh(b_i(ω, i)*x) - sin(b_i(ω, i)*x))
B_i(i, ω) :=
    if i == 1
        [1, 0*m, 0*1/N, 0*s^2/kg; 0*1/m, 1, 0*1/J, 0*1/N; 0*N, 0*J, 1, 0*m; M_1*ω^2, 0*N, 0*1/m, 1]
    else if i == 8
        [1, 0*m, 0*1/N, 0*s^2/kg; 0*1/m, 1, 0*1/J, 0*1/N; 0*N, 0*J, 1, 0*m; M_2*ω^2, 0*N, 0*1/m, 1]
    else
        [1, 0*m, 0*1/N, 0*s^2/kg; 0*1/m, 1, 0*1/J, 0*1/N; 0*N, 0*J, 1, 0*m; 0*kg/s^2, 0*N, 0*1/m, 1]
A_i(x, ω, i) := [
    S(x, ω, i), T(x, ω, i)/b_i(ω, i), U(x, ω, i)/(EJ_i(i)*b_i(ω, i)^2), V(x, ω, i)/(EJ_i(i)*b_i(ω, i)^3);
    V(x, ω, i)*b_i(ω, i), S(x, ω, i), T(x, ω, i)/(EJ_i(i)*b_i(ω, i)), U(x, ω, i)/(EJ_i(i)*b_i(ω, i)^2);
    U(x, ω, i)*EJ_i(i)*b_i(ω, i)^2, V(x, ω, i)*EJ_i(i)*b_i(ω, i), S(x, ω, i), T(x, ω, i)/b_i(ω, i);
    V(x, ω, i)*EJ_i(i)*b_i(ω, i)^3, U(x, ω, i)*EJ_i(i)*b_i(ω, i)^2, V(x, ω, i)*b_i(ω, i), S(x, ω, i)
]
P_L(ω) := product(B_i(i, ω)*A_i(l_i(i), ω, i), i = 9 .. 1)
P_L(1/s) = [
    1.03169, 18.5549 m, 6.48543e-6 1/N, 3.9419e-5 s^2/kg;
    0.004986 1/m, 1.00999, 6.58702e-7 1/J, 5.6902e-6 1/N;
    20149.1 N, 75500.6 J, 1.01545, 18.5774 m;
    2022.2 kg/s^2, 18127.2 N, 0.00518479 1/m, 1.02794
]
D(ω) := P_L(ω)[2, 0]*P_L(ω)[3, 1] - P_L(ω)[2, 1]*P_L(ω)[3, 0]
ω := 0 rad/s, 1*rad/s .. 300*rad/s
# [plot: D(ω) vs ω]
# pic12
solve block
    # guess values
    ω := 90*rad/s
    # constraints
    D(ω) == 0
    # solver
    ω_1 := find(ω) = 89.8252 1/s
end solve block
solve block
    # guess values
    ω := 180*rad/s
    # constraints
    D(ω) == 0
    # solver
    ω_2 := find(ω) = 188.311 1/s
end solve block
# Построение собственных форм колебаний
P(ω, x) :=
    if i(x) > 1
        A_i(x - sum(l_i(j), j = 1 .. i(x) - 1), ω, i(x))*product(B_i(j, ω)*A_i(l_i(j), ω, j), j = i(x) - 1 .. 1)
    else
        A_i(x, ω, 1)
u_0(ω) := [1; -P_L(ω)[2, 0]/P_L(ω)[2, 1]; 0*N; 0*kg/s^2]
u(x, ω) := P(ω, x)*u_0(ω)
# [plot: u(L, ω)[2] vs ω]
solve block
    # guess values
    ω := 90*rad/s
    # constraints
    u(L, ω)[2] == 0
    u(L, ω)[3] == 0
    # solver
    ω_1 := find(ω)
end solve block
solve block
    # guess values
    ω := 180*rad/s
    # constraints
    u(L, ω)[2] == 0
    u(L, ω)[3] == 0
    # solver
    ω_2 := find(ω)
end solve block
ω_1 = 89.8252 1/s  # disabled
ω_2 = 188.311 1/s  # disabled
# [plot: u(L, ω)[3] vs ω]
u(L, ω_1) = [0.942848; 0.422173 1/m; -9.53674e-7 N; -4.76837e-7 kg/s^2]
u(L, ω_2) = [-0.352687; -0.148004 1/m; 9.15527e-5 N; 1.52588e-5 kg/s^2]
f(x, ω) := u(x, ω)[0]
θ(x, ω) := u(x, ω)[1]
M(x, ω) := u(x, ω)[2]
Q(x, ω) := u(x, ω)[3]
x := 0, 0.1 m .. 21 m
# [plot: f(x, ω_1), f(x, ω_2) vs x]
# pic13
# [plot: θ(x, ω_1), θ(x, ω_2) vs x]
# pic14
# [plot: M(x, ω_1), M(x, ω_2) vs x]
# pic15
# [plot: Q(x, ω_1) (N/m), Q(x, ω_2) (N/m) vs x]
# pic16
# Расчет приведенных масс
m_n(ω) := integral(m_i(i(x))*f(x, ω)^2, x = 0 .. L)
m_n(ω_1) = 856.22 kg
m_n(ω_2) = 275.841 kg
m_i(i) := {
    if i == 1
        24
    else if i == 2
        48
    else if i == 3
        36
    else if i == 4
        20
    else if i == 5
        2800
    else if i == 6
        25
    else if i == 7
        1600
    else if i == 8
        40
    else if i == 9
        40
}*kg/m
EJ_i(i) := {
    if i == 1
        22
    else if i == 2
        45
    else if i == 3
        34
    else if i == 4
        22
    else if i == 5
        22
    else if i == 6
        30
    else if i == 7
        30
    else if i == 8
        40
    else if i == 9
        40
}*MN*m^2
x(i) := {
    if i == 1
        1.5
    else if i == 2
        3.0
    else if i == 3
        4.0
    else if i == 4
        7.0
    else if i == 5
        10.0
    else if i == 6
        13.0
    else if i == 7
        15.0
    else if i == 8
        16.0
    else if i == 9
        18.5
}*m
i(x) :=
    x ← x/m
    if x < 1.5
        1
    else if x < 3.0
        2
    else if x < 4.0
        3
    else if x < 7.0
        4
    else if x < 10.0
        5
    else if x < 13.0
        6
    else if x < 15.0
        7
    else if x < 16.0
        8
    else if x ≤ 18.5
        9
J_0 := 3000 tonne*m^2
M_1 := 1 tonne
M_2 := 1 tonne
x_ГП := 3.5 m
l_i(i) :=
    if i == 1
        x(i)
    else
        x(i) - x(i - 1)
L := 18.5 m
b_i(ω, i) := nthroot(ω^2*m_i(i)/EJ_i(i), 4)
S(x, ω, i) := 1/2*(cosh(b_i(ω, i)*x) + cos(b_i(ω, i)*x))
T(x, ω, i) := 1/2*(sinh(b_i(ω, i)*x) + sin(b_i(ω, i)*x))
U(x, ω, i) := 1/2*(cosh(b_i(ω, i)*x) - cos(b_i(ω, i)*x))
V(x, ω, i) := 1/2*(sinh(b_i(ω, i)*x) - sin(b_i(ω, i)*x))
B_i(i, ω) :=
    if i == 1
        [1, 0*m, 0*1/N, 0*s^2/kg; 0*1/m, 1, 0*1/J, 0*1/N; 0*N, 0*J, 1, 0*m; M_1*ω^2, 0*N, 0*1/m, 1]
    else if i == 8
        [1, 0*m, 0*1/N, 0*s^2/kg; 0*1/m, 1, 0*1/J, 0*1/N; 0*N, 0*J, 1, 0*m; M_2*ω^2, 0*N, 0*1/m, 1]
    else
        [1, 0*m, 0*1/N, 0*s^2/kg; 0*1/m, 1, 0*1/J, 0*1/N; 0*N, 0*J, 1, 0*m; 0*kg/s^2, 0*N, 0*1/m, 1]
A_i(x, ω, i) := [
    S(x, ω, i), T(x, ω, i)/b_i(ω, i), U(x, ω, i)/(EJ_i(i)*b_i(ω, i)^2), V(x, ω, i)/(EJ_i(i)*b_i(ω, i)^3);
    V(x, ω, i)*b_i(ω, i), S(x, ω, i), T(x, ω, i)/(EJ_i(i)*b_i(ω, i)), U(x, ω, i)/(EJ_i(i)*b_i(ω, i)^2);
    U(x, ω, i)*EJ_i(i)*b_i(ω, i)^2, V(x, ω, i)*EJ_i(i)*b_i(ω, i), S(x, ω, i), T(x, ω, i)/b_i(ω, i);
    V(x, ω, i)*EJ_i(i)*b_i(ω, i)^3, U(x, ω, i)*EJ_i(i)*b_i(ω, i)^2, V(x, ω, i)*b_i(ω, i), S(x, ω, i)
]
P_L(ω) := product(B_i(i, ω)*A_i(l_i(i), ω, i), i = 9 .. 1)
P_L(1/s) = [
    1.05267, 18.764 m, 6.52403e-6 1/N, 3.95489e-5 s^2/kg;
    0.00925442 1/m, 1.05873, 6.68707e-7 1/J, 5.72698e-6 1/N;
    37344 N, 346145 J, 1.08218, 18.8567 m;
    2220.38 kg/s^2, 35196.5 N, 0.0109632 1/m, 1.05651
]
D(ω) := P_L(ω)[2, 0]*P_L(ω)[3, 1] - P_L(ω)[2, 1]*P_L(ω)[3, 0]
ω := 0 rad/s, 0.1*rad/s .. 50*rad/s
# [plot: D(ω) vs ω]
solve block
    # guess values
    ω := 15*rad/s
    # constraints
    D(ω) == 0
    # solver
    ω_1 := find(ω) = 15.7751 1/s
end solve block
solve block
    # guess values
    ω := 40*rad/s
    # constraints
    D(ω) == 0
    # solver
    ω_2 := find(ω) = 40.0402 1/s
end solve block
# Построение собственных форм колебаний
P(ω, x) :=
    if i(x) > 1
        A_i(x - sum(l_i(j), j = 1 .. i(x) - 1), ω, i(x))*product(B_i(j, ω)*A_i(l_i(j), ω, j), j = i(x) - 1 .. 1)
    else
        A_i(x, ω, 1)
u_0(ω) := [1; -P_L(ω)[2, 0]/P_L(ω)[2, 1]; 0*N; 0*kg/s^2]
u(x, ω) := P(ω, x)*u_0(ω)
# [plot: u(L, ω)[2] vs ω]
solve block
    # guess values
    ω := 15*rad/s
    # constraints
    u(L, ω)[2] == 0
    u(L, ω)[3] == 0
    # solver
    ω_1 := find(ω)
end solve block
solve block
    # guess values
    ω := 40*rad/s
    # constraints
    u(L, ω)[2] == 0
    u(L, ω)[3] == 0
    # solver
    ω_2 := find(ω)
end solve block
ω_1 = 15.7751 1/s  # disabled
ω_2 = 40.0402 1/s  # disabled
# [plot: u(L, ω)[3] vs ω]
u(L, ω_1) = [0.346362; 0.0873242 1/m; -7.45058e-9 N; -9.31323e-10 kg/s^2]
u(L, ω_2) = [-0.544148; -0.185887 1/m; 0 N; 0 kg/s^2]
f(x, ω) := u(x, ω)[0]
θ(x, ω) := u(x, ω)[1]
M(x, ω) := u(x, ω)[2]
Q(x, ω) := u(x, ω)[3]
x := 0, 0.1 m .. 21 m
# [plot: f(x, ω_1), f(x, ω_2) vs x]
# [plot: θ(x, ω_1), θ(x, ω_2) vs x]
# pic4
# [plot: M(x, ω_1), M(x, ω_2) vs x]
# pic5
# [plot: Q(x, ω_1) (N/m), Q(x, ω_2) (N/m) vs x]
# pic6
# Расчет приведенных масс
m_n(ω) := integral(m_i(i(x))*f(x, ω)^2, x = 0 .. L)
m_n(ω_1) = 805.8 kg
m_n(ω_2) = 1837.32 kg
x_ГП := 3.5 m
x_Р := L = 18.5 m
# Для первого тона колебаний
f(x_Р, ω_1) = 0.346362
f'(x, ω) := d^1/dx^1(f(x, ω))
f'(x_ГП, ω_1) = -0.191865 1/m
f(x_Р, ω_1)*f'(x_ГП, ω_1) = -0.0664548 1/m
# Для второго тона колебаний
f(x_Р, ω_2) = -0.544148
f'(x_ГП, ω_2) = -0.313869 1/m
f(x_Р, ω_2)*f'(x_ГП, ω_2) = 0.170791 1/m
# Для первого тона <0, а должно быть <0.
# Для второго тона >0, а должно быть >0.
ω_1 = 15.7751 1/s
ω_0 := 10*1/s
ω_2 = 40.0402 1/s
ω_π := 60*1/s
ω_2π := 100*1/s
ω_0 = 10 1/s
ω_1 = 15.7751 1/s
ω_π = 60 1/s
ω_π = 60 1/s
ω_2 = 40.0402 1/s
ω_2π = 100 1/s
# Двойные неравенства не выполняются, следовательно, ракета не устойчива.
m_i(i) := {
    if i == 1
        24
    else if i == 2
        48
    else if i == 3
        36
    else if i == 4
        20
    else if i == 5
        2800
    else if i == 6
        25
    else if i == 7
        1600
    else if i == 8
        40
    else if i == 9
        40
}*kg/m
EJ_i(i) := {
    if i == 1
        22
    else if i == 2
        45
    else if i == 3
        34
    else if i == 4
        22
    else if i == 5
        22
    else if i == 6
        30
    else if i == 7
        30
    else if i == 8
        40
    else if i == 9
        40
}*MN*m^2
x(i, ss) := {
    if i == 1
        1.5
    else if i == 2
        3.0
    else if i == 3
        4.0
    else if i == 4
        4.0 + (10.0 - 4.0)*(1 - ss)
    else if i == 5
        10.0
    else if i == 6
        10.0 + (15.0 - 10.0)*(1 - ss)
    else if i == 7
        15.0
    else if i == 8
        16.0
    else if i == 9
        18.5
}*m
i(x) :=
    x ← x/m
    if x < 1.5
        1
    else if x < 3.0
        2
    else if x < 4.0
        3
    else if x < 7.0
        4
    else if x < 10.0
        5
    else if x < 13.0
        6
    else if x < 15.0
        7
    else if x < 16.0
        8
    else if x ≤ 18.5
        9
i := 5
J_0 := 3000 tonne*m^2
M_1 := 1 tonne
M_2 := 1 tonne
x_ГП := 3.5 m
l_i(i, ss) :=
    if i == 1
        x(i, ss)
    else
        x(i, ss) - x(i - 1, ss)
L := 18.5 m
b_i(ω, i) := nthroot(ω^2*m_i(i)/EJ_i(i), 4)
S(x, ω, i) := 1/2*(cosh(b_i(ω, i)*x) + cos(b_i(ω, i)*x))
T(x, ω, i) := 1/2*(sinh(b_i(ω, i)*x) + sin(b_i(ω, i)*x))
U(x, ω, i) := 1/2*(cosh(b_i(ω, i)*x) - cos(b_i(ω, i)*x))
V(x, ω, i) := 1/2*(sinh(b_i(ω, i)*x) - sin(b_i(ω, i)*x))
B_i(i, ω) :=
    if i == 1
        [1, 0*m, 0*1/N, 0*s^2/kg; 0*1/m, 1, 0*1/J, 0*1/N; 0*N, 0*J, 1, 0*m; M_1*ω^2, 0*N, 0*1/m, 1]
    else if i == 8
        [1, 0*m, 0*1/N, 0*s^2/kg; 0*1/m, 1, 0*1/J, 0*1/N; 0*N, 0*J, 1, 0*m; M_2*ω^2, 0*N, 0*1/m, 1]
    else
        [1, 0*m, 0*1/N, 0*s^2/kg; 0*1/m, 1, 0*1/J, 0*1/N; 0*N, 0*J, 1, 0*m; 0*kg/s^2, 0*N, 0*1/m, 1]
A_i(x, ω, i, ss) := [
    S(x, ω, i), T(x, ω, i)/b_i(ω, i), U(x, ω, i)/(EJ_i(i)*b_i(ω, i)^2), V(x, ω, i)/(EJ_i(i)*b_i(ω, i)^3);
    V(x, ω, i)*b_i(ω, i), S(x, ω, i), T(x, ω, i)/(EJ_i(i)*b_i(ω, i)), U(x, ω, i)/(EJ_i(i)*b_i(ω, i)^2);
    U(x, ω, i)*EJ_i(i)*b_i(ω, i)^2, V(x, ω, i)*EJ_i(i)*b_i(ω, i), S(x, ω, i), T(x, ω, i)/b_i(ω, i);
    V(x, ω, i)*EJ_i(i)*b_i(ω, i)^3, U(x, ω, i)*EJ_i(i)*b_i(ω, i)^2, V(x, ω, i)*b_i(ω, i), S(x, ω, i)
]
P_L(ω, ss) := product(B_i(i, ω)*A_i(l_i(i, ss), ω, i, ss), i = 9 .. 1)
D(ω, ss) := P_L(ω, ss)[2, 0]*P_L(ω, ss)[3, 1] - P_L(ω, ss)[2, 1]*P_L(ω, ss)[3, 0]
ss := 0/100
ω := 0 rad/s, 0.1*rad/s .. 200*rad/s
# [plot: D(ω, ss) vs ω]
solve block
    # guess values
    ω := 62*rad/s
    # constraints
    D(ω, ss) == 0
    # solver
    ω_1 := find(ω) = 60.2942 1/s
end solve block
solve block
    # guess values
    ω := 177*rad/s
    # constraints
    D(ω, ss) == 0
    # solver
    ω_2 := find(ω) = 177.559 1/s
end solve block
ω_1 := 60.294*1/s
ω_2 := 177.559*1/s
f(x_Р, ω_1) = -0.362871
f'(x_ГП, ω_1) = -0.3728 1/m
f(x_Р, ω_1)*f'(x_ГП, ω_1) = 0.135278 1/m
f(x_Р, ω_2) = -1.05027
f'(x_ГП, ω_2) = -0.419574 1/m
f(x_Р, ω_2)*f'(x_ГП, ω_2) = 0.440666 1/m
SS := [100; 90; 80; 70; 60; 50; 40; 30; 20; 10; 0]
W1 := [10.569; 11.293; 12.054; 12.85; 13.74; 14.957; 17.133; 21.817; 32.882; 54.387; 60.294]*1/s
W2 := [32.488; 32.591; 32.514; 32.971; 34.556; 37.797; 43.291; 51.938; 66.544; 112.516; 177.559]*1/s
P1 := [0.016; 0.004; -0.009; -0.023; -0.037; -0.056; -0.038; -0.1; 0.044; 0.217; 0.135]
P2 := [0.036; 0.038; 0.037; 0.045; 0.076; 0.135; 0.212; 0.234; 0.005; -0.514; 0.441]
i := 0, 1 .. 10
SS'[i] := SS[10 - i]
W1'[i] := W1[10 - i]
W2'[i] := W2[10 - i]
P1'[i] := P1[10 - i]
P2'[i] := P2[10 - i]
SS' = [0; 10; 20; 30; 40; 50; 60; 70; 80; 90; 100]
W1' = [60.294; 54.387; 32.882; 21.817; 17.133; 14.957; 13.74; 12.85; 12.054; 11.293; 10.569] 1/s
W2' = [177.559; 112.516; 66.544; 51.938; 43.291; 37.797; 34.556; 32.971; 32.514; 32.591; 32.488] 1/s
P1' = [0.135; 0.217; 0.044; -0.1; -0.038; -0.056; -0.037; -0.023; -0.009; 0.004; 0.016]
P2' = [0.441; -0.514; 0.005; 0.234; 0.212; 0.135; 0.076; 0.045; 0.037; 0.038; 0.036]
WT1 := lspline(SS', W1')
WT2 := lspline(SS', W2')
PT1 := lspline(SS', P1')
PT2 := lspline(SS', P2')
W1'(v) := interp(WT1, SS', W1', v)
W2'(v) := interp(WT2, SS', W2', v)
P1'(v) := interp(PT1, SS', P1', v)
P2'(v) := interp(PT2, SS', P2', v)
ss := 0, 1 .. 100
# [plot: W1'(ss), W2'(ss) vs ss]
# [plot: W1'(ss), W2'(ss) vs ss]
solve block
    # guess values
    ss := 12.174
    # constraints
    W2'(ss) == 100*1/s
    # solver
    ss_12 := find(ss) = 12.197
end solve block
solve block
    # guess values
    ss := 22
    # constraints
    W2'(ss) == 60*1/s
    # solver
    ss_22 := find(ss) = 22.8457
end solve block
x(4, ss_12/100) = 9.26818 m
x(4, ss_22/100) = 8.62926 m
x(6, ss_12/100) = 14.3901 m
x(6, ss_22/100) = 13.8577 m
# [plot: P1'(ss), P2'(ss) vs ss]
# [plot: P1'(ss), P2'(ss) vs ss]
solve block
    # guess values
    ss := 20
    # constraints
    P1'(ss) == 0
    # solver
    ss_01 := find(ss) = 22.0611
end solve block
f(x_Р, ω_1)
f'(x_ГП, ω_1)
φ_1(x_ГП, ω_1) := f(x_Р, ω_1)*f'(x_ГП, ω_1)
f(x_Р, ω_2)
f'(x_ГП, ω_2)
φ_2(x_ГП, ω_2) := f(x_Р, ω_2)*f'(x_ГП, ω_2)
Φ_1(x_ГП) :=
    for i ∈ 0, 1 .. 20
        e ← i/20*100
        vec[i] ← φ_1(x_ГП, W1'(e))*m
    return vec  # disabled
Φ_2(x_ГП, ss) :=
    for i ∈ 0, 1 .. 20
        e ← i/20*100
        vec[i] ← φ_2(x_ГП, W1'(e))*m
    return vec  # disabled
solve block
    # guess values
    x_ГП := 11 m
    # constraints
    Φ_1(x_ГП) > 0
    # solver
    x_ГП1 := find(x_ГП)  # error: Значение должно быть целым числом.
end solve block
solve block
    # guess values
    x_ГП := 11*m
    ss := ss_01
    # constraints
    Φ_2(x_ГП, ss) > 0*1/m
    # solver
    x_ГП2 := find(x_ГП)
end solve block
solve block
    # guess values
    x_ГП := 11 m
    x_0 := 0*m
    ss := ss_01
    # constraints
    φ_1(x_ГП, W1'(ss)) > 0*1/m
    # solver
    x_ГП1 := find(x_ГП) = 11 m
    x_ГП ≥ x_0  # disabled
    x_ГП ≤ x(3, ss/100)  # disabled
end solve block
# [plot: φ_1(x_ГП1, W1'(ss)) vs ss]
x_ГП1 := 12 m
ss := 0, 1 .. 100
# [plot: φ_1(x_ГП1, W1'(ss)) vs ss]
solve block
    # guess values
    x_ГП := 11 m
    x_0 := 0*m
    ss := ss_01
    # constraints
    φ_2(x_ГП, W2'(ss)) > 0*1/m
    # solver
    x_ГП2 := find(x_ГП) = 11 m
    x_ГП ≥ x_0  # disabled
    x_ГП ≤ x(3, ss/100)  # disabled
end solve block
x_ГП2 := 12 m
ss := 0, 1 .. 100
# [plot: φ_2(x_ГП2, W2'(ss)) vs ss]
# [plot: φ_1(x_ГП1, W1'(ss)), φ_2(x_ГП2, W2'(ss)) vs ss]
k_p := 0.5
m_i(i)
ss := 1
M_0 := sum(m_i(j)*l_i(j, ss), j = 1 .. 9) = 25.084 tonne
g_0 := g = 9.80665 m/s^2
R_z := k_p*M_0*g_0 = 122995 N
ε := 0.001
U_n(ω, ω_n) := R_z*f(x_Р, ω_n)*f'(x_ГП, ω_n)*(ω*ω_n^2)/(m_n(ω_n)*((ω_n^2 - ω^2)^2 + ω^2*(2*ε)^2))  # disabled
U_n(ω, ff', ω_n) := R_z*ff'*(ω^2*2*ε)/(m_n(ω_n)*((ω_n^2 - ω^2)^2 + (2*ε*ω^2)^2))
V_n(ω, ω_n) := -R_z*f(x_Р, ω_n)*f'(x_ГП, ω_n)*(ω_n^2 - ω^2)/(m_n(ω_n)*((ω_n^2 - ω^2)^2 + ω^2*(2*ε)^2))  # disabled
V_n(ω, ff', ω_n) := -R_z*ff'*(ω_n^2 - ω^2)/(m_n(ω_n)*((ω_n^2 - ω^2)^2 + (2*ε*ω^2)^2))
A_n(ω, ω_n) := sqrt(U_n(ω, ω_n)^2 + V_n(ω, ω_n)^2)  # disabled
A_n(ω, ff', ω_n) := sqrt(U_n(ω, ff', ω_n)^2 + V_n(ω, ff', ω_n)^2)
A_AC(ω) := 0.5*exp(0.01*(ω_0 - ω)*s/rad)
FA(ω, ff', ω_n) := A_n(ω, ff', ω_n)*A_AC(ω)
A_n(ω, ff', ω_n)*A_AC(ω) == 1 solve, ff' →  # error: Невозможно вычислить условное выражение.
A_AC(ω_1) = 0.302375
U_n(ω_1, 0.1*1/m, ω_1) = 0.853286
V_n(ω_1, 0.1*1/m, ω_1) = 0
A_n(ω_1, 0.1*1/m, ω_1) = 0.853286
solve block
    # guess values
    ff' := 0*1/m
    # constraints
    FA(ω, ff', ω_1) == 1
    # solver
    ff'(ω, ω_1) := find(ff')
end solve block
ω_1 := ω_10 = 15.7751 1/s
ω_2 := ω_20 = 40.0402 1/s
m_n(ω_1) = 805.8 kg
m_n1 := m_n(ω_1)
m_n(ω_2) = 1837.32 kg
m_n2 := m_n(ω_2)
ff'_1(ω) := 1/(0.5*exp(0.01*(ω_0 - ω)*s/rad)*sqrt((R_z*(ω^2*2*ε)/(m_n1*((ω_1^2 - ω^2)^2 + (2*ε*ω^2)^2)))^2 + (-R_z*(ω_1^2 - ω^2)/(m_n1*((ω_1^2 - ω^2)^2 + (2*ε*ω^2)^2)))^2))
ff'_2(ω) := -1/(0.5*exp(0.01*(ω_0 - ω)*s/rad)*sqrt((R_z*(ω^2*2*ε)/(m_n2*((ω_2^2 - ω^2)^2 + (2*ε*ω^2)^2)))^2 + (-R_z*(ω_2^2 - ω^2)/(m_n2*((ω_2^2 - ω^2)^2 + (2*ε*ω^2)^2)))^2))
ω := 0*rad/s, 1*rad/s .. 120*rad/s
# [plot: ff'_1(ω), ff'_2(ω) vs ω]
