mN := N*10^-3
MN = 1000000 N
m_i(i) := {
    if i == 1
        30
    else if i == 2
        60
    else if i == 3
        40
    else if i == 4
        30
    else if i == 5
        3500
    else if i == 6
        50
    else if i == 7
        35
    else if i == 8
        2500
    else if i == 9
        50
}*kg/m
EJ_i(i) := {
    if i == 1
        40
    else if i == 2
        90
    else if i == 3
        60
    else if i == 4
        44
    else if i == 5
        44
    else if i == 6
        60
    else if i == 7
        55
    else if i == 8
        55
    else if i == 9
        60
}*MN*m^2
x(i) := {
    if i == 1
        1.7
    else if i == 2
        3.5
    else if i == 3
        4
    else if i == 4
        7
    else if i == 5
        10
    else if i == 6
        11
    else if i == 7
        15
    else if i == 8
        19
    else if i == 9
        21
}*m
i(x) :=
    x ← x/m
    if x < 1.7
        1
    else if x < 3.5
        2
    else if x < 4
        3
    else if x < 7
        4
    else if x < 10
        5
    else if x < 11
        6
    else if x < 15
        7
    else if x < 19
        8
    else if x ≤ 21
        9
J_0 := 3 tonne*m^2
M_1 := 2 tonne
M_2 := 2 tonne
l_i(i) :=
    if i == 1
        x(i)
    else
        x(i) - x(i - 1)
L := 21 m
b_i(ω, i) := nthroot(ω^2*m_i(i)/EJ_i(i), 4)
S(x, ω, i) := 1/2*(cosh(b_i(ω, i)*x) + cos(b_i(ω, i)*x))
T(x, ω, i) := 1/2*(sinh(b_i(ω, i)*x) + sin(b_i(ω, i)*x))
U(x, ω, i) := 1/2*(cosh(b_i(ω, i)*x) - cos(b_i(ω, i)*x))
V(x, ω, i) := 1/2*(sinh(b_i(ω, i)*x) - sin(b_i(ω, i)*x))
A_i(x, ω, i) := [
    S(x, ω, i), T(x, ω, i)/b_i(ω, i), U(x, ω, i)/(EJ_i(i)*b_i(ω, i)^2), V(x, ω, i)/(EJ_i(i)*b_i(ω, i)^3);
    V(x, ω, i)*b_i(ω, i), S(x, ω, i), T(x, ω, i)/(EJ_i(i)*b_i(ω, i)), U(x, ω, i)/(EJ_i(i)*b_i(ω, i)^2);
    U(x, ω, i)*EJ_i(i)*b_i(ω, i)^2, V(x, ω, i)*EJ_i(i)*b_i(ω, i), S(x, ω, i), T(x, ω, i)/b_i(ω, i);
    T(x, ω, i)*EJ_i(i)*b_i(ω, i)^3, U(x, ω, i)*EJ_i(i)*b_i(ω, i)^2, V(x, ω, i)*b_i(ω, i), S(x, ω, i)
]
B_i(i, ω) :=
    if i == 1
        [1, 0*m, 0*1/N, 0*s^2/kg; 0*1/m, 1, 0*1/J, 0*1/N; 0*N, 0*J, 1, 0*m; M_1*ω^2, 0*N, 0*1/m, 1]
    else if i == 8
        [1, 0*m, 0*1/N, 0*s^2/kg; 0*1/m, 1, 0*1/J, 0*1/N; 0*N, -J_0*ω^2, 1, 0*m; M_2*ω^2, 0*N, 0*1/m, 1]
    else
        [1, 0*m, 0*1/N, 0*s^2/kg; 0*1/m, 1, 0*1/J, 0*1/N; 0*N, 0*J, 1, 0*m; 0*kg/s^2, 0*N, 0*1/m, 1]
P_L(ω) := product(B_i(i, ω)*A_i(l_i(i), ω, i), i = 9 .. 1)
P_L(1/s) = [
    1.11776, 21.6622 m, 4.41091e-6 1/N, 3.0128e-5 s^2/kg;
    0.0241214 1/m, 1.16421, 4.17662e-7 1/J, 4.15028e-6 1/N;
    222724 N, 1959903 J, 1.2235, 21.9807 m;
    25735.1 kg/s^2, 309063 N, 0.044736 1/m, 1.23567
]
D(ω) := P_L(ω)[2, 0]*P_L(ω)[3, 1] - P_L(ω)[2, 1]*P_L(ω)[3, 0]
ω := 0 rad/s, 0.1*rad/s .. 50*rad/s
# [chart]
    X[1] := ω
    Y[1] := D(ω)
solve block
    # guess values
    ω := 5*rad/s
    # constraints
    D(ω) == 0
    # solver
    ω_1 := find(ω) = 1.63309e-82 1/s
end solve block
solve block
    # guess values
    ω := 20*rad/s
    # constraints
    D(ω) == 0
    # solver
    ω_2 := find(ω) = 12.1097 1/s
end solve block
# Построение собственных форм колебаний
P(ω, x) :=
    if i(x) > 1
        A_i(x - sum(l_i(j), j = 1 .. i(x) - 1), ω, i(x))*product(B_i(j, ω)*A_i(l_i(j), ω, j), j = i(x) - 1 .. 1)
    else
        A_i(x, ω, 1)
u_0(ω) := [1; -P_L(ω)[2, 0]/P_L(ω)[2, 1]; 0*N; 0*kg/s^2]
u(x, ω) := P(ω, x)*u_0(ω)
# [plot: u(L, ω)[2] vs ω]
solve block
    # guess values
    ω := 10*rad/s
    # constraints
    u(L, ω)[2] == 0
    u(L, ω)[3] == 0
    # solver
    ω_1 := find(ω)
end solve block
solve block
    # guess values
    ω := 30*rad/s
    # constraints
    u(L, ω)[2] == 0
    u(L, ω)[3] == 0
    # solver
    ω_2 := find(ω)
end solve block
ω_1 = 12.1097 1/s
ω_2 = 34.9736 1/s
# [plot: u(L, ω)[3] vs ω]
u(L, ω_1) = [0.442835; 0.101117 1/m; 0 N; 0 kg/s^2]
u(L, ω_2) = [-2.69181; -0.867359 1/m; 0 N; -4.76837e-7 kg/s^2]
f(x, ω) := u(x, ω)[0]
θ(x, ω) := u(x, ω)[1]
f'(x, ω) := u(x, ω)[1]
M(x, ω) := u(x, ω)[2]
Q(x, ω) := u(x, ω)[3]
x := 0, 0.1 m .. 21 m
# [plot: f(x, ω_1), f(x, ω_2) vs x]
# [plot: θ(x, ω_1), θ(x, ω_2) vs x]
# [plot: M(x, ω_1), M(x, ω_2) vs x]
# [plot: Q(x, ω_1) (N/m), Q(x, ω_2) (N/m) vs x]
# Расчет приведенных масс
m_n(ω) := integral(m_i(i(x))*f(x, ω)^2, x = 0 .. L)
m_n(ω_1) = 849.588 kg
m_n(ω_2) = 8683.66 kg
# ДЗ №2
ω_1 = 12.1097 1/s
x_ГП := 19.5 m
x_р := L = 21 m
ω_2 = 34.9736 1/s
ω_0 := 25*1/s
ω_π := 70*1/s
ω_2π := 110*1/s
f(x_р, ω_1)*f'(x_ГП, ω_1) = 0.0447659 1/m
f(x_р, ω_2)*f'(x_ГП, ω_2) = 2.33111 1/m
# Расчет собственных частот для разного заполнения баков
# Координаты начала и конца баков
x_БОн := 4 m
x_БОк := 10 m
x_БГн := 11 m
x_БГк := 19 m
# Заполненность баков
S := 0.02298
# Координаты зеркал компонентов топлива
x_О := x_БОн + (1 - S)*(x_БОк - x_БОн) = 9.86212 m
x_Г := x_БГн + (1 - S)*(x_БГк - x_БГн) = 18.8162 m
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m_i(i) := {
    if i == 1
        30
    else if i == 2
        60
    else if i == 3
        40
    else if i == 4
        30
    else if i == 5
        3500
    else if i == 6
        50
    else if i == 7
        35
    else if i == 8
        2500
    else if i == 9
        50
}*kg/m
EJ_i(i) := {
    if i == 1
        40
    else if i == 2
        90
    else if i == 3
        60
    else if i == 4
        44
    else if i == 5
        44
    else if i == 6
        60
    else if i == 7
        55
    else if i == 8
        55
    else if i == 9
        60
}*MN*m^2
x(i) := {
    if i == 1
        1.7
    else if i == 2
        3.5
    else if i == 3
        4
    else if i == 4
        x_О/m
    else if i == 5
        10
    else if i == 6
        11
    else if i == 7
        x_Г/m
    else if i == 8
        19
    else if i == 9
        21
}*m
i(x) :=
    x ← x/m
    if x < 1.7
        1
    else if x < 3.5
        2
    else if x < 4
        3
    else if x < 7
        4
    else if x < 10
        5
    else if x < 11
        6
    else if x < 15
        7
    else if x < 19
        8
    else if x ≤ 21
        9
l_i(i) :=
    if i == 1
        x(i)
    else
        x(i) - x(i - 1)
b_i(ω, i) := nthroot(ω^2*m_i(i)/EJ_i(i), 4)
S(x, ω, i) := 1/2*(cosh(b_i(ω, i)*x) + cos(b_i(ω, i)*x))
T(x, ω, i) := 1/2*(sinh(b_i(ω, i)*x) + sin(b_i(ω, i)*x))
U(x, ω, i) := 1/2*(cosh(b_i(ω, i)*x) - cos(b_i(ω, i)*x))
V(x, ω, i) := 1/2*(sinh(b_i(ω, i)*x) - sin(b_i(ω, i)*x))
A_i(x, ω, i) := [
    S(x, ω, i), T(x, ω, i)/b_i(ω, i), U(x, ω, i)/(EJ_i(i)*b_i(ω, i)^2), V(x, ω, i)/(EJ_i(i)*b_i(ω, i)^3);
    V(x, ω, i)*b_i(ω, i), S(x, ω, i), T(x, ω, i)/(EJ_i(i)*b_i(ω, i)), U(x, ω, i)/(EJ_i(i)*b_i(ω, i)^2);
    U(x, ω, i)*EJ_i(i)*b_i(ω, i)^2, V(x, ω, i)*EJ_i(i)*b_i(ω, i), S(x, ω, i), T(x, ω, i)/b_i(ω, i);
    T(x, ω, i)*EJ_i(i)*b_i(ω, i)^3, U(x, ω, i)*EJ_i(i)*b_i(ω, i)^2, V(x, ω, i)*b_i(ω, i), S(x, ω, i)
]
B_i(i, ω) :=
    if i == 1
        [1, 0*m, 0*1/N, 0*s^2/kg; 0*1/m, 1, 0*1/J, 0*1/N; 0*N, 0*J, 1, 0*m; M_1*ω^2, 0*N, 0*1/m, 1]
    else if i == 8
        [1, 0*m, 0*1/N, 0*s^2/kg; 0*1/m, 1, 0*1/J, 0*1/N; 0*N, -J_0*ω^2, 1, 0*m; M_2*ω^2, 0*N, 0*1/m, 1]
    else
        [1, 0*m, 0*1/N, 0*s^2/kg; 0*1/m, 1, 0*1/J, 0*1/N; 0*N, 0*J, 1, 0*m; 0*kg/s^2, 0*N, 0*1/m, 1]
P_L(ω) := product(B_i(i, ω)*A_i(l_i(i), ω, i), i = 9 .. 1)
P_L(1/s) = [
    1.05453, 21.1229 m, 4.3636e-6 1/N, 2.9982e-5 s^2/kg;
    0.00856414 1/m, 1.0236, 4.04098e-7 1/J, 4.10222e-6 1/N;
    57260.7 N, 265179 J, 1.02905, 21.1432 m;
    5829.09 kg/s^2, 63332.7 N, 0.0105353 1/m, 1.06298
]
D(ω) := P_L(ω)[2, 0]*P_L(ω)[3, 1] - P_L(ω)[2, 1]*P_L(ω)[3, 0]
ω := 0 rad/s, 1*rad/s .. 100*rad/s
# [chart]
    X[1] := ω
    Y[1] := D(ω)
solve block
    # guess values
    ω := 10*rad/s
    # constraints
    D(ω) == 0
    # solver
    ω_1 := find(ω) = 11.5573 1/s
end solve block
solve block
    # guess values
    ω := 30*rad/s
    # constraints
    D(ω) == 0
    # solver
    ω_2 := find(ω) = 26.6571 1/s
end solve block
# Построение собственных форм колебаний
P(ω, x) :=
    if i(x) > 1
        A_i(x - sum(l_i(j), j = 1 .. i(x) - 1), ω, i(x))*product(B_i(j, ω)*A_i(l_i(j), ω, j), j = i(x) - 1 .. 1)
    else
        A_i(x, ω, 1)
u_0(ω) := [1; -P_L(ω)[2, 0]/P_L(ω)[2, 1]; 0*N; 0*kg/s^2]
u(x, ω) := P(ω, x)*u_0(ω)
ω := 0 rad/s, 1*rad/s .. 100*rad/s
solve block
    # guess values
    ω := 35*rad/s
    # constraints
    u(L, ω)[2] == 0
    u(L, ω)[3] == 0
    # solver
    ω_1 := find(ω)
end solve block
solve block
    # guess values
    ω := 100*rad/s
    # constraints
    u(L, ω)[2] == 0
    u(L, ω)[3] == 0
    # solver
    ω_2 := find(ω)
end solve block
# [chart]
    X[1] := ω
    Y[1] := D(ω)
ω_1 = 25.0006 1/s
ω_2 = 82.7411 1/s
u(L, ω_1) = [0.981919; 0.37158 1/m; -2.98023e-8 N; 0 kg/s^2]
u(L, ω_2) = [-2.07981; -1.12028 1/m; 0 N; 1.90735e-6 kg/s^2]
f(x, ω) := u(x, ω)[0]
θ(x, ω) := u(x, ω)[1]
f'(x, ω) := u(x, ω)[1]
M(x, ω) := u(x, ω)[2]
Q(x, ω) := u(x, ω)[3]
ω_1 = 25.0006 1/s
f(x_р, ω_1)*f'(x_ГП, ω_1) = 0.364619 1/m
ω_2 = 82.7411 1/s
f(x_р, ω_2)*f'(x_ГП, ω_2) = 2.3189 1/m
# Заведем таблицу полученных значений
Table := [
    1, 10.289, 0.096, 25.009, 0.186;
    0.95, 10.593, 0.087, 25.097, 0.193;
    0.9, 10.878, 0.079, 25.254, 0.214;
    0.85, 11.138, 0.072, 25.532, 0.252;
    0.8, 11.366, 0.065, 25.984, 0.315;
    0.75, 11.557, 0.059, 26.657, 0.412;
    0.7, 11.713, 0.054, 27.597, 0.562;
    0.65, 11.836, 0.05, 28.85, 0.788;
    0.6, 11.935, 0.047, 30.461, 1.126;
    0.55, 12.022, 0.045, 32.482, 1.622;
    0.5, 12.11, 0.045, 34.974, 2.331;
    0.45, 12.214, 0.046, 38.002, 3.308;
    0.4, 12.355, 0.048, 41.636, 4.583;
    0.35, 12.553, 0.052, 45.932, 6.114;
    0.3, 12.842, 0.058, 50.902, 7.725;
    0.25, 13.268, 0.067, 56.47, 9.064;
    0.2, 13.913, 0.083, 62.413, 9.642;
    0.15, 14.934, 0.107, 68.333, 9.046;
    0.1, 16.703, 0.153, 73.762, 7.202;
    0.05, 20.423, 0.249, 78.785, 4.318;
    0, 34.831, 0.632, 94.88, 0.487
]
i := 0, 1 .. 1/0.05 = [0; 1; 2; 3; 4; 5; 6; 7; 8; 9; 10; 11; 12; 13; 14; 15; 16; 17; 18; 19; 20]
ω[i] := Table[i, 1] = [10.289; 10.593; 10.878; 11.138; 11.366; 11.557; 11.713; 11.836; 11.935; 12.022; 12.11; 12.214; 12.355; 12.553; 12.842; 13.268; 13.913; 14.934; 16.703; 20.423; 34.831]
ff'[i] := Table[i, 2] = [0.096; 0.087; 0.079; 0.072; 0.065; 0.059; 0.054; 0.05; 0.047; 0.045; 0.045; 0.046; 0.048; 0.052; 0.058; 0.067; 0.083; 0.107; 0.153; 0.249; 0.632]
# [chart]
    X[1] := ω
    Y[1] := ff'
    X[2] := [ω_0; ω_0]
    Y[2] := [0; 1]
# pic3
ω[i] := Table[i, 3] = [25.009; 25.097; 25.254; 25.532; 25.984; 26.657; 27.597; 28.85; 30.461; 32.482; 34.974; 38.002; 41.636; 45.932; 50.902; 56.47; 62.413; 68.333; 73.762; 78.785; 94.88]
ff'[i] := Table[i, 4] = [0.186; 0.193; 0.214; 0.252; 0.315; 0.412; 0.562; 0.788; 1.126; 1.622; 2.331; 3.308; 4.583; 6.114; 7.725; 9.064; 9.642; 9.046; 7.202; 4.318; 0.487]
# [chart]
    X[1] := ω
    Y[1] := ff'
    X[2] := [ω_π; ω_π]
    Y[2] := [0; 10]
    X[3] := [ω_2π; ω_2π]
    Y[3] := [0; 10]
# pic4
# Поиск положения гироплатформы
# Заполненность баков
S := 0.02298
# Координаты начала и конца баков
x_БОн := 4 m
x_БОк := 10 m
x_БГн := 11 m
x_БГк := 19 m
# Координаты зеркал компонентов топлива
x_О := x_БОн + (1 - S)*(x_БОк - x_БОн) = 9.86212 m
x_Г := x_БГн + (1 - S)*(x_БГк - x_БГн) = 18.8162 m
m_i(i) := {
    if i == 1
        30
    else if i == 2
        60
    else if i == 3
        40
    else if i == 4
        30
    else if i == 5
        3500
    else if i == 6
        50
    else if i == 7
        35
    else if i == 8
        2500
    else if i == 9
        50
}*kg/m
EJ_i(i) := {
    if i == 1
        40
    else if i == 2
        90
    else if i == 3
        60
    else if i == 4
        44
    else if i == 5
        44
    else if i == 6
        60
    else if i == 7
        55
    else if i == 8
        55
    else if i == 9
        60
}*MN*m^2
x(i) := {
    if i == 1
        1.7
    else if i == 2
        3.5
    else if i == 3
        4
    else if i == 4
        x_О/m
    else if i == 5
        10
    else if i == 6
        11
    else if i == 7
        x_Г/m
    else if i == 8
        19
    else if i == 9
        21
}*m
i(x) :=
    x ← x/m
    if x < 1.7
        1
    else if x < 3.5
        2
    else if x < 4
        3
    else if x < x_О/m
        4
    else if x < 10
        5
    else if x < 11
        6
    else if x < x_Г/m
        7
    else if x < 19
        8
    else if x ≤ 21
        9
l_i(i) :=
    if i == 1
        x(i)
    else
        x(i) - x(i - 1)
b_i(ω, i) := nthroot(ω^2*m_i(i)/EJ_i(i), 4)
S(x, ω, i) := 1/2*(cosh(b_i(ω, i)*x) + cos(b_i(ω, i)*x))
T(x, ω, i) := 1/2*(sinh(b_i(ω, i)*x) + sin(b_i(ω, i)*x))
U(x, ω, i) := 1/2*(cosh(b_i(ω, i)*x) - cos(b_i(ω, i)*x))
V(x, ω, i) := 1/2*(sinh(b_i(ω, i)*x) - sin(b_i(ω, i)*x))
A_i(x, ω, i) := [
    S(x, ω, i), T(x, ω, i)/b_i(ω, i), U(x, ω, i)/(EJ_i(i)*b_i(ω, i)^2), V(x, ω, i)/(EJ_i(i)*b_i(ω, i)^3);
    V(x, ω, i)*b_i(ω, i), S(x, ω, i), T(x, ω, i)/(EJ_i(i)*b_i(ω, i)), U(x, ω, i)/(EJ_i(i)*b_i(ω, i)^2);
    U(x, ω, i)*EJ_i(i)*b_i(ω, i)^2, V(x, ω, i)*EJ_i(i)*b_i(ω, i), S(x, ω, i), T(x, ω, i)/b_i(ω, i);
    T(x, ω, i)*EJ_i(i)*b_i(ω, i)^3, U(x, ω, i)*EJ_i(i)*b_i(ω, i)^2, V(x, ω, i)*b_i(ω, i), S(x, ω, i)
]
B_i(i, ω) :=
    if i == 1
        [1, 0*m, 0*1/N, 0*s^2/kg; 0*1/m, 1, 0*1/J, 0*1/N; 0*N, 0*J, 1, 0*m; M_1*ω^2, 0*N, 0*1/m, 1]
    else if i == 8
        [1, 0*m, 0*1/N, 0*s^2/kg; 0*1/m, 1, 0*1/J, 0*1/N; 0*N, -J_0*ω^2, 1, 0*m; M_2*ω^2, 0*N, 0*1/m, 1]
    else
        [1, 0*m, 0*1/N, 0*s^2/kg; 0*1/m, 1, 0*1/J, 0*1/N; 0*N, 0*J, 1, 0*m; 0*kg/s^2, 0*N, 0*1/m, 1]
P_L(ω) := product(B_i(i, ω)*A_i(l_i(i), ω, i), i = 9 .. 1)
D(ω) := P_L(ω)[2, 0]*P_L(ω)[3, 1] - P_L(ω)[2, 1]*P_L(ω)[3, 0]
P(ω, x) :=
    if i(x) > 1
        A_i(x - sum(l_i(j), j = 1 .. i(x) - 1), ω, i(x))*product(B_i(j, ω)*A_i(l_i(j), ω, j), j = i(x) - 1 .. 1)
    else
        A_i(x, ω, 1)
u_0(ω) := [1; -P_L(ω)[2, 0]/P_L(ω)[2, 1]; 0*N; 0*kg/s^2]
u(x, ω) := P(ω, x)*u_0(ω)
ω := 0 rad/s, 1*rad/s .. 100*rad/s
solve block
    # guess values
    ω := 35*rad/s
    # constraints
    u(L, ω)[2] == 0
    u(L, ω)[3] == 0
    # solver
    ω_1 := find(ω)
end solve block
solve block
    # guess values
    ω := 100*rad/s
    # constraints
    u(L, ω)[2] == 0
    u(L, ω)[3] == 0
    # solver
    ω_2 := find(ω)
end solve block
# [chart]
    X[1] := ω
    Y[1] := D(ω)
ω_1 = 25.0006 1/s
ω_2 = 82.7411 1/s
φ_2_0.02298(x) := u(x_р, ω_2)[0]*u(x, ω_2)[1]
# Заполненность баков
S := 0.2
# Координаты начала и конца баков
x_БОн := 4 m
x_БОк := 10 m
x_БГн := 11 m
x_БГк := 19 m
# Координаты зеркал компонентов топлива
x_О := x_БОн + (1 - S)*(x_БОк - x_БОн) = 8.8 m
x_Г := x_БГн + (1 - S)*(x_БГк - x_БГн) = 17.4 m
m_i(i) := {
    if i == 1
        30
    else if i == 2
        60
    else if i == 3
        40
    else if i == 4
        30
    else if i == 5
        3500
    else if i == 6
        50
    else if i == 7
        35
    else if i == 8
        2500
    else if i == 9
        50
}*kg/m
EJ_i(i) := {
    if i == 1
        40
    else if i == 2
        90
    else if i == 3
        60
    else if i == 4
        44
    else if i == 5
        44
    else if i == 6
        60
    else if i == 7
        55
    else if i == 8
        55
    else if i == 9
        60
}*MN*m^2
x(i) := {
    if i == 1
        1.7
    else if i == 2
        3.5
    else if i == 3
        4
    else if i == 4
        x_О/m
    else if i == 5
        10
    else if i == 6
        11
    else if i == 7
        x_Г/m
    else if i == 8
        19
    else if i == 9
        21
}*m
i(x) :=
    x ← x/m
    if x < 1.7
        1
    else if x < 3.5
        2
    else if x < 4
        3
    else if x < x_О/m
        4
    else if x < 10
        5
    else if x < 11
        6
    else if x < x_Г/m
        7
    else if x < 19
        8
    else if x ≤ 21
        9
l_i(i) :=
    if i == 1
        x(i)
    else
        x(i) - x(i - 1)
b_i(ω, i) := nthroot(ω^2*m_i(i)/EJ_i(i), 4)
S(x, ω, i) := 1/2*(cosh(b_i(ω, i)*x) + cos(b_i(ω, i)*x))
T(x, ω, i) := 1/2*(sinh(b_i(ω, i)*x) + sin(b_i(ω, i)*x))
U(x, ω, i) := 1/2*(cosh(b_i(ω, i)*x) - cos(b_i(ω, i)*x))
V(x, ω, i) := 1/2*(sinh(b_i(ω, i)*x) - sin(b_i(ω, i)*x))
A_i(x, ω, i) := [
    S(x, ω, i), T(x, ω, i)/b_i(ω, i), U(x, ω, i)/(EJ_i(i)*b_i(ω, i)^2), V(x, ω, i)/(EJ_i(i)*b_i(ω, i)^3);
    V(x, ω, i)*b_i(ω, i), S(x, ω, i), T(x, ω, i)/(EJ_i(i)*b_i(ω, i)), U(x, ω, i)/(EJ_i(i)*b_i(ω, i)^2);
    U(x, ω, i)*EJ_i(i)*b_i(ω, i)^2, V(x, ω, i)*EJ_i(i)*b_i(ω, i), S(x, ω, i), T(x, ω, i)/b_i(ω, i);
    T(x, ω, i)*EJ_i(i)*b_i(ω, i)^3, U(x, ω, i)*EJ_i(i)*b_i(ω, i)^2, V(x, ω, i)*b_i(ω, i), S(x, ω, i)
]
B_i(i, ω) :=
    if i == 1
        [1, 0*m, 0*1/N, 0*s^2/kg; 0*1/m, 1, 0*1/J, 0*1/N; 0*N, 0*J, 1, 0*m; M_1*ω^2, 0*N, 0*1/m, 1]
    else if i == 8
        [1, 0*m, 0*1/N, 0*s^2/kg; 0*1/m, 1, 0*1/J, 0*1/N; 0*N, -J_0*ω^2, 1, 0*m; M_2*ω^2, 0*N, 0*1/m, 1]
    else
        [1, 0*m, 0*1/N, 0*s^2/kg; 0*1/m, 1, 0*1/J, 0*1/N; 0*N, 0*J, 1, 0*m; 0*kg/s^2, 0*N, 0*1/m, 1]
P_L(ω) := product(B_i(i, ω)*A_i(l_i(i), ω, i), i = 9 .. 1)
D(ω) := P_L(ω)[2, 0]*P_L(ω)[3, 1] - P_L(ω)[2, 1]*P_L(ω)[3, 0]
P(ω, x) :=
    if i(x) > 1
        A_i(x - sum(l_i(j), j = 1 .. i(x) - 1), ω, i(x))*product(B_i(j, ω)*A_i(l_i(j), ω, j), j = i(x) - 1 .. 1)
    else
        A_i(x, ω, 1)
u_0(ω) := [1; -P_L(ω)[2, 0]/P_L(ω)[2, 1]; 0*N; 0*kg/s^2]
u(x, ω) := P(ω, x)*u_0(ω)
ω := 0 rad/s, 1*rad/s .. 100*rad/s
solve block
    # guess values
    ω := 15*rad/s
    # constraints
    u(L, ω)[2] == 0
    u(L, ω)[3] == 0
    # solver
    ω_1 := find(ω)
end solve block
solve block
    # guess values
    ω := 60*rad/s
    # constraints
    u(L, ω)[2] == 0
    u(L, ω)[3] == 0
    # solver
    ω_2 := find(ω)
end solve block
# [chart]
    X[1] := ω
    Y[1] := D(ω)
ω_1 = 13.9132 1/s
ω_2 = 62.4133 1/s
φ_2_0.2(x) := u(x_р, ω_2)[0]*u(x, ω_2)[1]
# Заполненность баков
S := 1
# Координаты начала и конца баков
x_БОн := 4 m
x_БОк := 10 m
x_БГн := 11 m
x_БГк := 19 m
# Координаты зеркал компонентов топлива
x_О := x_БОн + (1 - S)*(x_БОк - x_БОн) = 4 m
x_Г := x_БГн + (1 - S)*(x_БГк - x_БГн) = 11 m
m_i(i) := {
    if i == 1
        30
    else if i == 2
        60
    else if i == 3
        40
    else if i == 4
        30
    else if i == 5
        3500
    else if i == 6
        50
    else if i == 7
        35
    else if i == 8
        2500
    else if i == 9
        50
}*kg/m
EJ_i(i) := {
    if i == 1
        40
    else if i == 2
        90
    else if i == 3
        60
    else if i == 4
        44
    else if i == 5
        44
    else if i == 6
        60
    else if i == 7
        55
    else if i == 8
        55
    else if i == 9
        60
}*MN*m^2
x(i) := {
    if i == 1
        1.7
    else if i == 2
        3.5
    else if i == 3
        4
    else if i == 4
        x_О/m
    else if i == 5
        10
    else if i == 6
        11
    else if i == 7
        x_Г/m
    else if i == 8
        19
    else if i == 9
        21
}*m
i(x) :=
    x ← x/m
    if x < 1.7
        1
    else if x < 3.5
        2
    else if x < 4
        3
    else if x < x_О/m
        4
    else if x < 10
        5
    else if x < 11
        6
    else if x < x_Г/m
        7
    else if x < 19
        8
    else if x ≤ 21
        9
l_i(i) :=
    if i == 1
        x(i)
    else
        x(i) - x(i - 1)
b_i(ω, i) := nthroot(ω^2*m_i(i)/EJ_i(i), 4)
S(x, ω, i) := 1/2*(cosh(b_i(ω, i)*x) + cos(b_i(ω, i)*x))
T(x, ω, i) := 1/2*(sinh(b_i(ω, i)*x) + sin(b_i(ω, i)*x))
U(x, ω, i) := 1/2*(cosh(b_i(ω, i)*x) - cos(b_i(ω, i)*x))
V(x, ω, i) := 1/2*(sinh(b_i(ω, i)*x) - sin(b_i(ω, i)*x))
A_i(x, ω, i) := [
    S(x, ω, i), T(x, ω, i)/b_i(ω, i), U(x, ω, i)/(EJ_i(i)*b_i(ω, i)^2), V(x, ω, i)/(EJ_i(i)*b_i(ω, i)^3);
    V(x, ω, i)*b_i(ω, i), S(x, ω, i), T(x, ω, i)/(EJ_i(i)*b_i(ω, i)), U(x, ω, i)/(EJ_i(i)*b_i(ω, i)^2);
    U(x, ω, i)*EJ_i(i)*b_i(ω, i)^2, V(x, ω, i)*EJ_i(i)*b_i(ω, i), S(x, ω, i), T(x, ω, i)/b_i(ω, i);
    T(x, ω, i)*EJ_i(i)*b_i(ω, i)^3, U(x, ω, i)*EJ_i(i)*b_i(ω, i)^2, V(x, ω, i)*b_i(ω, i), S(x, ω, i)
]
B_i(i, ω) :=
    if i == 1
        [1, 0*m, 0*1/N, 0*s^2/kg; 0*1/m, 1, 0*1/J, 0*1/N; 0*N, 0*J, 1, 0*m; M_1*ω^2, 0*N, 0*1/m, 1]
    else if i == 8
        [1, 0*m, 0*1/N, 0*s^2/kg; 0*1/m, 1, 0*1/J, 0*1/N; 0*N, -J_0*ω^2, 1, 0*m; M_2*ω^2, 0*N, 0*1/m, 1]
    else
        [1, 0*m, 0*1/N, 0*s^2/kg; 0*1/m, 1, 0*1/J, 0*1/N; 0*N, 0*J, 1, 0*m; 0*kg/s^2, 0*N, 0*1/m, 1]
P_L(ω) := product(B_i(i, ω)*A_i(l_i(i), ω, i), i = 9 .. 1)
D(ω) := P_L(ω)[2, 0]*P_L(ω)[3, 1] - P_L(ω)[2, 1]*P_L(ω)[3, 0]
P(ω, x) :=
    if i(x) > 1
        A_i(x - sum(l_i(j), j = 1 .. i(x) - 1), ω, i(x))*product(B_i(j, ω)*A_i(l_i(j), ω, j), j = i(x) - 1 .. 1)
    else
        A_i(x, ω, 1)
u_0(ω) := [1; -P_L(ω)[2, 0]/P_L(ω)[2, 1]; 0*N; 0*kg/s^2]
u(x, ω) := P(ω, x)*u_0(ω)
ω := 0 rad/s, 1*rad/s .. 100*rad/s
solve block
    # guess values
    ω := 10*rad/s
    # constraints
    u(L, ω)[2] == 0
    u(L, ω)[3] == 0
    # solver
    ω_1 := find(ω)
end solve block
solve block
    # guess values
    ω := 25*rad/s
    # constraints
    u(L, ω)[2] == 0
    u(L, ω)[3] == 0
    # solver
    ω_2 := find(ω)
end solve block
# [chart]
    X[1] := ω
    Y[1] := D(ω)
ω_1 = 10.2895 1/s
ω_2 = 25.0087 1/s
φ_2_1(x) := u(x_р, ω_2)[0]*u(x, ω_2)[1]
vx := 0 m, 0.1 m .. L
# [chart]
    X[1] := vx
    Y[1] := φ_2_0.02298(vx)
    X[2] := vx
    Y[2] := φ_2_0.2(vx)
    X[3] := vx
    Y[3] := φ_2_1(vx)
# pic5
# Построение диаграммы устойчивости
# Заполненность баков
S := 0.5
# Координаты начала и конца баков
x_БОн := 4 m
x_БОк := 10 m
x_БГн := 11 m
x_БГк := 19 m
# Координаты зеркал компонентов топлива
x_О := x_БОн + (1 - S)*(x_БОк - x_БОн) = 7 m
x_Г := x_БГн + (1 - S)*(x_БГк - x_БГн) = 15 m
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m_i(i) := {
    if i == 1
        30
    else if i == 2
        60
    else if i == 3
        40
    else if i == 4
        30
    else if i == 5
        3500
    else if i == 6
        50
    else if i == 7
        35
    else if i == 8
        2500
    else if i == 9
        50
}*kg/m
EJ_i(i) := {
    if i == 1
        40
    else if i == 2
        90
    else if i == 3
        60
    else if i == 4
        44
    else if i == 5
        44
    else if i == 6
        60
    else if i == 7
        55
    else if i == 8
        55
    else if i == 9
        60
}*MN*m^2
x(i) := {
    if i == 1
        1.7
    else if i == 2
        3.5
    else if i == 3
        4
    else if i == 4
        x_О/m
    else if i == 5
        10
    else if i == 6
        11
    else if i == 7
        x_Г/m
    else if i == 8
        19
    else if i == 9
        21
}*m
i(x) :=
    x ← x/m
    if x < 1.7
        1
    else if x < 3.5
        2
    else if x < 4
        3
    else if x < x_О/m
        4
    else if x < 10
        5
    else if x < 11
        6
    else if x < x_Г/m
        7
    else if x < 19
        8
    else if x ≤ 21
        9
l_i(i) :=
    if i == 1
        x(i)
    else
        x(i) - x(i - 1)
b_i(ω, i) := nthroot(ω^2*m_i(i)/EJ_i(i), 4)
S(x, ω, i) := 1/2*(cosh(b_i(ω, i)*x) + cos(b_i(ω, i)*x))
T(x, ω, i) := 1/2*(sinh(b_i(ω, i)*x) + sin(b_i(ω, i)*x))
U(x, ω, i) := 1/2*(cosh(b_i(ω, i)*x) - cos(b_i(ω, i)*x))
V(x, ω, i) := 1/2*(sinh(b_i(ω, i)*x) - sin(b_i(ω, i)*x))
A_i(x, ω, i) := [
    S(x, ω, i), T(x, ω, i)/b_i(ω, i), U(x, ω, i)/(EJ_i(i)*b_i(ω, i)^2), V(x, ω, i)/(EJ_i(i)*b_i(ω, i)^3);
    V(x, ω, i)*b_i(ω, i), S(x, ω, i), T(x, ω, i)/(EJ_i(i)*b_i(ω, i)), U(x, ω, i)/(EJ_i(i)*b_i(ω, i)^2);
    U(x, ω, i)*EJ_i(i)*b_i(ω, i)^2, V(x, ω, i)*EJ_i(i)*b_i(ω, i), S(x, ω, i), T(x, ω, i)/b_i(ω, i);
    T(x, ω, i)*EJ_i(i)*b_i(ω, i)^3, U(x, ω, i)*EJ_i(i)*b_i(ω, i)^2, V(x, ω, i)*b_i(ω, i), S(x, ω, i)
]
B_i(i, ω) :=
    if i == 1
        [1, 0*m, 0*1/N, 0*s^2/kg; 0*1/m, 1, 0*1/J, 0*1/N; 0*N, 0*J, 1, 0*m; M_1*ω^2, 0*N, 0*1/m, 1]
    else if i == 8
        [1, 0*m, 0*1/N, 0*s^2/kg; 0*1/m, 1, 0*1/J, 0*1/N; 0*N, -J_0*ω^2, 1, 0*m; M_2*ω^2, 0*N, 0*1/m, 1]
    else
        [1, 0*m, 0*1/N, 0*s^2/kg; 0*1/m, 1, 0*1/J, 0*1/N; 0*N, 0*J, 1, 0*m; 0*kg/s^2, 0*N, 0*1/m, 1]
P_L(ω) := product(B_i(i, ω)*A_i(l_i(i), ω, i), i = 9 .. 1)
D(ω) := P_L(ω)[2, 0]*P_L(ω)[3, 1] - P_L(ω)[2, 1]*P_L(ω)[3, 0]
P(ω, x) :=
    if i(x) > 1
        A_i(x - sum(l_i(j), j = 1 .. i(x) - 1), ω, i(x))*product(B_i(j, ω)*A_i(l_i(j), ω, j), j = i(x) - 1 .. 1)
    else
        A_i(x, ω, 1)
u_0(ω) := [1; -P_L(ω)[2, 0]/P_L(ω)[2, 1]; 0*N; 0*kg/s^2]
u(x, ω) := P(ω, x)*u_0(ω)
ω := 0 rad/s, 1*rad/s .. 100*rad/s
solve block
    # guess values
    ω := 10*rad/s
    # constraints
    u(L, ω)[2] == 0
    u(L, ω)[3] == 0
    # solver
    ω_1 := find(ω)
end solve block
solve block
    # guess values
    ω := 35*rad/s
    # constraints
    u(L, ω)[2] == 0
    u(L, ω)[3] == 0
    # solver
    ω_2 := find(ω)
end solve block
# [chart]
    X[1] := ω
    Y[1] := D(ω)
ω_1 = 12.1097 1/s
ω_2 = 34.9736 1/s
# Расчет приведенных масс
m_n(ω) := integral(m_i(i(x))*u(x, ω)[0]^2, x = 0 .. L)
m_1 := m_n(ω_1) = 849.588 kg
m_2 := m_n(ω_2) = 8683.66 kg
x_ГП := 10.5 m
ε := 0.001
M_0 := sum(m_i(j)*l_i(j), j = 1 .. 9) = 21.059 tonne
k_p := 0.6
R_z := k_p*M_0*g = 123911 N
ff'_1(ω) := 1/(0.5*exp(0.01*(ω_0 - ω)*s/rad)*sqrt((R_z*(ω^2*2*ε)/(m_1*((ω_1^2 - ω^2)^2 + (2*ε*ω^2)^2)))^2 + (-R_z*(ω_1^2 - ω^2)/(m_1*((ω_1^2 - ω^2)^2 + (2*ε*ω^2)^2)))^2))
ff'_2(ω) := -1/(0.5*exp(0.01*(ω_0 - ω)*s/rad)*sqrt((R_z*(ω^2*2*ε)/(m_2*((ω_2^2 - ω^2)^2 + (2*ε*ω^2)^2)))^2 + (-R_z*(ω_2^2 - ω^2)/(m_2*((ω_2^2 - ω^2)^2 + (2*ε*ω^2)^2)))^2))
# [chart]
    X[1] := ω
    Y[1] := ff'_1(ω)
    X[2] := ω
    Y[2] := ff'_2(ω)
    X[3] := [ω_0; ω_0]
    Y[3] := [-3000; 500]
    X[4] := [ω_π; ω_π]
    Y[4] := [-3000; 500]
    X[5] := [ω_2π; ω_2π]
    Y[5] := [-3000; 500]
# pic6
# [chart]
    X[1] := ω
    Y[1] := ff'_1(ω)
    X[2] := ω
    Y[2] := ff'_2(ω)
    X[3] := [ω_0; ω_0]
    Y[3] := [-3000; 500]
    X[4] := [ω_π; ω_π]
    Y[4] := [-3000; 500]
    X[5] := [ω_2π; ω_2π]
    Y[5] := [-3000; 500]
# pic7
