# Worksheet setting: ORIGIN = 1
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M_1 := 1200
M_2 := 1000
m(x) :=
    if x == 1
        24
    if x == 2
        M_1/0.2
    if x == 3
        48
    if x == 4
        36
    if x == 5
        20
    if x == 6
        2800
    if x == 7
        25
    if x == 8
        1600
    if x == 9
        40
    if x == 10
        M_2/0.2
    if x == 11
        40
EJ(x) := {
    if x == 1
        22
    if x == 2
        (22 + 45)/2
    if x == 3
        45
    if x == 4
        34
    if x == 5
        22
    if x == 6
        22
    if x == 7
        30
    if x == 8
        30
    if x == 9
        40
    if x == 10
        40
    if x == 11
        40
}*10^6
x(x) :=
    if x == 1
        1.4
    if x == 2
        1.6 - 1.4
    if x == 3
        3 - 1.6
    if x == 4
        4 - 3
    if x == 5
        6 - 4
    if x == 6
        8 - 6
    if x == 7
        12 - 8
    if x == 8
        16 - 12
    if x == 9
        17.4 - 16
    if x == 10
        17.6 - 17.4
    if x == 11
        19 - 17.6
b(ω, i) := ω^2*m(i)/EJ(i)
S(x) := 0.5*(cosh(x) + cos(x))
T(x) := 0.5*(sinh(x) + sin(x))
U(x) := 0.5*(cosh(x) - cos(x))
V(x) := 0.5*(sinh(x) - sin(x))
f(i, x) := C_1(i)*S(b(i)*x) + C_2(i)*T(b(i)*x) + C_3(i)*U(b(i)*x) + C_4(i)*V(b(i)*x)  # error: Эта переменная не определена. Проверьте правильность установки обозначения.; disabled
A(ω, i) := [
    S(b(ω, i)*x(i)), 1/b(ω, i)*T(b(ω, i)*x(i)), 1/(EJ(i)*b(ω, i)^2)*U(b(ω, i)*x(i)), 1/(EJ(i)*b(ω, i)^3)*V(b(ω, i)*x(i));
    b(ω, i)*V(b(ω, i)*x(i)), S(b(ω, i)*x(i)), 1/(EJ(i)*b(ω, i))*T(b(ω, i)*x(i)), 1/(EJ(i)*b(ω, i)^2)*U(b(ω, i)*x(i));
    EJ(i)*b(ω, i)^2*U(b(ω, i)*x(i)), EJ(i)*b(ω, i)*V(b(ω, i)*x(i)), S(b(ω, i)*x(i)), 1/b(ω, i)*T(b(ω, i)*x(i));
    EJ(i)*b(ω, i)^3*V(b(ω, i)*x(i)), EJ(i)*b(ω, i)^2*U(b(ω, i)*x(i)), b(ω, i)*V(b(ω, i)*x(i)), S(b(ω, i)*x(i))
]
P(ω) := A(ω, 11)*A(ω, 10)*A(ω, 9)*A(ω, 8)*A(ω, 7)*A(ω, 6)*A(ω, 5)*A(ω, 4)*A(ω, 3)*A(ω, 2)*A(ω, 1)
p_11(ω) := P(ω)[1, 1]
p_12(ω) := P(ω)[1, 2]
p_13(ω) := P(ω)[1, 3]
p_14(ω) := P(ω)[1, 4]
p_21(ω) := P(ω)[2, 1]
p_22(ω) := P(ω)[2, 2]
p_23(ω) := P(ω)[2, 3]
p_24(ω) := P(ω)[2, 4]
p_31(ω) := P(ω)[3, 1]
p_32(ω) := P(ω)[3, 2]
p_33(ω) := P(ω)[3, 3]
p_34(ω) := P(ω)[3, 4]
p_41(ω) := P(ω)[4, 1]
p_42(ω) := P(ω)[4, 2]
p_43(ω) := P(ω)[4, 3]
p_44(ω) := P(ω)[4, 4]
Y(ω) := p_31(ω)*p_42(ω) - p_32(ω)*p_41(ω)
ω := 0, 0.001 .. 100
# [plot: Y(ω) vs ω]
solve block
    # guess values
    ω := 76.323
    # constraints
    Y(ω) == 0
    # solver
    ω_11 := find(ω) = 76.3225
end solve block
ω := 0, 0.1 .. 750
# [plot: Y(ω) vs ω]
solve block
    # guess values
    ω := 106.672
    # constraints
    Y(ω) == 0
    # solver
    ω_21 := find(ω) = 106.598
end solve block
# Пустая ракета
M_1 := 1200
M_2 := 1000
m(x) :=
    if x == 1
        24
    if x == 2
        M_1/0.2
    if x == 3
        48
    if x == 4
        36
    if x == 5
        20
    if x == 6
        20
    if x == 7
        25
    if x == 8
        25
    if x == 9
        40
    if x == 10
        M_2/0.2
    if x == 11
        40
EJ(x) := {
    if x == 1
        22
    if x == 2
        (22 + 45)/2
    if x == 3
        45
    if x == 4
        34
    if x == 5
        22
    if x == 6
        22
    if x == 7
        30
    if x == 8
        30
    if x == 9
        40
    if x == 10
        40
    if x == 11
        40
}*10^6
x(x) :=
    if x == 1
        1.4
    if x == 2
        1.6 - 1.4
    if x == 3
        3 - 1.6
    if x == 4
        4 - 3
    if x == 5
        6 - 4
    if x == 6
        8 - 6
    if x == 7
        12 - 8
    if x == 8
        16 - 12
    if x == 9
        17.4 - 16
    if x == 10
        17.6 - 17.4
    if x == 11
        19 - 17.6
b(ω, i) := ω^2*m(i)/EJ(i)
S(x) := 0.5*(cosh(x) + cos(x))
T(x) := 0.5*(sinh(x) + sin(x))
U(x) := 0.5*(cosh(x) - cos(x))
V(x) := 0.5*(sinh(x) - sin(x))
f(i, x) := C_1(i)*S(b(i)*x) + C_2(i)*T(b(i)*x) + C_3(i)*U(b(i)*x) + C_4(i)*V(b(i)*x)  # error: Эта переменная не определена. Проверьте правильность установки обозначения.; disabled
A(ω, i) := [
    S(b(ω, i)*x(i)), 1/b(ω, i)*T(b(ω, i)*x(i)), 1/(EJ(i)*b(ω, i)^2)*U(b(ω, i)*x(i)), 1/(EJ(i)*b(ω, i)^3)*V(b(ω, i)*x(i));
    b(ω, i)*V(b(ω, i)*x(i)), S(b(ω, i)*x(i)), 1/(EJ(i)*b(ω, i))*T(b(ω, i)*x(i)), 1/(EJ(i)*b(ω, i)^2)*U(b(ω, i)*x(i));
    EJ(i)*b(ω, i)^2*U(b(ω, i)*x(i)), EJ(i)*b(ω, i)*V(b(ω, i)*x(i)), S(b(ω, i)*x(i)), 1/b(ω, i)*T(b(ω, i)*x(i));
    EJ(i)*b(ω, i)^3*V(b(ω, i)*x(i)), EJ(i)*b(ω, i)^2*U(b(ω, i)*x(i)), b(ω, i)*V(b(ω, i)*x(i)), S(b(ω, i)*x(i))
]
P(ω) := A(ω, 11)*A(ω, 10)*A(ω, 9)*A(ω, 8)*A(ω, 7)*A(ω, 6)*A(ω, 5)*A(ω, 4)*A(ω, 3)*A(ω, 2)*A(ω, 1)
p_11(ω) := P(ω)[1, 1]
p_12(ω) := P(ω)[1, 2]
p_13(ω) := P(ω)[1, 3]
p_14(ω) := P(ω)[1, 4]
p_21(ω) := P(ω)[2, 1]
p_22(ω) := P(ω)[2, 2]
p_23(ω) := P(ω)[2, 3]
p_24(ω) := P(ω)[2, 4]
p_31(ω) := P(ω)[3, 1]
p_32(ω) := P(ω)[3, 2]
p_33(ω) := P(ω)[3, 3]
p_34(ω) := P(ω)[3, 4]
p_41(ω) := P(ω)[4, 1]
p_42(ω) := P(ω)[4, 2]
p_43(ω) := P(ω)[4, 3]
p_44(ω) := P(ω)[4, 4]
Y(ω) := p_31(ω)*p_42(ω) - p_32(ω)*p_41(ω)
ω := 0, 1 .. 100
# [plot: Y(ω) vs ω]
solve block
    # guess values
    ω := 332
    # constraints
    Y(ω) == 0
    # solver
    ω_12 := find(ω) = 331.918
end solve block
ω := 0, 0.1 .. 750
# [plot: Y(ω) vs ω]
solve block
    # guess values
    ω := 397
    # constraints
    Y(ω) == 0
    # solver
    ω_22 := find(ω) = 397.282
end solve block
# Заправленная ракета
M_1 := 1200
M_2 := 1000
m(x) :=
    if x == 1
        24
    if x == 2
        M_1/0.2
    if x == 3
        48
    if x == 4
        2800
    if x == 5
        2800
    if x == 6
        20
    if x == 7
        1600
    if x == 8
        1600
    if x == 9
        40
    if x == 10
        M_2/0.2
    if x == 11
        40
EJ(x) := {
    if x == 1
        22
    if x == 2
        (22 + 45)/2
    if x == 3
        45
    if x == 4
        34
    if x == 5
        22
    if x == 6
        22
    if x == 7
        30
    if x == 8
        30
    if x == 9
        40
    if x == 10
        40
    if x == 11
        40
}*10^6
x(x) :=
    if x == 1
        1.4
    if x == 2
        1.6 - 1.4
    if x == 3
        3 - 1.6
    if x == 4
        4 - 3
    if x == 5
        6 - 4
    if x == 6
        8 - 6
    if x == 7
        12 - 8
    if x == 8
        16 - 12
    if x == 9
        17.4 - 16
    if x == 10
        17.6 - 17.4
    if x == 11
        19 - 17.6
b(ω, i) := ω^2*m(i)/EJ(i)
S(x) := 0.5*(cosh(x) + cos(x))
T(x) := 0.5*(sinh(x) + sin(x))
U(x) := 0.5*(cosh(x) - cos(x))
V(x) := 0.5*(sinh(x) - sin(x))
f(i, x) := C_1(i)*S(b(i)*x) + C_2(i)*T(b(i)*x) + C_3(i)*U(b(i)*x) + C_4(i)*V(b(i)*x)  # error: Эта переменная не определена. Проверьте правильность установки обозначения.; disabled
A(ω, i) := [
    S(b(ω, i)*x(i)), 1/b(ω, i)*T(b(ω, i)*x(i)), 1/(EJ(i)*b(ω, i)^2)*U(b(ω, i)*x(i)), 1/(EJ(i)*b(ω, i)^3)*V(b(ω, i)*x(i));
    b(ω, i)*V(b(ω, i)*x(i)), S(b(ω, i)*x(i)), 1/(EJ(i)*b(ω, i))*T(b(ω, i)*x(i)), 1/(EJ(i)*b(ω, i)^2)*U(b(ω, i)*x(i));
    EJ(i)*b(ω, i)^2*U(b(ω, i)*x(i)), EJ(i)*b(ω, i)*V(b(ω, i)*x(i)), S(b(ω, i)*x(i)), 1/b(ω, i)*T(b(ω, i)*x(i));
    EJ(i)*b(ω, i)^3*V(b(ω, i)*x(i)), EJ(i)*b(ω, i)^2*U(b(ω, i)*x(i)), b(ω, i)*V(b(ω, i)*x(i)), S(b(ω, i)*x(i))
]
P(ω) := A(ω, 11)*A(ω, 10)*A(ω, 9)*A(ω, 8)*A(ω, 7)*A(ω, 6)*A(ω, 5)*A(ω, 4)*A(ω, 3)*A(ω, 2)*A(ω, 1)
p_11(ω) := P(ω)[1, 1]
p_12(ω) := P(ω)[1, 2]
p_13(ω) := P(ω)[1, 3]
p_14(ω) := P(ω)[1, 4]
p_21(ω) := P(ω)[2, 1]
p_22(ω) := P(ω)[2, 2]
p_23(ω) := P(ω)[2, 3]
p_24(ω) := P(ω)[2, 4]
p_31(ω) := P(ω)[3, 1]
p_32(ω) := P(ω)[3, 2]
p_33(ω) := P(ω)[3, 3]
p_34(ω) := P(ω)[3, 4]
p_41(ω) := P(ω)[4, 1]
p_42(ω) := P(ω)[4, 2]
p_43(ω) := P(ω)[4, 3]
p_44(ω) := P(ω)[4, 4]
Y(ω) := p_31(ω)*p_42(ω) - p_32(ω)*p_41(ω)
ω := 0, 1 .. 100
# [plot: Y(ω) vs ω]
solve block
    # guess values
    ω := 71
    # constraints
    Y(ω) == 0
    # solver
    ω_13 := find(ω) = 71.3624
end solve block
ω := 0, 0.1 .. 750
# [plot: Y(ω) vs ω]
solve block
    # guess values
    ω := 80
    # constraints
    Y(ω) == 0
    # solver
    ω_23 := find(ω) = 80.6632
end solve block
ω_11 = 76.3225
ω_12 = 331.918
ω_13 = 71.3624
ω_21 = 106.598
ω_22 = 397.282
ω_23 = 80.6632
