# Министерство образования и науки Российской Федерации
# Федеральное государственное бюджетное образовательное учреждение высшего образования
# «Московский государственный технический университет имени Н.Э. Баумана
# (национальный исследовательский университет)»
# (МГТУ им. Н.Э. Баумана)
#
# Кафедра «Космические аппараты и ракеты-носители»
#
# Дисциплина «Механика деформируемого твердого тела»
#
# Домашнее задание №1
# Вариант №4
#
# Студентка: Гусева Н. А.
# Группа: СМ1-81
# Преподаватель: Муравьев В. В.
#
# Москва, 2023 год.
# Задача 1.
#
# Для линейно упругого материала, представленного на рисунке 1х записать
# общий вид матрицы жёсткости в двух ортогональных декартовых системах
# координат. Общий вид должен показывать априори равные друг-другу значения
# и нулевые значения коэффициентов матриц жёсткости. Охарактеризовать тип
# материала
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# Исходные данные:
# СК_1:  X_3X_1X_2;
# СК_2:  X~_2X~_1X~_3
# Аналитическое выражение закона Гука для данного линейного упругого материала примет следующий упрощенный вид:
σ_11 == C_11ε_11 + C_12ε_22 + C_13ε_33
σ_22 == C_21ε_11 + C_22ε_22 + C_23ε_33
σ_33 == C_31ε_11 + C_32ε_22 + C_33ε_33  # (1)
σ_12 == C_44γ_12
σ_13 == C_55γ_13
σ_23 == C_66γ_23
C == [
    C_11, C_12, C_13, 0, 0, 0;
    C_21, C_22, C_23, 0, 0, 0;
    C_31, C_32, C_33, 0, 0, 0;
    0, 0, 0, C_44, 0, 0;
    0, 0, 0, 0, C_55, 0;
    0, 0, 0, 0, 0, C_66
]
# Данное  анизотропное тело обладает тремя
# взаимно перпендикулярными плоскостями симметрии. Такое тело называется
# ортотропным. Его линейно упругие свойства описываются девятью
# параметрами. В системе координат, в которой координатные плоскости
# совпадают с плоскостями симметрии тела, закон Гука имеет вид (1). При этом
# оси системы координат, перпендикулярные плоскостям симметрии, являются
# осями симметрии 2-го порядка.
# Рассмотрим соотношения в системе координат, повёрнутой на угол φ относительно оси X_1. Соотношения закона Гука будут иметь вид:
σ'_11 == C'_11ε'_11 + C'_12ε'_22 + C'_13ε'_33 + C'_16γ'_23
σ'_22 == C'_21ε'_11 + C'_22ε'_22 + C'_23ε'_33 + C'_26γ'_23
σ'_33 == C'_31ε'_11 + C'_32ε'_22 + C'_33ε'_33 + C'_36γ'_23  # (2)
σ'_12 == C'_44γ'_12 + C'_45γ'_13
σ'_13 == C'_54γ'_12 + C'_55γ'_13
σ'_23 == C'_61ε'_11 + C'_62ε'_22 + C'_63ε'_33 + C'_66γ'_23
# Коэффициенты C_ij (i,j=1,2,…,6) называются коэффициентами жёсткости
# линейно упругого тела. Они подлежат экспериментальному определению.
# Важно отметить, что равенства (2) справедливы как для изотропного, так и
# для анизотропного тел. В матричном виде их записывают так:{σ}=[C]{ε}
C' == [
    C'_11, C'_12, C'_13, 0, 0, C'_16;
    C'_21, C'_22, C'_23, 0, 0, C'_26;
    C'_31, C'_32, C'_33, 0, 0, C'_36;
    0, 0, 0, C'_44, C'_45, 0;
    0, 0, 0, C'_54, C'_55, 0;
    C'_61, C'_62, C'_63, 0, 0, C'_66
]
# При этом в новой системе координат коэффициенты жёсткости вычисляются по формулам:
C'_11 == C_11
C'_22 == C_22*cos(φ)^4 + C_33*sin(φ)^4 + 2*(C_23 + 2*C_66)*sin(φ)^2*cos(φ)^2
C'_33 == C_33*cos(φ)^2 + C_22*sin(φ)^2 + 2*(C_23 + 2*C_66)*sin(φ)^2*cos(φ)^2
C'_23 == C'_32 == (C_22 + C_33 - 2*C_23 - 4*C_66)*sin(φ)^2*cos(φ)^2 + C_23
(3)
C'_66 == (C_22 + C_33 - 2*C_23 - 4*C_66)*sin(φ)^2*cos(φ)^2 + C_66
C'_26 == C'_62 == (C_33*sin(φ)^2 - C_22*cos(φ)^2 + (C_23 + 2*C_66)*cos(2*φ))*sin(φ)*cos(φ)
C'_36 == C'_63 == (C_33*cos(φ)^2 - C_22*sin(φ)^2 - (C_23 + 2*C_66)*cos(2*φ))*sin(φ)*cos(φ)
C'_12 == C'_21 == C_12*cos(φ)^2 + C_13*sin(φ)^2
C'_13 == C'_31 == C_12*sin(φ)^2 + C_13*cos(φ)^2
C'_16 == C'_61 == (C_13 - C_12)*sin(φ)*cos(φ)
C'_44 == C_44*cos(φ)^2 + C_55*sin(φ)^2
C'_55 == C_44*sin(φ)^2 + C_55*cos(φ)^2
C'_45 == C'_54 == (C_55 - C_44)*sin(φ)*cos(φ)
# Равенства (1) можно обратить и записать их в форме:{ε}=[S]{σ}. Будем иметь такие зависимости:
ε_11 == S_11*σ_11 + S_12*σ_22 + S_13*σ_33
ε_22 == S_21*σ_11 + S_22*σ_22 + S_23*σ_33
(4)
ε_33 == S_31*σ_11 + S_32*σ_22 + S_33*σ_33
γ_12 == S_44*σ_12
γ_13 == S_55*σ_13
γ_23 == S_66*σ_23
# В практических расчётах коэффициенты упругих податливостей удобно
# записывать с помощью технических характеристик упругости, имеющих
# определённый физический смысл. Тогда равенства (4) принимают
# следующий вид:
ε_11 == σ_11/E_1 - υ_21/E_2*σ_22 - υ_31/E_3*σ_33
ε_22 == -υ_12/E_1*σ_11 + σ_22/E_2*σ_22 - υ_32/E_3*σ_33
(5)
ε_33 == -υ_13/E_1*σ_11 - υ_23/E_2*σ_22 + σ_33/E_3
γ_12 == σ_12/G_12
γ_13 == σ_13/G_13
γ_23 == σ_23/G_23
# В формулах (5) введены такие обозначения для технических
# характеристик упругости: E_1 ,E_2 , E_3- модули упругости материала при
# растяжении в направлении осей X_1 , X_2, X_3соответственно; G_12,G_13,G_23 -
# модули сдвига в плоскостях X_1X_2, X_2X_3, X_3X_1 соответственно; υ_ij (i ≠ j ) -
# коэффициенты Пуассона, для которых первый индекс указывает направление
# действующего напряжения, а второй – направление возникающей при этом
# поперечной деформации. В силу симметрии матрицы упругих податливостей
# должны выполняться следующие равенства:
υ_21/E_2 == υ_12/E_1
υ_31/E_3 == υ_13/E_1
υ_32/E_3 == υ_23/E_2  # (6)
# Представленные технические характеристики упругости ортотропного
# тела определяются при обработке экспериментально полученных результатов.
# Равенства (1), записанные с помощью этих параметров будут иметь такой вид:
σ_11 == 1/Δ*(E_1(1 - υ_23*υ_32)*ε_11 + E_2(υ_12 + υ_13*υ_32)*ε_22 + E_3(υ_13 + υ_12*υ_23)*ε_33)
σ_22 == 1/Δ*(E_1(υ_21 + υ_23*υ_31)*ε_11 + E_2(1 - υ_31*υ_13)*ε_22 + E_3(υ_23 + υ_13*υ_21)*ε_33)  # (7)
σ_33 == 1/Δ*(E_1(υ_31 + υ_32*υ_21)*ε_11 + E_2(υ_32 + υ_31*υ_12)*ε_22 + E_3(1 - υ_21*υ_12)*ε_33)
σ_12 == G_12*γ_12
σ_13 == G_13*γ_13
σ_23 == G_23*γ_23
# где Δ == 1 - υ_12*υ_21 - υ_23*υ_32 - υ_13*υ_31 - 2*υ_12*υ_23*υ_31
# Обратимся к формулам (3). Пусть коэффициенты жёсткости связаны
# следующими четырьмя зависимостями:
C_22 == C_33
C_12 == C_13
C_44 == C_55
C_22 == C_23 + 2*C_66
# Количество независимых характеристик упругости сокращается до пяти. При
# этом для произвольного угла поворота φ будем иметь:
C'_22 == C'_33 == C_22
C'_23 == C'_32 == C_23
C'_66 == C_66
C'_11 == C_11
C'_16 == C'_61 == 0
C'_26 == C'_62 == 0  # (8)
C'_12 == C'_21 == C_12
C'_13 == C'_31 == C_12
C'_36 == C'_63 == 0
C'_44 == C'_55 == C_44
C'_45 == C'_54 == 0
# В новой системе координат соотношения закона Гука примут такой вид:
σ'_11 == C'_11ε'_11 + C'_12ε'_22 + C'_13ε'_33
σ'_22 == C'_12ε'_11 + C'_22ε'_22 + C'_23ε'_33
σ'_33 == C'_13ε'_11 + C'_23ε'_22 + C'_33ε'_33
σ'_12 == C'_44γ'_12
C' == [
    C'_11, C'_12, C'_12, 0, 0, 0;
    C'_12, C'_22, C'_23, 0, 0, 0;
    C'_12, C'_23, C'_22, 0, 0, 0;
    0, 0, 0, C'_44, 0, 0;
    0, 0, 0, 0, C'_44, 0;
    0, 0, 0, 0, 0, C'_66
]
σ'_13 == C'_44γ'_13
σ'_23 == C'_66γ'_23
# Как видно, при произвольном повороте системы координат на угол φ
# относительно оси Х3 определяющие соотношения остаются неизменными и
# имеют вид (1). Анизотропное тело, для которого выполняются равенства (8),
# называется трансверсально изотропным телом. Ось X_1 является осью
# симметрии n-го порядка, перпендикулярная ей плоскость X_2X_3 – плоскостью
# симметрии.
# Задача 1.
#
# Для линейно упругого материала, представленного на рисунке 1х записать
# общий вид матрицы жёсткости в двух ортогональных декартовых системах
# координат. Общий вид должен показывать априори равные друг-другу значения
# и нулевые значения коэффициентов матриц жёсткости. Охарактеризовать тип
# материала
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# Исходные данные:
# СК_1:  X_3X_1X_2;
# СК_2:  X~_2X~_1X~_3
# Материал является трансверсально изотропным, такой материал имеет ось симметрии.
# Количество независимых характеристик упругости равняется пяти.
E == f_1(A, B, C, D)
F == f_2(A, B, C, D)
C == [
    A, B, C, □, □, □;
    B, D, B, □, □, □;
    C, B, A, □, □, □;
    □, □, □, E, □, □;
    □, □, □, □, (A - C)/2, □;
    □, □, □, □, □, E
]
C' == [
    A, B, C, □, □, □;
    B, D, B, □, □, □;
    C, B, A, □, □, □;
    □, □, □, E, □, □;
    □, □, □, □, (A - C)/2, □;
    □, □, □, □, □, E
]
# X_3X_1  X_2; | X~_2X~_1X~_3
A == C + 2*F
F == (A - C)/2
# Задача 2.
#
# Построить область допустимых состояний многослойного композиционного материала в системе координат σ_11  — σ_22 многослойного композиционного материала, работающего в условиях плоского напряжённого состояния. Указать характерные значения напряжений.
# Схема армирования [ φ_1 δ_1/ φ_2 δ_2 ]. Материал монослоёв ортотропный, технические характеристики упругости которого заданы в осях ортотропии. Модули упругости 1о рода  E_1 Па и E_2 Па, сдвиговой модуль G_12  Па, коэффициент Пуассона v_12 ед. Гипотеза прочности материала монослоя согласно теории максимальных нормальных напряжений. В системе координат монослоя предел прочности на растяжение в направлении 1 F + _1Па, предел прочности на сжатие в направлении 1 F__1
# Па, предел прочности на растяжение в направлении 2 F + _2Па, предел прочности на сжатие в направлении 2F__2 Па.
# Исходные данные:
φ_1 := -45°
φ_2 := 45°
δ_1 := 0.5
v_12 := 0.1
F_1 := 10 Pa
F__1 := -6 Pa
E_1 := 10 Pa
E_2 := 4 Pa
δ_2 := 0.5
G_12 := 4*Pa
F_2 := 4 Pa
F__2 := -6 Pa
v_21 := v_12*E_2/E_1 = 0.04
C_11 := E_1/(1 - v_12*v_21)
C_22 := E_2/(1 - v_12*v_21)
C_12 := v_21*E_1/(1 - v_12*v_21)
C_33 := G_12
# Матрицы поворота:
T_11 := [
    cos(φ_1)^2, sin(φ_1)^2, 2*cos(φ_1)*sin(φ_1);
    sin(φ_1)^2, cos(φ_1)^2, -2*cos(φ_1)*sin(φ_1);
    -cos(φ_1)*sin(φ_1), cos(φ_1)*sin(φ_1), cos(φ_1)^2 - sin(φ_1)^2
]
T_12 := [
    cos(φ_2)^2, sin(φ_2)^2, 2*cos(φ_2)*sin(φ_2);
    sin(φ_2)^2, cos(φ_2)^2, -2*cos(φ_2)*sin(φ_2);
    -cos(φ_2)*sin(φ_2), cos(φ_2)*sin(φ_2), cos(φ_2)^2 - sin(φ_2)^2
]
T_21 := [
    cos(φ_1)^2, sin(φ_1)^2, cos(φ_1)*sin(φ_1);
    sin(φ_1)^2, cos(φ_1)^2, -cos(φ_1)*sin(φ_1);
    -2*cos(φ_1)*sin(φ_1), 2*cos(φ_1)*sin(φ_1), cos(φ_1)^2 - sin(φ_1)^2
]
T_22 := [
    cos(φ_2)^2, sin(φ_2)^2, cos(φ_2)*sin(φ_2);
    sin(φ_2)^2, cos(φ_2)^2, -cos(φ_2)*sin(φ_2);
    -2*cos(φ_2)*sin(φ_2), 2*cos(φ_2)*sin(φ_2), cos(φ_2)^2 - sin(φ_2)^2
]
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# Найдем глобальную матрицу жесткости и упругих податливостей.
# Матрица жесткости первого монослоя в локальной системе координат:
C_1 := [C_11, C_12, 0; C_12, C_22, 0; 0, 0, C_33]
# Матрица жесткости первого монослоя в глобальной системе координат:
C_1Σ := T_11*C_1*transpose(T_11) = [7.71486, -0.285141, 1.50602; -0.285141, 7.71486, 1.50602; 1.50602, 1.50602, 3.31325] Pa
# Матрица упругих податливостей первого монослоя глобальной системы координат:
S_1Σ := C_1Σ^-1 = [0.145, 0.02, -0.075; 0.02, 0.145, -0.075; -0.075, -0.075, 0.37] Pa^-1
# Матрица жесткости второго монослоя в локальной системе координат:
C_2 := C_1
# Матрица жесткости второго монослоя в глобальной системе координат:
C_2Σ := T_12*C_2*transpose(T_12) = [7.71486, -0.285141, -1.50602; -0.285141, 7.71486, -1.50602; -1.50602, -1.50602, 3.31325] Pa
# Матрица упругих податливостей второго монослоя в глобальной системы координат:
S_2Σ := C_2Σ^-1 = [0.145, 0.02, 0.075; 0.02, 0.145, 0.075; 0.075, 0.075, 0.37] Pa^-1
# В итоге получаем:
C_Σglobal := δ_1*C_1Σ + δ_2*C_2Σ = [7.71486, -0.285141, 0; -0.285141, 7.71486, 0; 0, 0, 3.31325] Pa
S_Σglobal := C_Σglobal^-1 = [0.129797, 0.0047973, 0; 0.0047973, 0.129797, 0; 0, 0, 0.301818] Pa^-1
# Соотношение для перевода в Σ систему координат:
σ_Σ == [C_Σ]*[T_2i]*[S_i]*σ_i
# Для первого монослоя:
S_1 := C_1^-1 = [0.1, -0.01, 0; -0.01, 0.25, 0; 0, 0, 0.25] Pa^-1
K_1 := C_Σglobal*T_21*S_1 = [0.334337, 0.891566, -1; 0.334337, 0.891566, 1; 0.364458, -0.861446, 0]
# Для точки 1 (A1):
σ_1 := [10; 4; 0] Pa
σ_Σ := K_1*σ_1 = [6.90964; 6.90964; 0.198795] Pa
σ_11Σ := σ_Σ[0, :] = [6.90964] Pa
σ_22Σ := σ_Σ[1, :] = [6.90964] Pa
τ_12Σ := σ_Σ[2, :] = [0.198795] Pa
# Для точки 2 (B1):
σ_2 := [-6; 4; 0] Pa
σ_Σ := K_1*σ_2
σ_11Σ := σ_Σ[0, :] = [1.56024] Pa
σ_22Σ := σ_Σ[1, :] = [1.56024] Pa
τ_12Σ := σ_Σ[2, :] = [-5.63253] Pa
# Для точки 3 (C1):
σ_3 := [-6; -6; 0] Pa
σ_Σ := K_1*σ_3
σ_11Σ := σ_Σ[0, :] = [-7.35542] Pa
σ_22Σ := σ_Σ[1, :] = [-7.35542] Pa
τ_12Σ := σ_Σ[2, :] = [2.98193] Pa
# Для точки 4 (D1):
σ_4 := [10; -6; 0] Pa
σ_Σ := K_1*σ_4
σ_11Σ := σ_Σ[0, :] = [-2.00602] Pa
σ_22Σ := σ_Σ[1, :] = [-2.00602] Pa
τ_12Σ := σ_Σ[2, :] = [8.81325] Pa
# Для второго монослоя:
S_2 := C_2^-1 = [0.1, -0.01, 0; -0.01, 0.25, 0; 0, 0, 0.25] Pa^-1
K_2 := C_Σglobal*T_22*S_2 = [0.334337, 0.891566, 1; 0.334337, 0.891566, -1; -0.364458, 0.861446, 0]
# Для точки 1 (A2):
σ_1 := [10; 4; 0] Pa
σ_1Σ := K_2*σ_1 = [6.90964; 6.90964; -0.198795] Pa
σ_11Σ := σ_1Σ[0, :] = [6.90964] Pa
σ_22Σ := σ_1Σ[1, :] = [6.90964] Pa
τ_12Σ := σ_1Σ[2, :] = [-0.198795] Pa
# Для точки 2 (B2):
σ_2 := [-6; 4; 0] Pa
σ_2Σ := K_2*σ_2
σ_11Σ := σ_2Σ[0, :] = [1.56024] Pa
σ_22Σ := σ_2Σ[1, :] = [1.56024] Pa
τ_12Σ := σ_2Σ[2, :] = [5.63253] Pa
# Для точки 3 (C2):
σ_3 := [-6; -6; 0] Pa
σ_3Σ := K_2*σ_3
σ_11Σ := σ_3Σ[0, :] = [-7.35542] Pa
σ_22Σ := σ_3Σ[1, :] = [-7.35542] Pa
τ_12Σ := σ_3Σ[2, :] = [-2.98193] Pa
# Для точки 4 (D2):
σ_4 := [10; -6; 0] Pa
σ_4Σ := K_2*σ_4
σ_11Σ := σ_4Σ[0, :] = [-2.00602] Pa
σ_22Σ := σ_4Σ[1, :] = [-2.00602] Pa
τ_12Σ := σ_4Σ[2, :] = [-8.81325] Pa
# В итоге получаем область допустимых значений для пакета в виде отрезка AB, полученного пересечением двух плоскостей
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