# Задача 2
φ_1 := -70 deg
E_1 := 10 Pa
ν_12 := 0.1
F_1 := 10 Pa
F_2 := 4 Pa
F_12 := 1 Pa
φ_2 := 70 deg
E_2 := 4 Pa
G_12 := 4 Pa
F__1 := -6 Pa
F__2 := -6 Pa
δ_1 := 0.5
δ_2 := 0.5
ν_21 := ν_12*E_2/E_1 = 0.04
C_11 := E_1/(1 - ν_12*ν_21) = 10.0402 Pa
C_22 := E_2/(1 - ν_12*ν_21) = 4.01606 Pa
C_12 := ν_21*E_1/(1 - ν_12*ν_21) = 0.401606 Pa
C_33 := G_12 = 4 Pa
T_1(φ) := [
    cos(φ)^2, sin(φ)^2, 2*cos(φ)*sin(φ);
    sin(φ)^2, cos(φ)^2, -(2*cos(φ)*sin(φ));
    -cos(φ)*sin(φ), cos(φ)*sin(φ), cos(φ)^2 - sin(φ)^2
]
T_2(φ) := [
    cos(φ)^2, sin(φ)^2, cos(φ)*sin(φ);
    sin(φ)^2, cos(φ)^2, -cos(φ)*sin(φ);
    -2*cos(φ)*sin(φ), 2*cos(φ)*sin(φ), cos(φ)^2 - sin(φ)^2
]
T_11 := T_1(φ_1) = [0.116978, 0.883022, -0.642788; 0.883022, 0.116978, 0.642788; 0.321394, -0.321394, -0.766044]
T_21 := T_2(φ_1) = [0.116978, 0.883022, -0.321394; 0.883022, 0.116978, 0.321394; 0.642788, -0.642788, -0.766044]
T_12 := T_1(φ_2) = [0.116978, 0.883022, 0.642788; 0.883022, 0.116978, -0.642788; -0.321394, 0.321394, -0.766044]
T_22 := T_2(φ_2) = [0.116978, 0.883022, 0.321394; 0.883022, 0.116978, -0.321394; -0.642788, 0.642788, -0.766044]
C_1 := [C_11, C_12, 0; C_12, C_22, 0; 0, 0, C_33] = [10.0402, 0.401606, 0; 0.401606, 4.01606, 0; 0, 0, 4] Pa
C_1Σ := T_11*C_1*transpose(T_11) = [5.0045, 0.117859, 1.30621; 0.117859, 9.61922, 0.629897; 1.30621, 0.629897, 3.71625] Pa
S_1Σ := C_1Σ^-1 = [
    0.220058, 0.00239528, -0.0777533;
    0.00239528, 0.105151, -0.0186648;
    -0.0777533, -0.0186648, 0.299581
] 1/Pa
C_2 := C_1 = [10.0402, 0.401606, 0; 0.401606, 4.01606, 0; 0, 0, 4] Pa
C_2Σ := T_12*C_2*transpose(T_12) = [5.0045, 0.117859, -1.30621; 0.117859, 9.61922, -0.629897; -1.30621, -0.629897, 3.71625] Pa
S_2Σ := C_2Σ^-1 = [0.220058, 0.00239528, 0.0777533; 0.00239528, 0.105151, 0.0186648; 0.0777533, 0.0186648, 0.299581] 1/Pa
C_Σ := C_1Σ*δ_1 + C_2Σ*δ_2 = [5.0045, 0.117859, 0; 0.117859, 9.61922, 0; 0, 0, 3.71625] Pa
S_Σ := C_Σ^-1 = [0.199878, -0.002449, 0; -0.002449, 0.103989, 0; 0, 0, 0.269088] 1/Pa
# Первый монослой
S_1 := C_1^-1 = [0.1, -0.01, 0; -0.01, 0.25, 0; 0, 0, 0.25] 1/Pa
K_1 := C_Σ*T_21*S_1 = [0.02462, 1.10132, -0.392634; 0.838484, 0.222249, 0.76342; 0.262764, -0.621078, -0.711704]
# Точка A1
σ := [F_1; F_2; F_12] = [10; 4; 1] Pa
σ_Σ := K_1*σ = [4.25886; 10.0373; -0.568378] Pa
# Точка A2
σ := [F_1; F_2; -F_12] = [10; 4; -1] Pa
σ_Σ := K_1*σ = [5.04412; 8.51042; 0.855029] Pa
# Точка B1
σ := [F_1; F__2; F_12] = [10; -6; 1] Pa
σ_Σ := K_1*σ = [-6.75437; 7.81477; 5.6424] Pa
# Точка B2
σ := [F_1; F__2; -F_12] = [10; -6; -1] Pa
σ_Σ := K_1*σ = [-5.9691; 6.28793; 7.06581] Pa
# Точка C1
σ := [F__1; F_2; F_12] = [-6; 4; 1] Pa
σ_Σ := K_1*σ = [3.86494; -3.37849; -4.7726] Pa
# Точка C2
σ := [F__1; F_2; -F_12] = [-6; 4; -1] Pa
σ_Σ := K_1*σ = [4.6502; -4.90533; -3.34919] Pa
# Точка D1
σ := [F__1; F__2; F_12] = [-6; -6; 1] Pa
σ_Σ := K_1*σ = [-7.14829; -5.60098; 1.43818] Pa
# Точка D2
σ := [F__1; F__2; -F_12] = [-6; -6; -1] Pa
σ_Σ := K_1*σ = [-6.36302; -7.12782; 2.86159] Pa
# Второй монослой
S_2 := C_2^-1 = [0.1, -0.01, 0; -0.01, 0.25, 0; 0, 0, 0.25] 1/Pa
K := C_Σ*T_22*S_1 = [0.02462, 1.10132, 0.392634; 0.838484, 0.222249, -0.76342; -0.262764, 0.621078, -0.711704]
# Точка A1
σ := [F_1; F_2; F_12] = [10; 4; 1] Pa
σ_Σ := K*σ = [5.04412; 8.51042; -0.855029] Pa
# Точка A2
σ := [F_1; F_2; -F_12] = [10; 4; -1] Pa
σ_Σ := K*σ = [4.25886; 10.0373; 0.568378] Pa
# Точка B1
σ := [F_1; F__2; F_12] = [10; -6; 1] Pa
σ_Σ := K*σ = [-5.9691; 6.28793; -7.06581] Pa
# Точка B2
σ := [F_1; F__2; -F_12] = [10; -6; -1] Pa
σ_Σ := K*σ = [-6.75437; 7.81477; -5.6424] Pa
# Точка C1
σ := [F__1; F_2; F_12] = [-6; 4; 1] Pa
σ_Σ := K*σ = [4.6502; -4.90533; 3.34919] Pa
# Точка C2
σ := [F__1; F_2; -F_12] = [-6; 4; -1] Pa
σ_Σ := K*σ = [3.86494; -3.37849; 4.7726] Pa
# Точка D1
σ := [F__1; F__2; F_12] = [-6; -6; 1] Pa
σ_Σ := K*σ = [-6.36302; -7.12782; -2.86159] Pa
# Точка D2
σ := [F__1; F__2; -F_12] = [-6; -6; -1] Pa
σ_Σ := K*σ = [-7.14829; -5.60098; -1.43818] Pa
