u_I(x) := u_0 + (u_1 - u_0)/l*x → x*(u_1 - u_0)/l + u_0
u_II(x) := u_1 + (u_2 - u_1)/l*x → x*(u_2 - u_1)/l + u_1
u_III(x) := u_2 + (u_3 - u_2)/l*x → x*(u_3 - u_2)/l + u_2
u'_I(x) := ∂/∂x(u_I(x)) → (u_1 - u_0)/l
u'_II(x) := ∂/∂x(u_II(x)) → (u_2 - u_1)/l
u'_III(x) := ∂/∂x(u_III(x)) → (u_3 - u_2)/l
П_1 := 1/2*integral(E*F*u'_I(x)^2, x = 0 .. l) + 1/2*integral(E*F*u'_II(x)^2, x = 0 .. l) + 1/2*integral(E*F*u'_III(x)^2, x = 0 .. l) - integral(q*u_I(x), x = 0 .. l) - integral(q*u_II(x), x = 0 .. l) + 1/2*c*u_I(0)^2 - F_2*u_II(l) - F_3*u_III(l) → E*F*(u_3 - u_2)^2/(2*l) + (E*F*(u_2 - u_1)^2/(2*l) + (E*F*(u_1 - u_0)^2/(2*l) + (u_0^2*c/2 - (F_3*u_3 + F_2*u_2)) - l*q*(u_1 + u_0)/2) - l*q*(u_2 + u_1)/2)
П := 1/2*E*F*(((u_1 - u_0)/l)^2*l + ((u_2 - u_1)/l)^2*l + ((u_3 - u_2)/l)^2*l) - q*((u_0 + u_1)*l + (u_2 - u_0)/l*l^2/2) + 1/2*c*u_0^2 - F_2*u_2 - F_3*u_3 → E*F*((u_3 - u_2)^2/l + (u_2 - u_1)^2/l + (u_1 - u_0)^2/l)/2 + (u_0^2*c/2 - (F_3*u_3 + F_2*u_2) - q*(l*(u_2 - u_0)/2 + l*(u_1 + u_0)))
П_1 - П simplify → 0
П_0 := ∂/∂u_0(П) == 0 → -l*q/2 + u_0*c + (u_0*E*F/l - u_1*E*F/l) == 0
П_1 := ∂/∂u_1(П) == 0 → -(u_2 + (u_0 - 2*u_1))*E*F/l - l*q == 0
П_2 := ∂/∂u_2(П) == 0 → -(l^2*q + (2*u_3 + (2*u_1 - 4*u_2))*E*F)/(2*l) - F_2 == 0
П_3 := ∂/∂u_3(П) == 0 → (u_3 - u_2)*E*F/l - F_3 == 0
u_1 := П_0 solve, u_1, simplify → -l^2*q/(2*E*F) + u_0*c*l/(E*F) + u_0
П_1 := П_1 → -E*F*(u_2 + (u_0 - 2*u_1))/l - l*q == 0
u_2 := П_1 solve, u_2, simplify → -2*l^2*q/(E*F) + 2*u_0*c*l/(E*F) + u_0
П_2 := П_2 → -(E*F*(2*u_3 + (2*u_1 - 4*u_2)) + l^2*q)/(2*l) - F_2 == 0
u_3 := П_2 solve, u_3, collect, u_0 → u_0*(3*c*l + E*F)/(E*F) - (4*l^2*q + F_2*l)/(E*F)
П_3 := П_3 → E*F*(u_3 - u_2)/l - F_3 == 0
u_0 := П_3 solve, u_0 → (2*l*q + F_3 + F_2)/c
u_1 := u_1 → -l^2*q/(2*E*F) + u_0*c*l/(E*F) + u_0
u_1 simplify → 3*l^2*q/(2*E*F) + 2*l*q/c + F_3*l/(E*F) + F_2*l/(E*F) + F_3/c + F_2/c
u_2 := u_2 → -2*l^2*q/(E*F) + 2*u_0*c*l/(E*F) + u_0
u_2 simplify, expand → 2*l^2*q/(E*F) + 2*l*q/c + 2*F_3*l/(E*F) + 2*F_2*l/(E*F) + F_3/c + F_2/c
u_3 := u_3 → u_0*(3*c*l + E*F)/(E*F) - (4*l^2*q + F_2*l)/(E*F)
u_3 simplify, expand → 2*l^2*q/(E*F) + 2*l*q/c + 3*F_3*l/(E*F) + 2*F_2*l/(E*F) + F_3/c + F_2/c
c := 7*E*F/l → 7*E*F/l
q := E*F/l → E*F/l
F_2 := 0.5*E*F → 0.5*E*F
F_3 := 0.2*E*F → 0.2*E*F
u_0 := u_0 → (2*l*q + F_3 + F_2)/c
u_0 → 0.385714285714*l
u_1 := u_1 → l*(2*l*q + F_3 + F_2)/(E*F) + ((2*l*q + F_3 + F_2)/c - l^2*q/(2*E*F))
u_1 → 2.58571428571*l
u_2 := u_2 → l*(4*l*q + 2*F_3 + 2*F_2)/(E*F) + ((2*l*q + F_3 + F_2)/c - 2*l^2*q/(E*F))
u_2 → 3.78571428571*l
u_3 := u_3 → (3*c*l + E*F)*(2*l*q + F_3 + F_2)/(E*F*c) - (4*l^2*q + F_2*l)/(E*F)
u_3 → 3.98571428571*l
u_I(x) := u_0 + (u_1 - u_0)/l*x → 2.2*x + 0.385714285714*l
u_II(x~) := u_1 + (u_2 - u_1)/l*x~ → 1.2*x~ + 2.58571428571*l
x~(x) := x - l → x - l
u_II(x) := u_II(x~(x)) → 1.2*x + 1.38571428571*l
u_III(x#) := u_2 + (u_3 - u_2)/l*x# → 0.2*x# + 3.78571428571*l
x#(x) := x - 2*l → x - 2*l
u_III(x) := u_III(x#(x)) → 0.2*x + 3.38571428571*l
# Построение графиков
u_I_безр(x) := u_I(x) substitute, l == 1 → 2.2*x + 0.385714285714
u_II_безр(x) := u_II(x) substitute, l == 1 → 1.2*x + 1.38571428571
u_III_безр(x) := u_III(x) substitute, l == 1 → 0.2*x + 3.38571428571
u_Iанал(x) := -x^2/(2 l) + 2.7*x + 0.386 l → -1.0*0.5*x^2/l + 2.7*x + 0.386*l
u_IIанал(x) := 0.2*x + 3.386 l → 0.2*x + 3.386*l
u_Iанал_безр(x) := u_Iанал(x) substitute, l == 1 → -0.5*x^2 + 2.7*x + 0.386
u_IIанал_безр(x) := u_IIанал(x) substitute, l == 1 → 0.2*x + 3.386
u_0 → 0.385714285714*l
u_1 → 2.58571428571*l
x_1 := 0, 0.01 .. 1
x_2 := 1, 1 + 0.01 .. 2
x_3 := 2, 2 + 0.01 .. 3
u_2 → 3.78571428571*l
# [chart]
    X[1] := x_1
    Y[1] := u_I_безр(x_1)
    X[2] := x_2
    Y[2] := u_II_безр(x_2)
    X[3] := x_1
    Y[3] := u_Iанал_безр(x_1)
    X[4] := x_2
    Y[4] := u_Iанал_безр(x_2)
    X[5] := x_3
    Y[5] := u_III_безр(x_3)
    X[6] := x_3
    Y[6] := u_IIанал_безр(x_3)
u_3 → 3.98571428571*l
N_I_безр(x) := ∂/∂x(u_I_безр(x)) → 2.2
N_II_безр(x) := ∂/∂x(u_II_безр(x)) → 1.2
N_III_безр(x) := ∂/∂x(u_III_безр(x)) → 0.2
N_Iанал_безр(x) := ∂/∂x(u_Iанал_безр(x)) → -1.0*x + 2.7
N_IIанал_безр(x) := ∂/∂x(u_IIанал_безр(x)) → 0.2
x_1 := 0, 0.01 .. 1
x_2 := 1, 1 + 0.01 .. 2
x_3 := 2, 2 + 0.01 .. 3
# [chart]
    X[1] := x_1
    Y[1] := N_I_безр(x_1)
    X[2] := x_2
    Y[2] := N_II_безр(x_2)
    X[3] := x_1
    Y[3] := N_Iанал_безр(x_1)
    X[4] := x_2
    Y[4] := N_Iанал_безр(x_2)
    X[5] := x_3
    Y[5] := N_III_безр(x_3)
    X[6] := x_3
    Y[6] := N_IIанал_безр(x_3)
N_Iанал_безр(0) = 2.7
N_Iанал_безр(2) = 0.7
N_IIанал_безр(3) = 0.2
# Построение только аналитического решения
u_Iанал_безр(x) → -0.5*x^2 + 2.7*x + 0.386
u_IIанал_безр(x) → 0.2*x + 3.386
x_1 := 0, 0.01 .. 2
x_2 := 2, 2 + 0.01 .. 3
# [chart]
    X[1] := x_1
    Y[1] := u_Iанал_безр(x_1)
    X[2] := x_2
    Y[2] := u_IIанал_безр(x_2)
u_Iанал_безр(0) = 0.386
u_Iанал_безр(2) = 3.786
u_IIанал_безр(3) = 3.986
N_Iанал_безр(x) → -1.0*x + 2.7
N_IIанал_безр(x) → 0.2
# [chart]
    X[1] := x_1
    Y[1] := N_Iанал_безр(x_1)
    X[2] := x_2
    Y[2] := N_IIанал_безр(x_2)
N_Iанал_безр(0) = 2.7
N_Iанал_безр(2) = 0.7
N_IIанал_безр(3) = 0.2
# Нахождение погрешности
П_эн := П → E*F*((u_3 - u_2)^2/l + (u_2 - u_1)^2/l + (u_1 - u_0)^2/l)/2 + (u_0^2*c/2 - (F_3*u_3 + F_2*u_2) - q*(l*(u_2 - u_0)/2 + l*(u_1 + u_0)))
П_эн → -3.68071428571*E*F*l
u_Iанал(x) → -1.0*0.5*x^2/l + 2.7*x + 0.386*l
u_IIанал(x) → 0.2*x + 3.386*l
u'_Iанал(x) := ∂/∂x(u_Iанал(x)) → -1.0*x/l + 2.7
u'_IIанал(x) := ∂/∂x(u_IIанал(x)) → 0.2
П_анал := 1/2*integral(E*F*u'_Iанал(x)^2, x = 0 .. 2*l) + 1/2*integral(E*F*u'_IIанал(x)^2, x = 2*l .. 3*l) - integral(q*u_Iанал(x), x = 0 .. 2*l) + 1/2*c*u_Iанал(0)^2 - F_2*u_Iанал(2*l) - F_3*u_IIанал(3*l) → -3.76404733333*E*F*l
П_анал → -3.76404733333*E*F*l
Δ := |(П_эн - П_анал)/П_анал|*100 → 2.21392135219
# Для патрана
E := 7.31*10^10 Pa
l := 0.5 m
ν := 0.33
R_1 := 150 mm
R_2 := 110 mm
F := π*(R_1^2 - R_2^2) = 32672.6 mm^2
c := 7*E*F/l = 3.34371e10 N/m
q := E*F/l = 4.77673e9 N/m
F_2 := 0.5*E*F = 1.19418e9 N
F_3 := 0.2*E*F = 477672880 N
x := 0
u_Iанал_безр(x)*l = 0.193 m
u_I_безр(x)*l = 0.192857 m
u_МКЭ1 := 1.928439*10^-1 m = 0.192844 m
x := 1
u_Iанал_безр(x)*l = 1.293 m
u_I_безр(x)*l = 1.29286 m
u_МКЭ2 := 1.292854*10^0 m = 1.29285 m
x := 2
u_Iанал_безр(x)*l = 1.893 m
u_II_безр(x)*l = 1.89286 m
u_МКЭ3 := 1.892836*10^0 m = 1.89284 m
x := 3
u_IIанал_безр(x)*l = 1.993 m
u_III_безр(x)*l = 1.99286 m
u_МКЭ3 := 1.992841*10^0 m = 1.99284 m
x := 0
N_Iанал_безр(x)*E = 197370000000 Pa
N_I_безр(x)*E = 160820000000 Pa
N_МКЭ1 := 1.973735*10^11 Pa
x := 1 - 0
N_Iанал_безр(x)*E = 1.2427e11 Pa
N_I_безр(x)*E = 160820000000 Pa
N_МКЭ2 := 1.242694*10^11 Pa
x := 1 + 0
N_Iанал_безр(x)*E = 1.2427e11 Pa
N_II_безр(x)*E = 87720000000 Pa
N_МКЭ2 := 1.242694*10^11 Pa
x := 2 - 0
N_Iанал_безр(x)*E = 5.117e10 Pa
N_II_безр(x)*E = 87720000000 Pa
N_МКЭ3 := 5.116525*10^10 Pa
x := 2 + 0
N_IIанал_безр(x)*E = 14620000000 Pa
N_III_безр(x)*E = 14620000000 Pa
N_МКЭ4 := 1.462083*10^10 Pa
x := 3
N_IIанал_безр(x)*E = 14620000000 Pa
N_III_безр(x)*E = 14620000000 Pa
N_МКЭ4 := 1.462083*10^10 Pa
