# Исходные данные для курсового проектирования:
# Дано:
# Основные характеристики УБР
L_max := 6000 km  # - дальность полета
n_ББ := 4  # - число боевых блоков (ББ)
# Параметры поражаемых целей
# Точечная цель
ΔP_ф := 8 MPa  # - давление во фронте ударной волны, требуемое для поражения точечной цели
P_1тр' := 0.9  # - требуемая вероятность поражения точечной цели
σ_r := 0.15 km  # - среднеквадратичное отклонение точки падения боевого блока от точки прицеливания
# Площадная цель
Δp_ф := 0.03 MPa  # - давление во фронте ударной волны, требуемое для поражения площадной цели
M_1тр' := 0.9  # - требуемое математическое ожидание поражения части площадной цели
R_ц := 3 km  # - требуемый радиус поражения площадной цели
ΔL := 200 km  # - параметры разведения боевых блоков
ΔB := 100 km
# Требования к УБР
τ_Σ := 125 s  # - суммарное время работы ДУ маршевых ступеней, не более
h_к := 100 km  # - высота окончания АУТ, не более
n_x.max := 20  # - допустимая осевая перегрузка, не более
T_экспл := 0 °C
T_min := -40 °C
T_max := 40 °C  # - температурный режим эксплуатации
ΔT_экспл := 40 °C
# Характеристики топлива
J_1T.0 := 2520 m/s  # - удельный импульс при стандартных условиях.
ρ_T := 1.81 gm/cm^3  # - плотность топлива
u_min := 5 mm/s
u_max := 13 mm/s  # - диапазон скоростей горения топлива при стандартных условиях
ν := 0.25  # - показатель степени в законе горения
K_T := 0.0015  # - коэффициент теплопроводности топлива
Δu'_1 == Δu_1/u_1
Δu'_1 := 0.02  # - разброс скоростей горения топлива
Δ_сл := 0.035  # - случайная составляющая отклонения давления от номинального значения
k := 1.15  # - показатель адиабаты продуктов сгорания
z := 0.33  # - массовая доля конденсированной фазы в продуктах сгорания
J_1ДУ := 2100 m/s  # - удельный импульс топлива доводочной ДУ
# Базирование: мобильное (ПГРК)
# Материалы:
# - органопластик
σ_K := 130 km  # - удельная прочность материала силовых оболочек корпусов ДУ ступеней
ρ_ср := 1.1 gm/cm^3  # - средняя плотность ТЗП силовых оболочек корпусов ДУ ступеней
# Топливо:
ΔT111 := 18.708
# 1. ФОРМИРОВАНИЕ ПОЛЕЗНОЙ НАГРУЗКИ
# 1.1 Определение требуемых значений параметров боевого оснащения
# Стрельба по точечной цели:
K_ц := 0.97*(ΔP_ф/MPa)^-0.37 = 0.449395  # - коэффициент защищенности точечной цели
q_1потр.тч := (2/n_ББ)^(3/2)*(σ_r/K_ц)^3*ln(1/(1 - P_1тр'))^(3/2) 1/km^3 = 0.0459375
# Стрельба по площадной цели:
K_ц := 0.78*(Δp_ф/MPa)^-0.5 = 4.50333  # - коэффициент защищенности площадной цели
q_1потр.пл := (M_1тр'/n_ББ)^(3/2)*(R_ц/K_ц)^3 1/km^3 = 0.0315526
# Выберем большее значение потребной мощности:
q_1потр := 0.046
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# Из таблицы выберем ближайшее большее значение массы ББ:
m_ББ := 100 kg  # (при q = 0.1)
# Теперь определим геометрические характеристики ББ:
d_ББ := 0.037*sqrt(m_ББ/kg) m = 0.37 m  # - диаметр ББ
l_ББ := 3.5*d_ББ = 1.295 m  # - длина ББ
R := 0.1*d_ББ = 0.037 m  # - радиус закругления носка ББ
m_БО := n_ББ*m_ББ = 400 kg  # - масса боевого оснащения
# 1.2 Боевая ступень
m_ПЛ := 10 kg*n_ББ + 0.1*m_БО = 80 kg  # - масса платформы разведения
m_СУ := 95 kg + sqrt(n_ББ)*5 kg = 105 kg  # - масса системы управления и приборного отсека
m_КБС := 45 kg + 0.06*m_БО = 69 kg  # - масса конструкции боевой ступени (приборный и агрегатный отсеки)
# Параметры доводочной ДУ
# В качестве начального значения массы полезной нагрузки примем ее следующее приближенное значение, полученное по алгоритму из пособия [2].
K_З := 1.10  # - коэффициент учета затрат массы на защиту УБР от ПФЯВ и ОНФП
K_S := 1.00  # - коэффициент учета влияния размера зоны разведения УБР с РГЧ
K_L := (10000*m/L_max)^0.15 = 0.383069  # - коэффициент учета  значения максимальной дальности стрельбы
# Приближенное значение массы полезной нагрузки:
m'_ПН := K_З*(155*kg*n_ББ^0.156 + 1.16*m_БО)*(1 + 0.132*(2*n_ББ - 1)*K_S*K_L/n_ББ) = 785.958 kg
m_ПН := m'_ПН
# Полный запас топлива двухрежимной доводочной ДУ с РГЧ
ω == Δω_гар + sum(Δω_нав1, q = 1 .. q) + sum(Δω_разв1, p = 1 .. p)
# где sum(Δω_нав1, q = 1 .. q)и  sum(Δω_разв1, p = 1 .. p) - затраты топлива на участках наведения и разведения (переприцеливания); q  и p - число участков наведения и операций разведения
L'_Vk := 2.78*km/(m/s)  # - производная дальность по конечной скорости
B'_VB := 0.97*km/(m/s)  # - производная бокового отклонения по боковой скорости
ΔL_гар := 0.04*L_max = 240 km
ΔV_гар := ΔL_гар/L'_Vk = 86.3309 m/s  # - потребная величина приращения скорости для компенсации максимального недолета на участке работы маршевых ступеней
ΔV_ΔL1 := ΔL/L'_Vk = 71.9424 m/s  # - необходимая величина приращения скорости для единичной операции разведения ББ по дальности на величину ΔL
ΔV_ΔB1 := ΔB/B'_VB = 103.093 m/s  # - необходимая величина приращения скорости для единичной операции разведения ББ в боковом направлении на величину ΔB
α := 15°  # - угол наклона прямых сопел доводочной ДУ к оси БС
# Тогда потребные затраты топлива доводочной ДУ на компенсацию погрешностей работы
# маршевых ступеней:
Δω_гар(m_ПН) := ΔV_гар*m_ПН/(J_1ДУ*cos(α))
Δω_гар(m_ПН) = 33.4505 kg
# Единичные операции разведения элементов БО по дальности и в боковом направлении:
Δω_L1 == ΔV_ΔL1*m_ПНλ/(J_1ДУ*cos(α))
# , где m_ПНλ и m_ПНρ - текущее значение массы полезной нагрузки в начале единичной операции разведения ББ по λ - направлению (дальности) и по ρ - направлению (по боку)
Δω_B1 == ΔV_ΔB1*m_ПНρ/(J_1ДУ*cos(α))
# Расчет sum(Δω_нав1, q = 1 .. q) выполняем с учетом четырех  участков наведения одного ББ на одну цель (по числу ББ)
P_min(m_ПН) := 0.5*m/s^2*m_ПН  # - уровень тяги доводочных ДУ с РГЧ на пониженном режиме
t_нав1 := 20*s  # - продолжительность каждого участка
β := 25°  # - угол наклона обратных сопел к оси БС
Δω_нав1(m_ПН) := P_min(m_ПН)*t_нав1/(J_1ДУ*cos(β))
sum(Δω_нав1(m_ПН), q = 1 .. 4) = 16.5183 kg
# Расчет sum(Δω_разв1, p = 1 .. p) проводим для единичных операций разведения по дальности и в боковом направлении по следующей схеме:
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sum(Δω_разв1, p = 1 .. p) == sum(Δω_L1, p = 1 .. p_L) + sum(Δω_B1, p = 1 .. p_B)
# , где p_L и p_B - число реализуемых операций перенацеливания по дальности и в боковом направлении
# Так как m_ПНλ(m_ПН) := m_ПН - Δω_гар(m_ПН) - m_ББ
m_ПНλ(m_ПН) = 652.508 kg
Δω_L1(m_ПН) := ΔV_ΔL1*m_ПНλ(m_ПН)/(J_1ДУ*cos(α))
Δω_L1(m_ПН) = 23.1424 kg
# Соответственно  m_ПНρ(m_ПН) := m_ПНλ(m_ПН) - Δω_L1(m_ПН) - m_ББ
Δω_B1(m_ПН) := ΔV_ΔB1*m_ПНρ(m_ПН)/(J_1ДУ*cos(α))
m_ПНρ(m_ПН) = 529.365 kg
Δω_B1(m_ПН) = 26.9042 kg
# Тогда sum(□, p = 1 .. 3) Δω_разв1(m_ПН) := sum(Δω_L1(m_ПН), p = 1 .. 2) + sum(Δω_B1(m_ПН), p = 1 .. 1)
Δω_разв1(m_ПН) = 73.189 kg
# Общий запас топлива доводочной ДУ :
ω(m_ПН) := Δω_гар(m_ПН) + sum(Δω_нав1(m_ПН), q = 1 .. 4) + sum(Δω_разв1(m_ПН), p = 1 .. 1)
ω_ДУБС(m_ПН) := ω(m_ПН)  # - масса топлива доводочной ДУ БС
m_К(m_ПН) := 13.8 kg^(2/3)*nthroot(ω_ДУБС(m_ПН), 3)  # - масса конструкции доводочной ДУ
m_ДУБС(m_ПН) := 13.8 kg^(2/3)*nthroot(ω_ДУБС(m_ПН), 3) + ω_ДУБС(m_ПН)  # - масса доводочной ДУ БС
m_ДУБС(m_ПН) = 191.817 kg
# где ω_ДУБС(m_ПН) = 123.158 kg- масса топлива доводочной ДУ БС
m_К(m_ПН) = 68.6593 kg
ω_ДУБС(m_ПН) = 123.158 kg
m_ПНn(m_ПН) := K_З*(m_БО + m_ПЛ + m_СУ + m_КБС + m_ДУБС(m_ПН))  # - масса полезной нагрузки
m_ПН1 := m_ПНn(m_ПН) = 930.399 kg
# Полученное значение массы полезной нагрузки отличается от значения перового приближения m'_ПН = 785.958 kg на m_ПН - m_ПН1 = -144.441 kg , поэтому требуется второе приближение.
m_ПН := 790 kg
m_ПНn(m_ПН) = 931.339 kg
m_ПН := 960 kg
m_ПНn(m_ПН) = 970.436 kg
m_ПН := 970 kg
m_ПНn(m_ПН) = 972.712 kg
# Окончательно примем m_ПН := 975 kg
# Потребные затраты топлива доводочной ДУ на компенсацию погрешностей работы маршевых ступеней
ΔL_гар := 0.04*L_max
ΔV_гар == ΔL_гар/L'_Vk
# L'_Vk определим по таблице. Для этого необходимо с помощью линейной интерполяции значений частных производных дальности определить необходимые производные для заданной дальности
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L_M := transpose([1000, 2500, 4500, 6000, 8000, 10000, 12000]) km
L'_VkM := transpose([0.66, 1.23, 2.05, 2.78, 4.04, 5.69, 8]) km/(m/s)
θ'_KM := transpose([42.7, 38.4, 34.9, 31.5, 27, 22.5, 18]) deg
L := 1000 km, 1100 km .. 12000 km
L'_Vk(L) := linterp(L_M, L'_VkM, L)
L'_Vk(11000 km) = 6.845 km/(m/s)
ΔV_гар := ΔL_гар/L'_Vk(11000 km) = 35.0621 m/s  # - разброс скорости после работы маршевых ступеней
R := 2*m_ПН*N/kg = 1950 N/kg
m'_БС := R/J_1ДУ = 0.928571 kg/s/kg  # - секундный массовый расход
Δω_ГАР := m_ПН*(1 - exp(-ΔV_гар/(J_1ДУ*cos(10°)))) = 16.3906  # - количество затраченного топлива
m_ПН - Δω_ГАР = 958.609  # - масса ПН после отработки промаха
Δt_ГАР := Δω_ГАР/m'_БС = 17.6514 s  # - время отработки
# Разворот и стабилизация на ν направлении
t_разв := 5 s
Δω_РАЗВ := t_разв*m'_БС = 4.64286  # - потребная масса топлива на разворот и стабилизацию
# Масса ступени после отделения ТЛЦ и одной кассеты СМ, компенсации промаха и разворота
m_ПНυ1 := m_ПН - Δω_РАЗВ - Δω_ГАР - m_ТЛЦ - m_ЛСП
# Импульс на ν направлении, отделение второй ТЛЦ и кассеты СМ
ΔV_ν := 10 m/s  # - принятая величина импульса скорости
Δω_υ2 := m_ПНυ1*(1 - exp(-ΔV_ν/(J_1ДУ*cos(10°))))
Δt_ν2 := Δω_υ2/m'_БС
m_ПНυ2 := m_ПНυ1 - Δω_υ2 - m_ТЛЦ - m_ЛСП
# Импульс на ν направлении, отделение ББ и  третьей кассеты СМ
Δω_υ3 := m_ПНυ2*(1 - exp(-ΔV_ν/(J_1ДУ*cos(10°))))
Δt_ν3 := Δω_υ3/m'_БС
m_ПНυ3 := m_ПНυ2 - m_ББ - m_ЛСП - Δω_υ3  # - масса ступени после построения боевого порядка
# Увод ступени:
t_отх := 5 s
Δω_увод := t_отх*m'_БС = 4.64286
Δω_Σ := Δω_увод + Δω_υ3 + Δω_υ2 + Δω_РАЗВ + Δω_ГАР
# Остаток топлива после построения боевого порядка:
Δω := ω - Δω_Σ
# Так как полученное значение меньше двух килограмм, то считаем, что данная боевая ступень пригодна. Окончательно получим массу полезной нагрузки для нашей ракеты, округлив ее в большую сторону.
m_ПН := 420 kg
# Представим таблицу со всеми этапами работы БС.
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# 2. ПРИБЛИЖЕННОЕ БАЛЛИСТИЧЕСКОЕ ПРОКТИРОВАНИЕ
# 2.1 Определение требуемого  значения скорости в конце АУТ и характеристической скорости по заданной дальности
# Для дальности 11000 км из таблицы 2 следует:
h_k := 150 km
ΔV_C := 1000 m/s
R := 6371 km
r_k := R + h_k = 6521 km
μ_0 := 3.986*10^5 km^3/s^2
V_1 := sqrt(μ_0/r_k)*1/(1 + h_k/L_max) = 7627.6 m/s
V_k := V_1*(1 - tan(π/4*(1 - L_max/(π*R)))^2)^0.5 = 6026.17 m/s
K_VV_K := V_k + ΔV_C = 7026.17 m/s
# 2.2 Распределение относительных масс топлива по ступеням ракеты:
# Необходимо нулевое приближение:
μ_ср == μ_1 == μ_2 == μ_3
# Из опыта ракетостроения можно принять в рамках приближенного проектирования следующие значения:
μ_1 == 0.85*μ_ср
μ_2 == μ_ср
μ_3 == 1 - exp(-K_VV_K/J_1ср)/((1 - μ_1)*(1 - μ_2))
# Тогда
J_1П1 := 1.095*J_1T.0 = 2759.4 m/s
J_1П2 := 1.135*J_1T.0 = 2860.2 m/s
J_1T.0 = 2520 m/s
J_1П3 := 1.145*J_1T.0 = 2885.4 m/s
J_1ср := (J_1П1 + J_1П2 + J_1П3)/3 = 2835 m/s
μ := 1 - nthroot(exp(-K_VV_K/J_1ср), 3) = 0.562256
μ_1 := 0.85*μ = 0.477918
μ_2 := μ = 0.562256
μ_3 := 1 - exp(-K_VV_K/J_1ср)/((1 - μ_1)*(1 - μ_2)) = 0.632971
# 2.3 Время работы ДУ ступеней, уточнение коэффициентов μ_i
# Из рекомендаций:
τ_N1 == 55 .. 60 s
τ_N2 == 35 .. 40 s
τ_N3 == 30 .. 35 s
# Необходимо соблюдение условия в связи с отклонением среднего давления от номинального значения:
Στ_Ni ≤ τ_Σ*(1 - Δp/p_N)
Δp/p_N == Δpp_N
ΔT := 40
ΔT_экспл = 40 °C
Δpp_N := 1/(1 - ν)*sqrt(Δu'_1^2 + Δ_сл^2 + (K_T*ΔT)^2) = 0.0963789
Στ_Ni := τ_Σ*(1 - Δpp_N) = 112.953 s
τ_Σ = 125 s
# Примем, что
τ_N1 := 55 s
τ_N2 := 40 s
τ_N3 := 33 s
# Теперь при принятом времени работы каждой ступени необходимо проверить соответствие коэффициентов μ_i на ограничение осевой перегрузки для 2 и 3 ступени:
μ_i ≤ τ_Ni*g*n_x.max(1 - Δp/p_N)/(J_1Пi + τ_Ni*g*n_x.max(1 - Δp/p_N))
# Тогда для второй ступени
τ_N2*g*n_x.max*(1 - Δpp_N)/(J_1П2 + τ_N2*g*n_x.max*(1 - Δpp_N)) = 0.712525
μ_2 = 0.562256  # - условие выполняется
# Третья ступень:
τ_N3*g*n_x.max*(1 - Δpp_N)/(J_1П3 + τ_N3*g*n_x.max*(1 - Δpp_N)) = 0.669635
μ_3 = 0.632971  # - условие не выполняется
# Переопределим μ_i из полученных условий. Запишем в блок решения необходимые ограничения для μ_i в виде:
solve block
    # guess values
    μ_1 := 0.5
    # constraints
    τ_N2*g*n_x.max*(1 - Δpp_N)/(J_1П2 + τ_N2*g*n_x.max*(1 - Δpp_N)) ≥ μ_2
    (1 - μ_1)*(1 - μ_2)*(1 - μ_3) == exp(-K_VV_K/J_1ср)
    τ_N3*g*n_x.max*(1 - Δpp_N)/(J_1П3 + τ_N3*g*n_x.max*(1 - Δpp_N)) ≥ μ_3
    μ_3 > μ_2
    # solver
    Find(μ_1, μ_2, μ_3) = [0.5; 0.562256; 0.616761]
end solve block
μ_1 = 0.477918
μ_2 = 0.562256
μ_3 = 0.632971
# Окончательно примем
μ_1 := 0.518
μ_2 := 0.628
μ_3 := 0.67
# Для справки приведем значения осевых перегрузок
n_xmax1 := J_1П1*μ_1/(τ_N1*(1 - Δpp_N)*g*(1 - μ_1)) = 6.08454
n_xmax2 := J_1П2*μ_2/(τ_N2*(1 - Δpp_N)*g*(1 - μ_2)) = 13.6222
n_xmax3 := J_1П3*μ_3/(τ_N3*(1 - Δpp_N)*g*(1 - μ_3)) = 20.033  # - пренебрегаем превышением
# 2.3 Величина стартовой массы ракеты и величины ее относительной грузоподъемности
Λ_0 := 1.6
m_0 := Λ_0*m_ПН*exp(K_VV_K/J_1ср) + 0.01*(L_max/km)^(2/3)*tonne = 11.3134 tonne
m'_ПН := m_ПН/m_0 = 0.0371243
# 2.4 Относительные массы конструкций ступеней ракеты
# Обобщенная относительная масса конструкции
α := (1 - μ - nthroot(m'_ПН, 3))/μ = 0.185234
# С учетом масштабного эффекта
α_1 := 0.9*α = 0.16671
α_3 := 1.03*α = 0.190791
α_2 := (1 - μ_2)/μ_2 - m'_ПН/(μ_2*(1 - μ_1*(1 + α_1))*(1 - μ_3*(1 + α_3))) = -0.146698
# 2.5 Определение других параметров
# Среднее давление в камерах сгорания двигателей ступеней
p_N1 := 12 MPa
l'_y1 := 0.15
p_N2 := 10 MPa
l'_y2 := 0.1
p_N3 := 8 MPa
l'_y3 := 0.07
# Определим массовые и тяговые характеристики ракеты по ступеням
ω_1 := μ_1*m_0 = 5.86032 tonne
m_K1 := ω_1*α_1 = 0.976975 tonne
m'_1 := ω_1/τ_N1 = 106.551 kg/s
P_П1 := m'_1*J_1П1 = 294.017 kN
# Масса второй субракеты:
m_02 := m_0*(1 - μ_1*(1 + α_1)) = 4.47606 tonne
ω_2 := μ_2*m_02 = 2.81097 tonne
m_K2 := ω_2*α_2 = -0.412362 tonne
m'_2 := ω_2/τ_N2 = 70.2742 kg/s
P_П2 := m'_2*J_1П2 = 200.998 kN
# Масса третьей субракеты:
m_03 := m_02*(1 - μ_2*(1 + α_2)) = 2.07746 tonne
ω_3 := μ_3*m_03 = 1.3919 tonne
m_K3 := ω_3*α_3 = 0.265561 tonne
m'_3 := ω_3/τ_N3 = 42.1787 kg/s
P_П3 := m'_3*J_1П3 = 121.702 kN
# Диаметры ступеней
D_1 := 0.52*nthroot(m_0/tonne, 3) m = 1.16735 m
D_1 := 1.4 m
# - данное значение принимаем в результате уточнения времени работы ДУ ступеней в пункте 2.6. Переопределенные значения времени работы второй и третьей ступеней в дальнейшем так же удовлетворяют ранее принятым значениям τ_N2, τ_N3
D_2 := 0.85*D_1 = 1.19 m
D_3 := D_2 = 1.19 m
# Размеры сопел
d'_a1 := sqrt(0.9*p_N1/MPa + 5) = 3.97492  # - степень расширения сопла первой ступени
# Диаметры среза сопел второй и третьей ступени рассчитаем из условия их размещения в перехоодных отсеках
d_a2 := 0.85*D_1 = 1.19 m
d_a3 := 0.85*D_2 = 1.0115 m
# Диаметры критических сечений сопел маршевых ДУ ступеней выразим из слудующего соотношения:
m'_i*β == p_Ni*F_крi
β := 0.647*J_1T.0 = 1630.44 m/s  # - расходный комплекс в зависимости от теоретического удельного импульса в стандартных условиях
F_крi
# - площадь критического сечения сопла двигателя данной ступени
F_кр1 := m'_1*β/p_N1 = 0.0144771 m^2
d_кр1 := sqrt(4*F_кр1/π) = 13.5768 cm
d_кр1 = 0.135768 m
F_кр2 := m'_2*β/p_N2 = 0.0114578 m^2
d_кр2 := sqrt(4*F_кр2/π) = 12.0783 cm
d_кр2 = 0.120783 m
F_кр3 := m'_3*β/p_N3 = 0.00859622 m^2
d_кр3 := sqrt(4*F_кр3/π) = 10.4619 cm
d_кр3 = 0.104619 m
# Рассчитаем диаметр выходного сечения сопла первой ступени, а также степени расширения сопел второй и третьей ступеней
d_a1 := d'_a1*d_кр1 = 0.539665 m
d'_a2 := d_a2/d_кр2 = 9.85239
d'_a3 := d_a3/d_кр3 = 9.66845
# Зная значения степеней расширения сопел ДУ каждой ступени, можем рассчитать значение практического удельного импульса в пустоте каждого РДТТ
J_1Пi == J_1Ti*(1 - ζ_i)
# где ζ_i- суммарные потери удельного импульса
ζ_i == 0.025*(d'_ai^1.25 - 1)/d'_ai*(1 + 11.6*z/nthroot(d_крi, 3))
J_1Ti == J_1T.0*(1.57/sqrt(k) - 0.66/nthroot(d'_ai^2, 3))  # - теоретичесоке значение удельного импульса в пустоте в зависимости от степени расширения сопла
J_1T1 := J_1T.0*(1.57/sqrt(k) - 0.66/nthroot(d'_a1^2, 3)) = 3026.55 m/s
J_1T2 := J_1T.0*(1.57/sqrt(k) - 0.66/nthroot(d'_a2^2, 3)) = 3327.47 m/s
J_1T3 := J_1T.0*(1.57/sqrt(k) - 0.66/nthroot(d'_a3^2, 3)) = 3322.89 m/s
ζ_1 := 0.025*(d'_a1^1.25 - 1)/d'_a1*(1 + 11.6*z/nthroot(d_кр1/cm, 3)) = 0.0755611
ζ_2 := 0.025*(d'_a2^1.25 - 1)/d'_a2*(1 + 11.6*z/nthroot(d_кр2/cm, 3)) = 0.111418
ζ_3 := 0.025*(d'_a3^1.25 - 1)/d'_a3*(1 + 11.6*z/nthroot(d_кр3/cm, 3)) = 0.114131
J_1П1 := J_1T1*(1 - ζ_1) = 2797.86 m/s
J_1П2 := J_1T2*(1 - ζ_2) = 2956.73 m/s
J_1П3 := J_1T3*(1 - ζ_3) = 2943.65 m/s
# 2.6 Уточнение времени работы ДУ всех ступеней или их калибров.
# Максимальное и минимальное время работы ДУ:
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τ_Nmaxi == e'_допi*D_i/(u'_min*p_Ni^ν)
τ_Nmaxi == e'_допi*D_i/(u'_max*p_Ni^ν)
e'_допi == e_i/D_i  # - относительный свод горения
# u'_min и u'_max вычиляются по заданным минимальному и максимальному значению скорости горения при p=4 МПа:
u_min = 0.005 m/s
p_0 := 4 MPa
u_max = 0.013 m/s
u'_min := u_min*s/mm/(p_0/MPa)^ν = 3.53553
u'_max := u_max*s/mm/(p_0/MPa)^ν = 9.19239
# Определим относительный свод горения для каждой ступени из следдующей системы уравнений:
(ε_T + ε_p)*f ≤ ε_доп
ε_T == ΔT*(α_K - α_T)*(2*M^2 - μ_T)*(M^2 + 1)/(M^2*(1 - 2*μ_T) + 1)
ε_p == p_maxi*(1 + μ_T)*(1 - 2*μ_T)*(M^2 - 1)/(E_T*(M^2*(1 - 2*μ_T) + 1))
e'_допi == 1/2*(1 - 1/M)
M == (p_maxi/E_T*(1 + μ_T)*(1 - 2*μ_T) + ΔT*(α_K - α_T)*μ_T + ε_доп/f)/(p_maxi/E_T*(1 + μ_T)*(1 - 2*μ_T) + ΔT*(α_K - α_T)*(2 - μ_T) - ε_доп/f*(1 - 2*μ_T))
# - формула для М, получаемая при решении системы
α_K := 1*10^-5/K  # - коэффициент температурного расширения конструкции двигателя
α_T := 1*10^-4/K  # - коэффициент температурного расширения топлива
μ_T := 0.495  # - коэф. Пуассона топлива
T_p := 50 °C
ΔT := T_min - T_p = -90 K
E_T := 7.5 MPa  # - модуль Юнга топлива
ε_доп := 0.4  # - допускаемая деформация топлива
f := 1.35  # - коэф. запаса по деформации
# Вычислим М для ДУ первой ступени:
p_max1 := 1.3*p_N1 = 15.6 MPa
M_1 := sqrt((p_max1/E_T*(1 + μ_T)*(1 - 2*μ_T) + ΔT*(α_K - α_T)*μ_T + ε_доп/f)/(p_max1/E_T*(1 + μ_T)*(1 - 2*μ_T) + ΔT*(α_K - α_T)*(2 - μ_T) - ε_доп/f*(1 - 2*μ_T))) = 2.8668
# Вторая ступень:
p_max2 := 1.3*p_N2 = 13 MPa
M_2 := sqrt((p_max2/E_T*(1 + μ_T)*(1 - 2*μ_T) + ΔT*(α_K - α_T)*μ_T + ε_доп/f)/(p_max2/E_T*(1 + μ_T)*(1 - 2*μ_T) + ΔT*(α_K - α_T)*(2 - μ_T) - ε_доп/f*(1 - 2*μ_T))) = 3.04683
# Третья ступень:
p_max3 := 1.3*p_N3 = 10.4 MPa
M_3 := sqrt((p_max3/E_T*(1 + μ_T)*(1 - 2*μ_T) + ΔT*(α_K - α_T)*μ_T + ε_доп/f)/(p_max3/E_T*(1 + μ_T)*(1 - 2*μ_T) + ΔT*(α_K - α_T)*(2 - μ_T) - ε_доп/f*(1 - 2*μ_T))) = 3.27355
# Тогда относительные своды горения будут равны: | Диаметры каналов зарядов ДУ
e'_доп1 := 1/2*(1 - 1/M_1) = 0.32559
d_КАН1 := D_1/M_1 = 0.488349 m
e'_доп2 := 1/2*(1 - 1/M_2) = 0.335895
d_КАН2 := D_2/M_2 = 0.39057 m
e'_доп3 := 1/2*(1 - 1/M_3) = 0.347261
d_КАН3 := D_3/M_3 = 0.363519 m
# Скорости горения топлива ДУ:
u_1min := u'_min*(p_N1/MPa)^ν*mm/s = 6.58037 mm/s
u_2min := u'_min*(p_N2/MPa)^ν*mm/s = 6.28717 mm/s
u_3min := u'_min*(p_N3/MPa)^ν*mm/s = 5.94604 mm/s
u_1max := u'_max*(p_N1/MPa)^ν*mm/s = 17.109 mm/s
u_2max := u'_max*(p_N2/MPa)^ν*mm/s = 16.3466 mm/s
u_3max := u'_max*(p_N3/MPa)^ν*mm/s = 15.4597 mm/s
# Тогда максимальное и минимальное время работы ДУ каждой ступени будет равно:
τ_Nmax1 := e'_доп1*D_1/u_1min = 69.2705 s
τ_Nmin1 := e'_доп1*D_1/u_1max = 26.6425 s
τ_Nmax2 := e'_доп2*D_2/u_2min = 63.5764 s
τ_Nmin2 := e'_доп2*D_2/u_2max = 24.4524 s
τ_Nmax3 := e'_доп3*D_3/u_3min = 69.4985 s
τ_Nmin3 := e'_доп3*D_3/u_3max = 26.7302 s
# ЗАМЕЧАНИЕ: Для ДУ первой ступени максимальное время работы вышло меньше выбранного ранее при первом расчете. Поэтому была проведена корректировка калибра ДУ исходя из необходимого времени работы. Полученное значение было подставлено в начало выше расположенных расчетов.
D'_1 > τ_N1*u_1min/e'_доп1
τ_N1*u_1min/e'_доп1 = 1.11158 m
# Примем
D'_1 := 1.4 m
τ_Nmax1 := e'_доп1*D'_1/u_1min = 69.2705 s
# 3. РАСЧЕТНАЯ ОЦЕНКА МАССОВО-ГЕОМЕТРИЧЕСКИХ ПОКАЗАТЕЛЕЙ ЭЛЕМЕНТОВ КОНСТРУКЦИИ УБР
# 3.1 Расчет массы  и размеров элементов  корпусов РДТТ маршевых ступеней
# Масса корпусов РДТТ
# Корпус рассчитывается на максимальное давление. Его предел прочности приведен в начале записки.
S_maxS_ср := 1.15
f := 1.15
K_σ := 1.05
P_MAX1 := f*p_N1*(1 + Δpp_N)*S_maxS_ср^(1/(1 - ν))*K_σ = 19.1408 MPa
P_MAX2 := f*p_N2*(1 + Δpp_N)*S_maxS_ср^(1/(1 - ν))*K_σ = 15.9506 MPa
P_MAX3 := f*p_N3*(1 + Δpp_N)*S_maxS_ср^(1/(1 - ν))*K_σ = 12.7605 MPa
# Массу кокона для каждой ступени можно рассчитать по следующей зависимости:
m_СКi == 3*K_СКi*P_MAXi*ω_i/(σ'_K*ρ_T)
σ'_K := σ_K*g = 1274864 m^2/s^2
K_СКi == K_цi/η_Цi + K_Vi*π*R_i^3/ω_i*ρ_T
σ'_K*(1350 kg/m^3) = 1721.07 MPa
η_Цi == 0.985*η'_Цi
η'_Цi == 4*e'_допi*(1 - e'_допi)  # - коэффициент объемного заполнения топливом ДУ i-ой ступени
# R_i | - радиус i-ой ступени
# Значения K_ц, K_l, K_V определяются из таблицы для принятого относительного диаметра заднего полюсного отверстия корпуса ДУ.
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d'_02i == d_02i/D_i  # - относительный диаметр заднего полюсного отверстия ДУ ступени
# Диаметр заднего полюсного отверстия можно определить приближенно из схемы, показанной выше.
d_02i == 2*d_крi + 2*(l_yi + d_крi)*tan(30°)
# l_yi | - длина утопленной части сопла (его сверхзвуковой части)
l_yi == l'_yi*l_ai
# l_ai | - длина сверхзвуковой части сопла
# Принимаем
l_ai == d_ai
l_a1 := d_a1 = 53.9665 cm
l_a2 := d_a2 = 119 cm
l_a3 := d_a3 = 101.15 cm
l_y1 := l'_y1*l_a1 = 8.09498 cm
l_y2 := l'_y2*l_a2 = 11.9 cm
l_y3 := l'_y3*l_a3 = 7.0805 cm
# Тогда
d_021 := 2*d_кр1 + 2*(l_y1 + d_кр1)*tan(30°) = 52.1779 cm
d_022 := 2*d_кр2 + 2*(l_y2 + d_кр2)*tan(30°) = 51.8443 cm
d_023 := 2*d_кр3 + 2*(l_y3 + d_кр3)*tan(30°) = 41.1799 cm
d'_021 := d_021/D_1 = 0.372699
d'_022 := d_022/D_2 = 0.435666
d'_023 := d_023/D_3 = 0.34605
# Для определение необходимых коэффициентов проведем линейную интерполяцию их значений
K_цМ := transpose([1.148, 1.17, 1.2, 1.26, 1.335, 1.466])
K_VМ := transpose([0.505, 0.514, 0.533, 0.546, 0.564, 0.601])
K_lМ := transpose([0.89, 0.902, 0.922, 0.954, 1.012, 1.109])
d_02М := transpose([0.2, 0.3, 0.4, 0.5, 0.6, 0.7])
d' := 0.2, 0.201 .. 0.7
K_ц(d') := linterp(d_02М, K_цМ, d')
K_V(d') := linterp(d_02М, K_VМ, d')
K_l(d') := linterp(d_02М, K_lМ, d')
# Тогда коэффиценты будут приближенно равны
# ДУ 1 ступени
K_ц1 := K_ц(d'_021) = 1.19181
K_V1 := K_V(d'_021) = 0.527813
K_l1 := K_l(d'_021) = 0.91654
# ДУ 2 ступени
K_ц2 := K_ц(d'_022) = 1.2214
K_V2 := K_V(d'_022) = 0.537637
K_l2 := K_l(d'_022) = 0.933413
# ДУ 3 ступени
K_ц3 := K_ц(d'_023) = 1.18381
K_V3 := K_V(d'_023) = 0.522749
K_l3 := K_l(d'_023) = 0.91121
# Вычислим объемные коэффиценты заполнения цилиндрической части корпуса двигателей
# Первая ступень | Вторая ступень | Третья ступень
η'_Ц1 := 4*e'_доп1*(1 - e'_доп1) = 0.878324
η'_Ц2 := 4*e'_доп2*(1 - e'_доп2) = 0.892278
η'_Ц3 := 4*e'_доп3*(1 - e'_доп3) = 0.906683
η_Ц1 := 0.985*η'_Ц1 = 0.865149
η_Ц2 := 0.985*η'_Ц2 = 0.878894
η_Ц3 := 0.985*η'_Ц3 = 0.893083
# Теперь можем рассчитать массы коконов:
# ДУ первой ступени
R_1 := D_1/2 = 0.7 m
K_СК1 := K_ц1/η_Ц1 + K_V1*π*R_1^3/ω_1*ρ_T = 1.55324
m_СК1 := 3*K_СК1*P_MAX1*ω_1/(σ'_K*ρ_T) = 226.515 kg
# ДУ второй ступени
R_2 := D_2/2 = 0.595 m
K_СК2 := K_ц2/η_Ц2 + K_V2*π*R_2^3/ω_2*ρ_T = 1.61879
m_СК2 := 3*K_СК2*P_MAX2*ω_2/(σ'_K*ρ_T) = 94.3635 kg
# ДУ третьей ступени
R_3 := D_3/2 = 0.595 m
K_СК3 := K_ц3/η_Ц3 + K_V3*π*R_3^3/ω_3*ρ_T = 1.77539
m_СК3 := 3*K_СК3*P_MAX3*ω_3/(σ'_K*ρ_T) = 40.9965 kg
# Размеры силовой оболочки
# Коэффициенты объемного заполненияя днищ корпуса РДТТ
# Первая ступень | Вторая ступень | Третья ступень
η'_дн1 := 1 - 1.5*(1 - η'_Ц1) = 0.817486
η'_дн2 := 1 - 1.5*(1 - η'_Ц2) = 0.838417
η'_дн3 := 1 - 1.5*(1 - η'_Ц3) = 0.860024
η_дн1 := 0.85*η'_дн1 = 0.694864
η_дн2 := 0.85*η'_дн2 = 0.712655
η_дн3 := 0.85*η'_дн3 = 0.731021
# Тогда длины цилиндрических участков ДУ каждой ступени
l_ц1 := 4*ω_1/(π*D_1^2*ρ_T*η_Ц1) - K_l1*R_1*η_дн1/η_Ц1 = 1.91582 m
l_ц2 := 4*ω_2/(π*D_2^2*ρ_T*η_Ц2) - K_l2*R_2*η_дн2/η_Ц2 = 1.13842 m
l_ц3 := 4*ω_3/(π*D_3^2*ρ_T*η_Ц3) - K_l3*R_3*η_дн3/η_Ц3 = 0.330414 m
4*ω_3/(π*D_3^2*ρ_T*η_Ц3) = 0.774199 m
K_l3*R_3*η_дн3/η_Ц3 = 0.443786 m
# Посчитаем длину переднего и заднего днища для каждой ДУ
ω_3 = 1391.9 kg
K_l3 = 0.91121
# 1 ступень | 2 ступень | 3 ступень
D_3 = 1.19 m
R_3 = 0.595 m
l_днпер1 := 0.614*R_1 = 0.4298 m
l_днпер2 := 0.614*R_2 = 0.36533 m
l_днпер3 := 0.614*R_3 = 0.36533 m
ρ_T = 1810 kg/m^3
η_дн3/η_Ц3 = 0.818536
l_днзад1 := 0.64*R_1 = 0.448 m
l_днзад2 := 0.64*R_2 = 0.3808 m
l_днзад3 := 0.64*R_3 = 0.3808 m
η_Ц3 = 0.893083
# Диаметры передних полюсных отверстий:
d'_011 := 0.2
d_011 := d'_011*D_1 = 0.28 m
d_021 = 0.521779 m
d'_012 := 0.2
d_012 := d'_012*D_2 = 0.238 m
d'_013 := 0.2
d_013 := d'_013*D_3 = 0.238 m
# Масса металлических фланцев
m_флi == K_фл*ρ_фл*r'_срi^3*D_i^3*sqrt(p_Ni/σ_фл)
# Материал фланцев: титановый сплав ВТ-23
σ_фл := 1400 MPa  # - предел прочности материала фланцев
ρ_Ti := 4540 kg/m^3  # - плотность материала фланцев
K_фл := 0.9  # - коэффициент согласования для фланцев корпусов ДУ ступеней
# Найдем средние относительные диаметры и радиусы полюсных отверстий силовых оболочек корпусов ДУ ступеней:
d'_ср1 := (d'_011 + d'_021)/2 = 0.28635
r'_ср1 := d'_ср1/2 = 0.143175
d'_ср2 := (d'_012 + d'_022)/2 = 0.317833
r'_ср2 := d'_ср2/2 = 0.158917
d'_ср3 := (d'_013 + d'_023)/2 = 0.273025
r'_ср3 := d'_ср3/2 = 0.136512
# Посчитаем массы фланцев корпусов ДУ ступеней:
m_ФЛ1 := K_фл*ρ_Ti*r'_ср1^3*D_1^3*sqrt(p_N1/σ_фл) = 3.04655 kg
m_ФЛ2 := K_фл*ρ_Ti*r'_ср2^3*D_2^3*sqrt(p_N2/σ_фл) = 2.33552 kg
m_ФЛ3 := K_фл*ρ_Ti*r'_ср3^3*D_3^3*sqrt(p_N3/σ_фл) = 1.32415 kg
# Масса юбок корпуса
m_юi == K_ю*p_Ni*D_i^3/σ'_K
K_ю := 1.61  # - коэф. согласования размерностей
σ'_K = 1274864 m^2/s^2
# - удельная прочность органопластика
ρ_K := 1350 kg/m^3
m_ю1 := K_ю*p_N1*D_1^3/σ'_K = 41.5841 kg
l_ю1 := 0.15*D_1 = 0.21 m
m_ю2 := K_ю*p_N2*D_2^3/σ'_K = 21.2815 kg
l_ю2 := 0.15*D_2 = 0.1785 m
m_ю3 := K_ю*p_N3*D_3^3/σ'_K = 17.0252 kg
l_ю3 := 0.15*D_3 = 0.1785 m
# Зная плотность материала юбок, оценим их толщину, считая что вся их масса заключена в объеме полого цилиндра
V_ю1 := m_ю1/(2*ρ_K) = 0.0154015 m^3
V_ю2 := m_ю2/(2*ρ_K) = 0.00788205 m^3
V_ю3 := m_ю3/(2*ρ_K) = 0.00630564 m^3
solve block
    # guess values
    δ_ю1 := 1 mm
    δ_ю2 := 1 mm
    δ_ю3 := 1 mm
    # constraints
    V_ю1 == π*((D_1 + δ_ю1)^2 - D_1^2)*l_ю1
    V_ю2 == π*((D_2 + δ_ю2)^2 - D_2^2)*l_ю2
    V_ю3 == π*((D_3 + δ_ю3)^2 - D_3^2)*l_ю3
    # solver
    Find(δ_ю1, δ_ю2, δ_ю3) = [8.31283; 5.89115; 4.71525] mm
end solve block
# Масса заряда и крышки воспламенительного устройства
m_ЗВУi == K_ЗВУ*(ω_i/ρ_T)^(2/3)
K_ЗВУ := 2.2/m^2*kg  # - коэф. согласования размерностей
m_ЗВУ1 := K_ЗВУ*(ω_1/ρ_T)^(2/3) = 4.81487 kg
m_ЗВУ2 := K_ЗВУ*(ω_2/ρ_T)^(2/3) = 2.95035 kg
m_ЗВУ3 := K_ЗВУ*(ω_3/ρ_T)^(2/3) = 1.84661 kg
# Масса крышки ВУ
m_ВУi == K_ВУ*p_Ni*d'_01i^3*D_i^3/σ'_В
K_ВУ := 5.46  # - коэф. согласования размерностей
ρ_Al := 2800*kg/m^3
σ_В := 550 MPa
σ'_В := σ_В/ρ_Al = 196429 m^2/s^2
m_ПЛ = 80 kg
m_ВУ1 := K_ВУ*p_N1*d'_011^3*D_1^3/σ'_В = 7.32223 kg
d_ПЛ := D_3
m_ВУ2 := K_ВУ*p_N2*d'_012^3*D_2^3/σ'_В = 3.7473 kg
l_ПЛ := 4*m_ПЛ/ρ_Al/(π*d_ПЛ^2) = 0.0256891 m
m_ВУ3 := K_ВУ*p_N3*d'_013^3*D_3^3/σ'_В = 2.99784 kg
# Масса защитно-крепящего слоя
m_ЗКСi == π*D_i^2*(l_цi/D_i + 0.615)*q_ЗКС
q_ЗКС := 2.4*kg/m^2  # - поверхностная плотность материала ЗКС
m_ЗКС1 := π*D_1^2*(l_ц1/D_1 + 0.615)*q_ЗКС = 29.3114 kg
m_ЗКС2 := π*D_2^2*(l_ц2/D_2 + 0.615)*q_ЗКС = 16.7808 kg
m_ЗКС3 := π*D_3^2*(l_ц3/D_3 + 0.615)*q_ЗКС = 9.53104 kg
# Масса теплозашитного покрытия
m_ТЗП == K_ТЗП*ω_i*sqrt(p_Ni*τ_Ni)/(ρ_T*D_i*(l_цi/D_i)^0.25)*ρ_ТЗП
K_ТЗП := 1.17*10^-3*m^(3/2)*s^(1/2)/kg^(3/2)*kg
ρ_ТЗП := 1000*kg/m^3
m_ТЗП1 := K_ТЗП*ω_1/1000*sqrt(p_N1*τ_N1)/(ρ_T*D_1*(l_ц1/D_1)^0.25)*ρ_ТЗП = 64.2711 kg
m_ТЗП2 := K_ТЗП*ω_2/1000*sqrt(p_N2*τ_N2)/(ρ_T*D_2*(l_ц2/D_2)^0.25)*ρ_ТЗП = 30.8786 kg
m_ТЗП3 := K_ТЗП*ω_3/1000*sqrt(p_N3*τ_N3)/(ρ_T*D_3*(l_ц3/D_3)^0.25)*ρ_ТЗП = 16.9235 kg
# 3.2 Расчет масс сопловых аппаратов
# Силовая оболочка утопленной части сопла
m_уоi == K_уо*(β*ω_i/τ_Ni)^1.5*d'_yi^2.35*l'_yi^0.4*d'_ai^0.4/p_Ni^1.1*ρ_Ti/E_Ti^0.4
E_Ti := 122000 MPa
d'_yi == d_02i/(2*d_крi)
K_уо := 16.5*10^-9  # - коэф. согласования размерностей
d'_y1 := d_021/(2*d_кр1) = 1.92159
d'_y2 := d_022/(2*d_кр2) = 2.14618
d'_y3 := d_023/(2*d_кр3) = 1.9681
m_уо1 := K_уо*(β*ω_1/τ_N1)^1.5*d'_y1^2.35*l'_y1^0.4*d'_a1^0.4/(p_N1/10^6)^1.1*ρ_Ti/(E_Ti/10^6)^0.4 = 12.2874 kg
m_уо2 := K_уо*(β*ω_2/τ_N2)^1.5*d'_y2^2.35*l'_y2^0.4*d'_a2^0.4/(p_N2/10^6)^1.1*ρ_Ti/(E_Ti/10^6)^0.4 = 12.7491 kg
m_уо3 := K_уо*(β*ω_3/τ_N3)^1.5*d'_y3^2.35*l'_y3^0.4*d'_a3^0.4/(p_N3/10^6)^1.1*ρ_Ti/(E_Ti/10^6)^0.4 = 5.31966 kg
# Тепловая защита утопленной оболочки сопла
m_ТЗуоi == K_ТЗуо*β*ω_i/sqrt(p_Ni*τ_Ni)*d'_yi^1.75*ρ_ТЗ  # - коэф. согласования размерностей
K_ТЗуо := 3.7*10^-9*m^(3/2)*s^(1/2)/kg^(3/2)*kg
ρ_ТЗ := 1400*kg/m^3  # - плостность углепластика
m_ТЗуо1 := K_ТЗуо*β*ω_1/sqrt(p_N1/10^6*τ_N1)*d'_y1^1.75*ρ_ТЗ = 6.04212 kg
m_ТЗуо2 := K_ТЗуо*β*ω_2/sqrt(p_N2/10^6*τ_N2)*d'_y2^1.75*ρ_ТЗ = 4.51726 kg
m_ТЗуо3 := K_ТЗуо*β*ω_3/sqrt(p_N3/10^6*τ_N3)*d'_y3^1.75*ρ_ТЗ = 2.36603 kg
# Силовая оболочка раструба  сверхзвуковой части
m_крi == K_кр*(β*ω_i/τ_Ni)^1.5*d'_рi^1.75*d'_ai^0.2/(p_Ni/10^6)*ρ_Ti/(E_Ti/10^6)^0.5
K_кр := 4.68*10^-9  # - коэф. согласования размерностей
d'_р1 := d'_a1 = 3.97492
d'_р2 := 5  # - относительные диаметры раструбов
d'_р3 := 5
m_кр1 := K_кр*(β*ω_1/τ_N1)^1.5*d'_р1^1.75*d'_a1^0.2/(p_N1/10^6)*ρ_Ti/(E_Ti/10^6)^0.5 = 5.41285 kg
m_кр2 := K_кр*(β*ω_2/τ_N2)^1.5*d'_р2^1.75*d'_a2^0.2/(p_N2/10^6)*ρ_Ti/(E_Ti/10^6)^0.5 = 6.23273 kg
m_кр3 := K_кр*(β*ω_3/τ_N3)^1.5*d'_р3^1.75*d'_a3^0.2/(p_N3/10^6)*ρ_Ti/(E_Ti/10^6)^0.5 = 3.60909 kg
# Горловина сопла с эластичным шарниром
m_Гi == K_П*β*ω_i/sqrt(p_Ni/10^6*τ_Ni)
K_П := 6.44*10^-5*s^(1/2)/(kg^(1/2)*m^(3/2))*kg  # - коэф. согласования размерностей
m_Г1 := K_П*β*ω_1/sqrt(p_N1/10^6*τ_N1) = 23.9519 kg
m_Г2 := K_П*β*ω_2/sqrt(p_N2/10^6*τ_N2) = 14.7576 kg
m_Г3 := K_П*β*ω_3/sqrt(p_N3/10^6*τ_N3) = 8.99488 kg
# Масса тепловой защиты сверхзвукой части
m_обi == K_об*ρ_ТЗ*β*ω_i/sqrt(p_Ni/10^6*τ_Ni)*d'_ai^1.75
K_об := 2.81*10^-9*m^(3/2)*s^(1/2)/kg^(3/2)*kg  # - коэф. согласования размерностей
m_об1 := K_об*ρ_ТЗ*β*ω_1/sqrt(p_N1/10^6*τ_N1)*d'_a1^1.75 = 16.3724 kg
m_об2 := K_об*ρ_ТЗ*β*ω_2/sqrt(p_N2/10^6*τ_N2)*d'_a2^1.75 = 49.3927 kg
m_об3 := K_об*ρ_ТЗ*β*ω_3/sqrt(p_N3/10^6*τ_N3)*d'_a3^1.75 = 29.1285 kg
# 3.3 Масса органов управления
K_РМ1 := 0.65*m^(1/2)*s
K_РМ2 := 0.57*m^(1/2)*s
m_РМi == K_РМi*ω_i/(τ_Ni*sqrt(D_i))
K_РМ3 := 0.38*m^(1/2)*s  # - коэф. согласования размерностей
m_РМ1 := K_РМ1*ω_1/(τ_N1*sqrt(D_1)) = 58.5339 kg
m_РМ2 := K_РМ2*ω_2/(τ_N2*sqrt(D_2)) = 36.7195 kg
m_РМ3 := K_РМ3*ω_3/(τ_N3*sqrt(D_3)) = 14.6927 kg
# Масса конструкции ДУ
m_ДУ1 := m_СК1 + m_ФЛ1 + m_ю1 + m_ЗВУ1 + m_ВУ1 + m_ТЗП1 + m_ЗКС1 + m_уо1 + m_ТЗуо1 + m_кр1 + m_Г1 + m_об1 + m_РМ1 = 499.466 kg
m_ДУ2 := m_СК2 + m_ФЛ2 + m_ю2 + m_ЗВУ2 + m_ВУ2 + m_ТЗП2 + m_ЗКС2 + m_уо2 + m_ТЗуо2 + m_кр2 + m_Г2 + m_об2 + m_РМ2 = 296.706 kg
m_ДУ3 := m_СК3 + m_ФЛ3 + m_ю3 + m_ЗВУ3 + m_ВУ3 + m_ТЗП3 + m_ЗКС3 + m_уо3 + m_ТЗуо3 + m_кр3 + m_Г3 + m_об3 + m_РМ3 = 154.756 kg
# 3.4 Соотношения для расчета масс элементов ракеты
# Необходимо построить предварительный чертеж ракеты, из которого определяются точные значения длин переходных и хвостовых отсеков, длина обтекателя и протяженность БКС ракеты.
# Определим длину приборного отсека по его усредненной плотности:
m_СУ = 105 kg
ρ_СУ := 300 kg/m^3
# Объем будет равен:
V_СУ := m_СУ/ρ_СУ = 0.35 m^3
# Примем диаметр приборного отсека равным диаметру третьей ступени:
D_СУ := D_3 = 1.19 m
l_СУ := 4*V_СУ/(π*D_СУ^2) = 0.314691 m
# Для расчета масс отсеков, головного обтекателя, а также бортовой кабельной сети приведем предварительную компоновку ракеты
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# Масса отсеков:
m_ОТСi == π*D_i*(K_ПХО*l_ПХОi + K_ХО*l_ХОi)
K_ХО := 20 kg/m^2  # - коэффициент согласования для хвостовых отсеков
K_ПХО1 := 20 kg/m^2  # - коэффициент согласования для переходных отсеков в случае поперечного деления
K_ПХО2 := 24 kg/m^2  # - коэффициент согласования для переходных отсеков в случае продольно-поперечного деления
# В нашем случае разделение первой и второй ступеней происходит по плоскости 1-1, второй и третьей - 2-2, боевая ступень отделяется от третьей ступени по плоскости 3-3. Из чертежа получим слудующие длины хвостовых и переходных отсеков. В плоскости 1-1 предполагается продольно-поперечное деление, в остальных - поперечное.
# Переходные отсеки
l_ПХО1 := 980 mm
l_ПХО2 := 1278 mm
l_ПХО3 := 268 mm
# Хвостовые отсеки:
l_ХО1 := 644 mm
l_ХО2 := 701 mm
# Тогда масса отсеков первой ступени будет равна (переходный отсек между первой и второй ступенями относим к первой):
m_ОТС1 := π*D_1*(K_ПХО2*l_ПХО1 + K_ХО*l_ХО1) = 160.096 kg
# Второй ступени:
m_ОТС2 := π*D_2*(K_ПХО1*l_ПХО2 + K_ХО*l_ХО2) = 147.97 kg
# Третьей ступени:
m_ОТС3 := π*D_3*(K_ПХО1*l_ПХО3) = 20.0383 kg
# Бортовая кабельная сеть
m_БКСi == (0.8*l_стi + 2) + (0.8*l_трi + 2)*(i - 1)
# l_стi | - длина ступени
# l_трi | - длина транзитных кабелей
l_трi == l_ПХОi + 2*l_юi + l_цi + l_ХОi
# l_стi | измеряется от среза сопла до плоскости разделения
l_ст1 := 5.014 m
l_ст2 := 4.679 m
l_тр2 := l_ПХО2 + 2*l_ю2 + l_ц2 + l_ХО2 = 3.47442 m
l_ст3 := 2.026 m
l_ц3 = 0.330414 m
l_тр3 := l_ПХО3 + 2*l_ю3 + l_ц3 = 0.955414 m
m_БКС1 := (0.8*l_ст1*kg/m + 2 kg) = 6.0112 kg
m_БКС2 := (0.8*l_ст2*kg/m + 2*kg) + (0.8*l_тр2*kg/m + 2*kg) = 10.5227 kg
m_БКС3 := (0.8*l_ст3*kg/m + 2*kg) + (0.8*l_тр3*kg/m + 2*kg) = 6.38513 kg
# Масса обтекателя:
m_ГО == S_ГО*K_ГО + 10 kg
K_ГО := 20*kg/m^2  # коэффициент согласования при поперечном отделении ГО
# S_ГО определим из чертежа для двух конусов
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S_ГО := π*((1190/2) mm + (750/2) mm)*1269 mm + π*(750/2) mm*794 mm
S_ГО = 4.80249 m^2
L_ГО := 1950 mm
L_ПН := 2000 mm
m_ГО := S_ГО*K_ГО + 10 kg = 106.05 kg
# Приведем значения уточненных стартовых масс ступеней
# Масса конструкции по ступеням:
# Третья ступень
m_ДУ3 = 154.756 kg
m_KΣ3 := m_ДУ3 + m_ОТС3 + m_БКС3 + m_ГО = 287.229 kg  # - с учетом всех элементов
m_ОТС3 = 20.0383 kg
m_БКС3 = 6.38513 kg
ω_1 = 5.86032 tonne
m_ГО = 106.05 kg
ω_2 = 2.81097 tonne
ω_3 = 1.3919 tonne
# Масса элементов монтажа
μ_1 = 0.518
m_M3 := 0.03*m_KΣ3
μ_2 = 0.628
μ_3 = 0.67
m_K3 := m_KΣ3 + m_M3 = 295.846 kg
# Вторая ступень
m_KΣ2 := m_ДУ2 + m_ОТС2 + m_БКС2 = 455.199 kg
m_M2 := 0.03*m_KΣ2 = 13.656 kg
m_K2 := m_KΣ2 + m_M2 = 468.855 kg
# Первая ступень
m_KΣ1 := m_ДУ1 + m_ОТС1 + m_БКС1 = 665.573 kg
m_M1 := 0.03*m_KΣ1 = 19.9672 kg
m_K1 := m_KΣ1 + m_M1 = 685.54 kg
m_0 = 11313.4 kg
# Стартовые массы ступеней:
m_03 := m_ПН + m_K3 + ω_3 = 2.10774 tonne
μ_3 := ω_3/m_03 = 0.660373
α_ДУ3 := m_ДУ3/ω_3 = 0.111183
m_K3/ω_3 = 0.212549
m_02 := m_03 + m_K2 + ω_2 = 5.38756 tonne
μ_2 := ω_2/m_02 = 0.521751
α_ДУ2 := m_ДУ2/ω_2 = 0.105553
m_0 := m_02 + m_K1 + ω_1 = 11.9334 tonne
μ_1 := ω_1/m_0 = 0.491084
α_ДУ1 := m_ДУ1/ω_1 = 0.0852286
# 4. ОПРЕДЕЛЕНИЕ ПАРАМЕТРОВ АУТ И МАКСИМАЛЬНОЙ ДАЛЬНОСТИ ПОЛЕТА
# Приращение скорости после работы ДУ i-ой ступени
V_кi == K_ai*J_1i*ln(1/(1 - μ_i)) - ΔV_gi
K_ai
# - коэффициент учета потерь скорости i-ой ступени от наличия атмосферы
K_a1 == 1 + K_П1 - (0.3*K_П1 + 4.8*μ_1/(τ_N1*nthroot(sin(θ_1)^2, 3))*(12000/p_M))/ln(1/(1 - μ_1))
p_M := m_0/(π*(1.025*D_1)^2/4) = 7378.55 kg/m^2
J_101 := J_1П1 - d'_a1^2*0.1 MPa*β/p_N1 = 2583.18 m/s
K_П1 := J_1П1/J_101 - 1 = 0.0831047
θ'_K(L) := linterp(L_M, θ'_KM, L)
θ'_K := θ'_K(11000*km) = 0.353429
θ'_1 := asin(1 - μ_1*(1 - sin(θ'_K)^0.8)) = 0.80246
θ'_2 := 0.25*θ'_1 + 0.75*θ'_K = 0.465687
θ_K1 := 0.5*(θ'_1 + θ'_2) = 0.634074
θ_K2 := θ'_K
θ_K3 := θ'_K
θ'_3 := θ'_K
K_П1 = 0.0831047
0.3*K_П1 = 0.0249314
K_a1 := 1 + K_П1 - (0.3*K_П1 + 4.8*μ_1/(τ_N1/s*nthroot(sin(θ_K1)^2, 3))*(12000*kg/m^2/p_M))/ln(1/(1 - μ_1)) = 0.899906
4.8*μ_1/(τ_N1/s*nthroot(sin(θ_K1)^2, 3)) = 0.0607588
(0.3*K_П1 + 4.8*μ_1/(τ_N1/s*nthroot(sin(θ_K1)^2, 3))*(12000*kg/m^2/p_M))/ln(1/(1 - μ_1)) = 0.183198
K_a2 := 1
K_a3 := 1  # считаем, что потери отсутствуют
J_11 := J_101 = 2583.18 m/s
(12000*kg/m^2/p_M) = 1.62634
J_12 := J_1П2
ln(1/(1 - μ_1)) = 0.675473
J_13 := J_1П3
ΔV_g1 := g*τ_N1*sin(θ'_1) = 387.841 m/s
ΔV_g2 := g*τ_N2*sin(θ'_2) = 176.142 m/s  # - потери скорости от воздействия гравитации
ΔV_g3 := g*τ_N3*sin(θ'_3) = 112.01 m/s
V_к1 := K_a1*J_11*ln(1/(1 - μ_1)) - ΔV_g1 = 1182.38 m/s
V_к2 := K_a2*J_12*ln(1/(1 - μ_2)) - ΔV_g2 = 2004.81 m/s
V_к3 := K_a3*J_13*ln(1/(1 - μ_3)) - ΔV_g3 = 3066.86 m/s
# Конечная скорость в конце АУТ:
V_K := V_к1 + V_к2 + V_к3 = 6254.05 m/s
# Определяем высоту конца активного участка
S(μ) := μ + (1 - μ)*ln(1 - μ)
Δh_K1 := (K_a1*J_11*τ_N1/μ_1*S(μ_1) - g*τ_N1^2/2*sin(θ'_1))*sin(θ'_1) = 19.9115 km
Δh_K2 := (V_к1*τ_N1 + K_a2*J_12*τ_N2/μ_2*S(μ_2) - g*τ_N2^2/2*sin(θ'_2))*sin(θ'_2) = 44.8196 km
Δh_K3 := (V_к2*τ_N2 + K_a3*J_13*τ_N3/μ_3*S(μ_3) - g*τ_N3^2/2*sin(θ'_3))*sin(θ'_3) = 42.0649 km
h_K := Δh_K1 + Δh_K2 + Δh_K3 = 106.796 km
# Протяженность активного участка:
Δl_1 := Δh_K1*cot(θ_K1) = 27.0768 km
Δl_2 := Δh_K2*cot(θ_K2) = 121.489 km
Δl_3 := Δh_K3*cot(θ_K3) = 114.022 km
l_K := Δl_1 + Δl_2 + Δl_3 = 262.587 km
# Определим эллиптическую дальность полета ракеты:
R := 6371 km
μ_0 := 3.988*10^5*km^3/s^2
r_K := R + h_K = 6477.8 km
υ_K := V_K^2*r_K/μ_0 = 0.635322
L_БАЛ := 2*R*atan(υ_K*tan(θ'_K)/(1 - υ_K + tan(θ'_K)^2)) = 5577.83 km
# Тогда дальность полета будет равна:
L'_max := L_БАЛ + 2*l_K = 6103 km
# Перелет составляет
ΔL := L'_max - L_max = 103.001 km
ε := ΔL/L_max*100 = 1.71668
# Погрешность составляет  1,6 процента, поэтому дальнейшая корректировка не требуется. Рассчитанные ранее параметры ракеты принимаем за конечные.
