# Дано:
L_max := 9000 km
n_ББ := 3  # Топливо:
ΔP_ф := 10  # MPa
ΔL := 400 km
J_1T := 2570*m/s
K_T := 0.2 %
R_ц := 3.5  # km
ΔB := 200 km
Δu_1u.1 := 2 %
ρ_T := 1.85*gm/cm^3
τ_Σ := 140 s
Δ_сл := 3.5 %
h_k := 150 km
k := 1.15
n_xmax := 20
z := 0.36
ΔT_экспл := 15  # °C
ν := 0.3
# Материал:
σ_r := 0.15  # km
# Органопластик
σ_K := 150 km
P_1тр := 0.9
M_1тр := 0.9
σ_k := 1900 MPa
Δp_ф := 0.03  # MPa
ρ_k := 1350*kg/m^3
# ТЗП
ρ_ср := 1.0*gm/cm^3
# Расчет массы полезной нагрузки:
# Мощность боевого блока
# Точечные цели:
# Коэффициент защищенности:
K_цт := 0.97*ΔP_ф^-0.37 = 0.413782
q_1р := (2/n_ББ)^(3/2)*(σ_r/K_цт)^3*ln(1/(1 - P_1тр))^(3/2) = 0.0906036  # Мт
# Площадная цель:
# Коэффициент защищенности:
K_цп := 0.78*Δp_ф^-0.5 = 4.50333
q_1x := (M_1тр/n_ББ)^(3/2)*(R_ц/K_цп)^3 = 0.0771408  # Мт
q'_1 := max(q_1x, q_1р) = 0.0906036  # Мт
# Выбор массы и габартиов ББ
q'_1*90*% = 0.0815432
q_1 := 0.1
m_ББ := 100 kg
d_ББ := 0.037*(m_ББ/kg)^0.5*m = 0.37 m
l_ББ := 3*d_ББ = 1.11 m
r_нос := 0.1*d_ББ = 0.037 m
# Расчет массы полезной нагрузки
# Двухрежимная ДУ БС
ω_дд := 86.9 kg  # масса топлива доводочного двигателя
m_БК := m_ББ*n_ББ = 300 kg  # масса боевой комлпектности
m_пл := (10*n_ББ)*kg + 0.1*m_БК = 60 kg  # масса платформы разведения
m_СУ := (95 + 5*n_ББ^0.5)*kg = 103.66 kg  # масса системы управления
m_КБС := (45 + 0.06*n_ББ)*kg = 45.18 kg  # масса конструктивных элементов
m_дд := 13.8 kg^(2/3)*ω_дд^(1/3) + ω_дд = 148.025 kg  # масса доводочного двигателя
K_з := 1.1  # Моб. база
m_ПН := K_з*(m_БК + m_пл + m_СУ + m_КБС + m_дд) = 722.552 kg  # масса полезной нагрузки
R_ддmin := 0.5*m/s^2*m_ПН = 361.276 N
ω_ддmin := R_ддmin/J_1T = 0.140574 kg/s
R_ддmax := 2.5*m/s^2*m_ПН = 1806.38 N
ω_ддmax := R_ддmax/J_1T = 0.702871 kg/s
L'_max := [1000; 2500; 4500; 6000; 8000; 10000; 12000]*km
dLdV' := [0.66; 1.23; 2.05; 2.78; 4.04; 5.69; 8]*km/(m/s)
dBdV' := [0.46; 0.69; 0.88; 0.97; 1.01; 0.98; 0.88]*km/(m/s)
θ'_k := [42.7; 38.4; 34.9; 31.5; 27.0; 22.5; 18.0]*deg
dLdV(L) := linterp(L'_max, dLdV', L)
dBdV(L) := linterp(L'_max, dBdV', L)
dLdV(L_max) = 4.865 km/(m/s)
dBdV(L_max) = 0.995 km/(m/s)
ΔL_гар := 0.04*L_max = 360 km
ΔV_гар := ΔL_гар/dLdV(L_max) = 73.9979 m/s
β := 10 deg  # Угол наклона осей толкающих сопел к оси БС
ΔV_λ := ΔL/dLdV(L_max) = 82.2199 m/s
ΔV_ρ := ΔB/dBdV(L_max) = 201.005 m/s
# 0) Перед началом работы:
m_0 := m_ПН = 722.552 kg
ω_0 := ω_дд = 86.9 kg
t_0 := 0 s
# 1) Отработка промаха:
Δω_1 := ΔV_гар*m_0/(J_1T*cos(β)) = 21.1254 kg
Δt_1 := Δω_1/ω_ддmax = 30.0558 s
# После окончания отработки промаха:
m_1 := m_0 - Δω_1 = 701.426 kg
t_1 := t_0 + Δt_1 = 30.0558 s
ω_1 := ω_0 - Δω_1 = 65.7746 kg
# 2) Разворот стабилизация:
Δt_2 := 10 s
Δω_2 := Δt_2*ω_ддmin = 1.40574 kg
# Отделение первого ББ:
Δm_2 := m_ББ = 100 kg
# После отделения
# первого ББ:
m_2 := m_1 - Δω_2 - Δm_2 = 600.021 kg
t_2 := t_1 + Δt_2 = 40.0558 s
ω_2 := ω_1 - Δω_2 = 64.3689 kg
# 3) Разворот стабилизация
# по λ направлению:
Δt_3 := 10 s
Δω_3 := Δt_3*ω_ддmin = 1.40574 kg
# После разворота,
# стабилизации:
m_3 := m_2 - Δω_3 = 598.615 kg
t_3 := t_2 + Δt_3 = 50.0558 s
ω_3 := ω_2 - Δω_3 = 62.9632 kg
# 4) Разгон по λ направлению:
Δω_4 := ΔV_λ*m_3/(J_1T*cos(β)) = 19.4464 kg
Δt_4 := Δω_4/ω_ддmax = 27.6671 s
# После разгона:
m_4 := m_3 - Δω_4 = 579.169 kg
t_4 := t_3 + Δt_4 = 77.7229 s
ω_4 := ω_3 - Δω_4 = 43.5167 kg
# 5) Разворот стабилизация:
Δt_5 := 10 s
Δω_5 := Δt_5*ω_ддmin = 1.40574 kg
# Отделение второго ББ:
Δm_5 := m_ББ = 100 kg
# После отделения
# второго ББ:
m_5 := m_4 - Δω_5 - Δm_5 = 477.763 kg
t_5 := t_4 + Δt_5 = 87.7229 s
ω_5 := ω_4 - Δω_5 = 42.111 kg
# 6) Разворот стабилизация
# по ρ направлению:
Δt_6 := 10 s
Δω_6 := Δt_6*ω_ддmin = 1.40574 kg
# После разворота,
# стабилизации:
m_6 := m_5 - Δω_6 = 476.357 kg
t_6 := t_5 + Δt_6 = 97.7229 s
ω_6 := ω_5 - Δω_6 = 40.7052 kg
# 7) Разгон по ρ направлению:
Δω_7 := ΔV_ρ*m_6/(J_1T*cos(β)) = 37.8316 kg
Δt_7 := Δω_7/ω_ддmax = 53.8244 s
# После разгона:
m_7 := m_6 - Δω_7 = 438.525 kg
t_7 := t_6 + Δt_7 = 151.547 s
ω_7 := ω_6 - Δω_7 = 2.87361 kg
# 8) Разворот стабилизация:
Δt_8 := 10 s
Δω_8 := Δt_8*ω_ддmin = 1.40574 kg
# Отделение третьего ББ:
Δm_8 := m_ББ = 100 kg
# После отделения
# третьего ББ:
m_8 := m_7 - Δω_8 - Δm_8 = 337.12 kg
t_8 := t_7 + Δt_8 = 161.547 s
ω_8 := ω_7 - Δω_8 = 1.46787 kg
# 9) Отход от ББ:
Δt_9 := 10 s
Δω_9 := Δt_9*ω_ддmin = 1.40574 kg
# После отхода:
m_9 := m_8 - Δω_9 = 335.714 kg
t_9 := t_8 + Δt_9 = 171.547 s
ω_9 := ω_8 - Δω_9 = 0.0621272 kg
# Предварительное определение параметров УБР
KvVk := 800*(L_max/km)^(1/4)*m/s = 7792.03 m/s
L_max = 9000 km
Λ_0 := 1.6
n := 3
m'_0 := 0.01*(L_max/km)^(2/3)*tonne = 4.32675 tonne
J_1п1 := 1.095*J_1T = 2814.15 m/s
J_1п2 := 1.135*J_1T = 2916.95 m/s
J_1п3 := 1.145*J_1T = 2942.65 m/s
J' := (J_1п1 + J_1п2 + J_1п3)/3 = 2891.25 m/s
m_00 := (Λ_0*m_ПН*e^(KvVk/J') + m'_0) = 21.4438 tonne
# Распределение масс топлив по ступеням
μ_отн := 1 - nthroot(e^(-KvVk/J'), n) = 0.592757
# Для трехступенчатой ракеты:
μ_1 := 0.85*μ_отн = 0.503844
μ_2 := μ_отн
μ_3 := 1 - e^(-KvVk/J')/((1 - μ_1)*(1 - μ_2)) = 0.665737
# Время работы:
ΔP_P.N := 1/(1 - ν)*sqrt(Δu_1u.1^2 + Δ_сл^2 + (K_T*ΔT_экспл)^2) = 0.0717848
τ_N3.min := J_1п3/(n_xmax*g*(1 - ΔP_P.N))*μ_3/(1 - μ_3) = 32.1925 s
τ_N2.min := J_1п2/(n_xmax*g*(1 - ΔP_P.N))*μ_2/(1 - μ_2) = 23.3213 s
τ_N1 := 50 s
τ_N2 := 36 s
τ_N3 := 33 s
τ_N3 ≥ J_1п3/(n_xmax*g*(1 - ΔP_P.N))*μ_3/(1 - μ_3) = 1
τ_N1 + τ_N2 + τ_N3 = 119 s
τ_Σ*(1 - ΔP_P.N) = 129.95 s
τ_N1 + τ_N2 + τ_N3 ≤ τ_Σ*(1 - ΔP_P.N) = 1
# Относитльная масса полезной нагрузки:
m_ПН.отн := m_ПН/m_00 = 0.0336951
α_отн := (1 - μ_отн - nthroot(m_ПН.отн, 3))/μ_отн = 0.142137
α_1 := 0.9*α_отн = 0.127923
α_3 := 1.03*α_отн = 0.146401
α_2 := (1 - μ_2)/μ_2 - m_ПН.отн/(μ_2*(1 - μ_1*(1 + α_1))*(1 - μ_3*(1 + α_3))) = 0.130964
# Массы ступеней | Масса топлива
m_00 = 21443.8 kg
ω_N1 := μ_1*m_00 = 10804.3 kg
m_к1 := ω_N1*α_1 = 1382.12 kg
m_02 := m_00*(1 - μ_1*(1 + α_1)) = 9257.36 kg
ω_N2 := μ_2*m_02 = 5487.37 kg
m_к2 := ω_N2*α_2 = 718.65 kg
m_03 := m_02*(1 - μ_2*(1 + α_2)) = 3051.34 kg
ω_N3 := μ_3*m_03 = 2031.39 kg
m_к3 := ω_N3*α_3 = 297.398 kg
ω_N1 := 9529.506 kg
ω_N2 := 4859.295 kg
# Диаметры ступеней
ω_N3 := 1885.647 kg
D_1 := 0.52*nthroot(m_00/tonne, 3)*m = 1.44468 m  # Давления в баках:  # Относительное расширение ступеней
P_N1 := 11 MPa
l_y1.отн := 0.15
D_2 := 0.85*D_1 = 1.22798 m
P_N2 := 9 MPa
l_y2.отн := 0.1
P_N3 := 7 MPa
l_y3.отн := 0.07
D_3 := 0.85*D_2 = 1.04378 m
# Промежуточные результаты первого приближения
# Мощность боевого блока:
q_1 = 0.1  # Мт
# Диаметр боевого блока:
d_ББ = 0.37 m
# Масса боевого блока:
m_ББ = 100 kg
# Длина боевого блока:
l_ББ = 1.11 m
# Радиус скругления носа:
r_нос = 0.037 m
# Масса топлива доводочного двигателя:
ω_дд = 86.9 kg
# Масса боевой комлпектности:
m_БК = 300 kg
# Масса платформы разведения:
m_пл = 60 kg
# Масса системы управления:
m_СУ = 103.66 kg
# Масса конструктивных элементов:
m_КБС = 45.18 kg
# Масса доводочного двигателя:
m_дд = 148.025 kg
# Масса полезной нагрузки:
m_ПН = 722.552 kg
# Первая ступень | Вторая ступень | Третья ступень
# Масса топлива:
ω_N1 = 9529.51 kg
ω_N2 = 4859.3 kg
ω_N3 = 1885.65 kg
# Масса конструкции:
m_к2 = 718.65 kg
m_к2 = 718.65 kg
m_к3 = 297.398 kg
# Давления в баках:
P_N1 = 11 MPa
P_N2 = 9 MPa
P_N3 = 7 MPa
# Время работы:
τ_N1 = 50 s
τ_N2 = 36 s
τ_N3 = 33 s
# Диаметр бака:
D_1 = 1.44468 m
D_2 = 1.22798 m
D_3 = 1.04378 m
# Удельный импульс в путоте:
J_1п1 = 2814.15 m/s
J_1п2 = 2916.95 m/s
J_1п3 = 2942.65 m/s
P_max1 := (1 + ΔP_P.N)*P_N1 = 11789633 kg/(m*s^2)
P_max2 := (1 + ΔP_P.N)*P_N2 = 9646063 kg/(m*s^2)
P_max3 := (1 + ΔP_P.N)*P_N3 = 7502494 kg/(m*s^2)
# Определение свода:
ε_доп := 0.4  # допустимая деформация
f := 1.35  # коэффициент запаса
# P_Ni | давление, которое может возникнуть в двигателе
α_Т := 10^-4  # коэффициент линейного температурного расширения
α_к := 10^-5  # коэффициент температурного расширения конструкции двигателя
E_Т := 7.5 MPa  # модуль Юнга
μ_Т := 0.495  # коэффициент Пуассона
# Относительные диаметры зарядов ступеней
M_1 := sqrt((P_max1/E_Т*(1 + μ_Т)*(1 - 2*μ_Т) + 45*(α_к - α_Т)*μ_Т + ε_доп/f)/(P_max1/E_Т*(1 + μ_Т)*(1 - 2*μ_Т) + 45*(α_к - α_Т)*(2 - μ_Т) - ε_доп/f*(1 - 2*μ_Т))) = 4.69085
M_2 := sqrt((P_max2/E_Т*(1 + μ_Т)*(1 - 2*μ_Т) + 45*(α_к - α_Т)*μ_Т + ε_доп/f)/(P_max2/E_Т*(1 + μ_Т)*(1 - 2*μ_Т) + 45*(α_к - α_Т)*(2 - μ_Т) - ε_доп/f*(1 - 2*μ_Т))) = 5.55239
M_3 := sqrt((P_max3/E_Т*(1 + μ_Т)*(1 - 2*μ_Т) + 45*(α_к - α_Т)*μ_Т + ε_доп/f)/(P_max3/E_Т*(1 + μ_Т)*(1 - 2*μ_Т) + 45*(α_к - α_Т)*(2 - μ_Т) - ε_доп/f*(1 - 2*μ_Т))) = 7.24179
# Относительные своды горения зарядов ступеней
e'_1 := 0.5*(1 - 1/M_1) = 0.393409
e'_2 := 0.5*(1 - 1/M_2) = 0.409949
e'_3 := 0.5*(1 - 1/M_3) = 0.430956
# Диаметры каналов зарядов ступеней | Своды горения зарядов ступеней
e_1 := e'_1*D_1 = 0.568349 m
d_1 := D_1/M_1 = 0.307978 m
e_2 := e'_2*D_2 = 0.503407 m
e_3 := e'_3*D_3 = 0.449823 m
d_2 := D_2/M_2 = 0.221161 m
d_3 := D_3/M_3 = 0.144133 m
# Мин и макс значение скорости горения топлива при стандартных условиях
u_min := 6*mm/s
u_max := 15*mm/s
# Мин и макс реализуемые номинальные значения скоростей горения топлива при номинальных давлениях в корпусах ДУ ступеней
u_N1min := u_min*(P_N1/(4 MPa))^ν = 8.12739 mm/s
u_N1max := u_max*(P_N1/(4 MPa))^ν = 20.3185 mm/s
u_N2min := u_min*(P_N2/(4 MPa))^ν = 7.65255 mm/s
u_N2max := u_max*(P_N2/(4 MPa))^ν = 19.1314 mm/s
u_N3min := u_min*(P_N3/(4 MPa))^ν = 7.0968 mm/s
u_N3max := u_max*(P_N3/(4 MPa))^ν = 17.742 mm/s
# Мин и макс реализуемые номинальные значения времени работы ДУ ступеней
τ_N1min := e'_1*D_1/u_N1max = 27.9721 s
τ_N1 = 50 s
τ_N1max := e'_1*D_1/u_N1min = 69.9301 s
τ_N2min := e'_2*D_2/u_N2max = 26.3132 s
τ_N2 = 36 s
τ_N2max := e'_2*D_2/u_N2min = 65.7829 s
τ_N3max := e'_3*D_3/u_N3min = 63.3839 s
τ_N3min := e'_3*D_3/u_N3max = 25.3536 s
τ_N3 = 33 s
# Номинальных значений скоростей горения топлива
u_N1 := e_1/τ_N1 = 11.367 mm/s
u_N2 := e_2/τ_N2 = 13.9835 mm/s
u_N3 := e_3/τ_N3 = 13.631 mm/s
# Расширение сопел, удельный импульс
# Расходный комплекс ДУ ступеней:
β_t := 0.651*J_1T = 1673.07 m/s
σ_кр1 := ω_N1*β_t/(P_N1*τ_N1) = 0.0289882 m^2
# Площадь сечения в критике:
σ_кр2 := ω_N2*β_t/(P_N2*τ_N2) = 0.0250924 m^2
σ_кр3 := ω_N3*β_t/(P_N3*τ_N3) = 0.0136572 m^2
d_кр1 := sqrt(4*σ_кр1/π) = 0.192117 m
# Диаметр критического сечения:
d_кр2 := sqrt(4*σ_кр2/π) = 0.178742 m
d_кр3 := sqrt(4*σ_кр3/π) = 0.131867 m
d'_a1 := sqrt(0.9*P_N1/MPa + 5) = 3.86005
# Степень расширения сопла:
d'_a2 := 0.8*D_1/d_кр2 = 6.46598
d'_a3 := 0.8*D_2/d_кр3 = 7.44978
d_a1 := d'_a1*d_кр1 = 0.741582 m
# Диаметр выходного сечения:
d_a2 := d'_a2*d_кр2 = 1.15574 m
d_a3 := d'_a3*d_кр3 = 0.98238 m
l_a1 := d_a1 = 0.741582 m
# Длина сопла:
l_a2 := d_a2 = 1.15574 m
l_a3 := d_a3 = 0.98238 m
# Глубина утопленности сопел ДУ
l_у1 := □  # error: Пустой местозаполнитель.
J_1ПТ1 := J_1T*(1.57/sqrt(k) - 0.66/d'_a1^(2/3)) = 3073.25 m/s
# Теоретические значения удельного пустотного импульса:
J_1ПТ2 := J_1T*(1.57/sqrt(k) - 0.66/d'_a2^(2/3)) = 3273.85 m/s
J_1ПТ3 := J_1T*(1.57/sqrt(k) - 0.66/d'_a3^(2/3)) = 3317.88 m/s
ξ_1 := 0.025*(d'_a1^1.25 - 1)/d'_a1*(1 + 11.6*z/nthroot(d_кр1/cm, 3)) = 0.0731048
# Потери удельного импульса:
ξ_2 := 0.025*(d'_a2^1.25 - 1)/d'_a2*(1 + 11.6*z/nthroot(d_кр2/cm, 3)) = 0.0934962
ξ_3 := 0.025*(d'_a3^1.25 - 1)/d'_a3*(1 + 11.6*z/nthroot(d_кр3/cm, 3)) = 0.105021
J_1П1 := J_1ПТ1*(1 - ξ_1) = 2848.58 m/s
# Практические значения удельного пустотного импульса:
J_1П2 := J_1ПТ2*(1 - ξ_2) = 2967.76 m/s
J_1П3 := J_1ПТ3*(1 - ξ_3) = 2969.44 m/s
# Силовой корпус "кокон"
l_y1.отн = 0.15
l_у1 := l_y1.отн*d_a1 = 0.111237 m
l_y2.отн = 0.1
l_у2 := l_y2.отн*d_a2 = 0.115574 m
d_02 := [0.2; 0.3; 0.4]
K_ц.табл := [1.148; 1.17; 1.204]
K_v.табл := [0.505; 0.514; 0.533]
K_l.табл := [0.89; 0.902; 0.922]
l_y3.отн = 0.07
l_у3 := l_y3.отн*d_a3 = 0.0687666 m
R_1 := D_1/2 = 0.722338 m
d_02.i(d_крi, l_yi.отн, d_ai, l_ai) := 2*((d_ai - d_крi)/l_ai*(l_yi.отн*d_ai) + d_крi)
d_02.1 := d_02.i(d_кр1, l_y1.отн, d_a1, l_a1) = 0.549074 m
R_2 := D_2/2 = 0.613988 m
d_02.2 := d_02.i(d_кр2, l_y2.отн, d_a2, l_a2) = 0.552884 m
d_02.3 := d_02.i(d_кр3, l_y3.отн, d_a3, l_a3) = 0.382806 m
R_3 := D_3/2 = 0.521889 m
d_02.отн1 := d_02.1/D_1 = 0.380067
d_02.отн2 := d_02.2/D_2 = 0.45024
d_02.отн3 := d_02.3/D_3 = 0.36675
K_ц1 := linterp(d_02, K_ц.табл, d_02.отн1) = 1.19722
K_ц2 := linterp(d_02, K_ц.табл, d_02.отн2) = 1.22108
K_v1 := linterp(d_02, K_v.табл, d_02.отн1) = 0.529213
K_v2 := linterp(d_02, K_v.табл, d_02.отн2) = 0.542546
K_l1 := linterp(d_02, K_l.табл, d_02.отн1) = 0.918013
K_l2 := linterp(d_02, K_l.табл, d_02.отн2) = 0.932048
K_ц3 := linterp(d_02, K_ц.табл, d_02.отн3) = 1.1927
K_v3 := linterp(d_02, K_v.табл, d_02.отн3) = 0.526683
K_l3 := linterp(d_02, K_l.табл, d_02.отн3) = 0.91535
η_ц1.зв := 4*e'_1*(1 - e'_1) = 0.954554
η_ц2.зв := 4*e'_2*(1 - e'_2) = 0.967563
η_ц3.зв := 4*e'_3*(1 - e'_3) = 0.980932
η_ц1 := 0.985*η_ц1.зв = 0.940235  # - коэффициент заполнения цилидрической части 1 ступени
η_ц2 := 0.985*η_ц2.зв = 0.95305  # - коэффициент заполнения цилидрической части 2 ступени
η_ц3 := 0.985*η_ц3.зв = 0.966218  # - коэффициент заполнения цилидрической части 3 ступени
η_дн1.зв := 1 - 1.5*(1 - η_ц1.зв) = 0.931831
f_р := 1.15
η_дн2.зв := 1 - 1.5*(1 - η_ц2.зв) = 0.951345
S_maxSср := 1.15
η_дн3.зв := 1 - 1.5*(1 - η_ц3.зв) = 0.971398
k_σ := 1.05
η_дн1 := η_дн1.зв*0.85 = 0.792056
η_дн2 := η_дн2.зв*0.85 = 0.808643
σ'_к := σ_k/ρ_k = 1407407 m^2/s^2
η_дн3 := η_дн3.зв*0.85 = 0.825688
ρ_T = 1850 kg/m^3
P_max.maxi(P_Ni) := f_р*P_Ni*(1 + ΔP_P.N)*S_maxSср^(1/(1 - ν))*k_σ
P_max.max1 := P_max.maxi(P_N1) = 17.382 MPa
P_max.max2 := P_max.maxi(P_N2) = 14.2216 MPa
P_max.max3 := P_max.maxi(P_N3) = 11.0612 MPa
K_ск1 := K_ц1/η_ц1 + K_v1*π*R_1^3/ω_N1*ρ_T = 1.39497
K_ск2 := K_ц2/η_ц2 + K_v2*π*R_2^3/ω_N2*ρ_T = 1.43143
K_ск3 := K_ц3/η_ц3 + K_v3*π*R_3^3/ω_N3*ρ_T = 1.46515
m_ск1 := 3*K_ск1*P_max.max1*ω_N1/(σ'_к*ρ_T) = 266.234 kg
m_ск2 := 3*K_ск2*P_max.max2*ω_N2/(σ'_к*ρ_T) = 113.978 kg
m_ск3 := 3*K_ск3*P_max.max3*ω_N3/(σ'_к*ρ_T) = 35.2108 kg
l_ц1 := 4*ω_N1/(π*D_1^2*ρ_T*η_ц1) - K_l1*R_1*η_дн1/η_ц1 = 2.78358 m
d_01.отн := 0.2
l_ц2 := 4*ω_N2/(π*D_2^2*ρ_T*η_ц2) - K_l2*R_2*η_дн2/η_ц2 = 1.84155 m
d_011 := d_01.отн*D_1 = 0.288935 m
d'_y1 := d_02.1/2/d_кр1 = 1.42901
d_012 := d_01.отн*D_2 = 0.245595 m
l_ц3 := 4*ω_N3/(π*D_3^2*ρ_T*η_ц3) - K_l3*R_3*η_дн3/η_ц3 = 0.824608 m
d_013 := d_01.отн*D_3 = 0.208756 m
d'_y2 := d_02.2/2/d_кр2 = 1.5466
l_дн11 := (0.305 + 0.1*d_01.отн)*D_1 = 0.46952 m
l_дн12 := (0.305 + 0.1*d_02.отн1)*D_1 = 0.495534 m
l_дн21 := (0.305 + 0.1*d_01.отн)*D_2 = 0.399092 m
d'_y3 := d_02.3/2/d_кр3 = 1.45148
l_дн22 := (0.305 + 0.1*d_02.отн2)*D_2 = 0.429821 m
l_дн31 := (0.305 + 0.1*d_01.отн)*D_3 = 0.339228 m
l_дн32 := (0.305 + 0.1*d_02.отн3)*D_3 = 0.356633 m
λ_ц1 := l_ц1/D_1 = 1.92678
λ_ц2 := l_ц2/D_2 = 1.49967
λ_ц3 := l_ц3/D_3 = 0.790022
ρ_ВТ_4 := 4540*kg/m^3
# Закладные фланцы "кокона"
σ_ВТ_4 := 1400 MPa
K_фл := 0.9
m_фл1 := K_фл*D_1^3*((d_01.отн + d_02.отн1)/2)^3*sqrt(P_N1)*ρ_ВТ_4/sqrt(σ_ВТ_4) = 26.6432 kg
(d_01.отн + d_02.отн1)/2 = 0.290033
m_фл2 := K_фл*D_2^3*((d_01.отн + d_02.отн2)/2)^3*sqrt(P_N2)*ρ_ВТ_4/sqrt(σ_ВТ_4) = 20.8476 kg
(d_01.отн + d_02.отн2)/2 = 0.32512
m_фл3 := K_фл*D_3^3*((d_01.отн + d_02.отн3)/2)^3*sqrt(P_N3)*ρ_ВТ_4/sqrt(σ_ВТ_4) = 7.47642 kg
(d_01.отн + d_02.отн3)/2 = 0.283375
# Юбки "кокона"
K_ю := 1.61
m_ю1 := K_ю*P_N1*D_1^3/σ'_к = 37.9412 kg
m_ю2 := K_ю*P_N2*D_2^3/σ'_к = 19.0641 kg
m_ю3 := K_ю*P_N3*D_3^3/σ'_к = 9.10604 kg
# Крышка воспломинительного устройства
K_ву := 0.9
m_ву1 := K_ву*P_N1*D_1^3/(σ_ВТ_4/ρ_ВТ_4) = 96.7999 kg
m_ву2 := K_ву*P_N2*D_2^3/(σ_ВТ_4/ρ_ВТ_4) = 48.6387 kg
m_ву3 := K_ву*P_N3*D_3^3/(σ_ВТ_4/ρ_ВТ_4) = 23.2324 kg
# Защитно-крепящий слой
q_зск := 2.4*kg/m^2
S_зкс1 := π*D_1^2*(λ_ц1 + 0.615) = 16.6659 m^2
m_зск1 := S_зкс1*q_зск = 39.9982 kg
S_зкс2 := π*D_2^2*(λ_ц2 + 0.615) = 10.0178 m^2
m_зск2 := S_зкс2*q_зск = 24.0427 kg
S_зкс3 := π*D_3^2*(λ_ц3 + 0.615) = 4.80895 m^2
m_зск3 := S_зкс3*q_зск = 11.5415 kg
ρ_тзп := 1000*kg/m^3
# Теплозащитное покрытие кокона (ТПЗ)
K_тзп := 1.17*10^-3
m_тзп1 := K_тзп*ω_N1*sqrt(P_N1/MPa*τ_N1/s)/(ρ_T*D_1/m*λ_ц1^0.25)*ρ_тзп = 83.0399 kg
m_тзп2 := K_тзп*ω_N2*sqrt(P_N2/MPa*τ_N2/s)/(ρ_T*D_2/m*λ_ц2^0.25)*ρ_тзп = 40.7072 kg
m_тзп3 := K_тзп*ω_N3*sqrt(P_N3/MPa*τ_N3/s)/(ρ_T*D_3/m*λ_ц3^0.25)*ρ_тзп = 18.4188 kg
# Утопленная оболочка сопла
K_уо := 16.5*10^-9
ρ_ВТ_6 := 4500*kg/m^3
E_ВТ_6 := 122000 MPa
m_уо1 := K_уо*(β_t*ω_N1/τ_N1)^1.5*d'_y1^2.35*l_y1.отн^0.4*d'_a1^0.4/(P_N1/10^6)^1.1*ρ_ВТ_6/(E_ВТ_6/10^6)^0.4 = 16.4228 kg
d'_y1 = 1.42901
m_уо2 := K_уо*(β_t*ω_N2/τ_N2)^1.5*d'_y2^2.35*l_y2.отн^0.4*d'_a2^0.4/(P_N2/10^6)^1.1*ρ_ВТ_6/(E_ВТ_6/10^6)^0.4 = 15.3622 kg
d'_y2 = 1.5466
m_уо3 := K_уо*(β_t*ω_N3/τ_N3)^1.5*d'_y3^2.35*l_y3.отн^0.4*d'_a3^0.4/(P_N3/10^6)^1.1*ρ_ВТ_6/(E_ВТ_6/10^6)^0.4 = 4.40952 kg
d'_y3 = 1.45148
# Теплозащитное покрытие утопленной оболочки (ТЗУО)
К_тзуо := 3.7*10^-9*1/(m^-1.5*kg^0.5*s^-0.5)
ρ_тзуо := 1400*kg/m^3
m_тзуо1 := К_тзуо*β_t*ω_N1/sqrt(P_N1/10^6*τ_N1)*d'_y1^1.75*ρ_тзуо = 6.57724 kg
m_тзуо2 := К_тзуо*β_t*ω_N2/sqrt(P_N2/10^6*τ_N2)*d'_y2^1.75*ρ_тзуо = 5.01828 kg
m_тзуо3 := К_тзуо*β_t*ω_N3/sqrt(P_N3/10^6*τ_N3)*d'_y3^1.75*ρ_тзуо = 2.06381 kg
d'_y3 = 1.45148
# Корпус раструба
K_кр := 11.2*10^-9
σ_ВТ_6 := 1300 MPa
m_кр1 := K_кр*(β_t*ω_N1/τ_N1)^1.5*d'_a1^1.75*ρ_ВТ_6/(sqrt(P_N1/10^6)*σ_ВТ_6/10^6) = 22.3744 kg
d'_a1 = 3.86005
d_кр1*d'_a1 = 0.741582 m
m_кр2 := K_кр*(β_t*ω_N2/τ_N2)^1.5*4.5^1.75*ρ_ВТ_6/(sqrt(P_N2/10^6)*σ_ВТ_6/10^6) = 19.2826 kg
d_кр1 := sqrt(4*σ_кр1/π) = 0.192117 m
4.5*d_кр2 = 0.804338 m
4.5*d_кр3 = 0.593402 m
d_кр2 := sqrt(4*σ_кр2/π) = 0.178742 m
m_кр3 := K_кр*(β_t*ω_N3/τ_N3)^1.5*4.5^1.75*ρ_ВТ_6/(sqrt(P_N3/10^6)*σ_ВТ_6/10^6) = 6.02214 kg
d_кр3 := sqrt(4*σ_кр3/π) = 0.131867 m
# Облицовка раструба
K_обл := 3.1*10^-9*1/(m^-1.5*kg^0.5*s^-0.5)
ρ_обл := 1400*kg/m^3
m_обл1 := K_обл*β_t*ω_N1/sqrt(P_N1/10^6*τ_N1)*d'_a1^1.75*ρ_обл = 31.364 kg
l_дн12 = 0.495534 m
D_1 = 1.44468 m
R'_дн := 1 mm
m_обл2 := K_обл*β_t*ω_N2/sqrt(P_N2/10^6*τ_N2)*d'_a2^1.75*ρ_обл = 51.3943 kg
Given
R'_дн^2 == (R'_дн - l_дн)^2 + R^2
m_обл3 := K_обл*β_t*ω_N3/sqrt(P_N3/10^6*τ_N3)*d'_a3^1.75*ρ_обл = 30.2628 kg
R_дн(l_дн, R) := Find(R'_дн)
r_кон := R_дн(l_дн11, R_1)*sin(30 deg) = 0.395202 m
2*r_кон = 0.790405 m
# Горловина
x := R_дн(l_дн11, R_1)*(1 - cos(30 deg)) = 0.105894 m
K_г := 6.44*10^-5*kg^0.5/(m^1.5*s^-0.5)
m_г1 := K_г*β_t*ω_N1/sqrt(P_N1/10^6*τ_N1) = 43.7813 kg
l'_заз := 0.1 m
m_г2 := K_г*β_t*ω_N2/sqrt(P_N2/10^6*τ_N2) = 29.0871 kg
Given
d_a2/(R_дн(l_дн11, R_1) + l'_заз) == 2*r_кон/(R_дн(l_дн11, R_1) - x)
m_г3 := K_г*β_t*ω_N3/sqrt(P_N3/10^6*τ_N3) = 13.3676 kg
l_заз := Find(l'_заз) = 0.210497 m
# Привод рулевых машин и устройства управления вектором тяги
d_кон := (R_дн(l_дн11, R_1) - x)*d_a2/(R_дн(l_дн11, R_1) + l_заз) = 0.790405 m
K_РМУ1 := 0.65*s*sqrt(m)
m_РМУ1 := K_РМУ1*ω_N1/(τ_N1*sqrt(D_1)) = 103.069 kg
K_РМУ2 := 0.57*s*sqrt(m)
K_РМУ3 := 0.38*s*sqrt(m)
m_РМУ2 := K_РМУ2*ω_N2/(τ_N2*sqrt(D_2)) = 69.4306 kg
m_РМУ3 := K_РМУ3*ω_N3/(τ_N3*sqrt(D_3)) = 21.2533 kg
# Длины отсеков и ступеней
l_ю1 := 0.15*D_1 = 0.216702 m
l_ю2 := 0.15*D_2 = 0.184196 m
l_ю3 := 0.15*D_3 = 0.156567 m
l_хо1 := l_дн12 + l_a1 - l_y1.отн*d_a1 - 150 mm - l_ю1 = 0.759177 m  # l.дн22 - длина правого днища второй ступени
l_по1_хо2 := l_дн22 + l_a2 - l_y2.отн*d_a2 + l_дн11 + l_заз - l_ю1 - l_ю2 = 1.74911 m
l_по1 := (D_1^2 - l_ю1^2)^0.5 - l_ю1 - (R_дн(l_дн11, R_1) - l_дн11) = 0.890745 m
R_дн(l_дн11, R_1) = 0.790405 m  # l.a2 - длина сопла
l_хо2 := l_по1_хо2 - l_по1 = 0.858362 m
R_дн(l_дн21, R_2) = 0.671844 m  # l.y2.отн -
R_дн(l_дн31, R_3) = 0.571068 m
l_по2 := (D_2^2 - l_ю2^2)^0.5 - l_ю2 - (R_дн(l_дн21, R_2) - l_дн21) = 0.757133 m
l_ст1 := l_по1 + l_ц1 = 3.67432 m
l_ст2 := l_по2 + l_ц2 = 2.59869 m
l_тр1 := 0 m  # Поперечное-продольное разделение
l_тр2 := l_ст2 + l_хо2 = 3.45705 m
l_по2_хо3 := l_дн32 + l_a3 - l_y3.отн*d_a3 + l_дн21 + l_заз - l_ю2 - l_ю3 = 1.53907 m
l_хо3 := l_по2_хо3 - l_по2 = 0.781939 m
l_по3 := (D_3^2 - l_ю3^2)^0.5 - l_ю3 - (R_дн(l_дн31, R_3) - l_дн31) = 0.643563 m
l_ст3 := l_по3 + l_ц3 = 1.46817 m
l_тр3 := l_ст3 + l_хо3 = 2.25011 m
# Отсеки ступеней
K_отс := 24*kg/m^2
m_отс1 := K_отс*π*D_1*l_хо1 = 82.6941 kg
m_отс2 := K_отс*π*D_1*l_по1 = 97.0254 kg
m_отс3 := K_отс*π*D_2*l_хо2 = 79.4732 kg
m_отс4 := K_отс*π*D_2*l_по2 = 70.1008 kg
m_отс5 := K_отс*π*D_3*l_хо3 = 61.5379 kg
m_отс6 := K_отс*π*D_3*l_по3 = 50.6478 kg
# Поперечное-продольное разделение
# Головной обтекатель
K_ГО := 24*kg/m^2
ΔL_ГО := 400 mm = 0.4 m
S_ГО := π*D_2/2*(l_ББ + ΔL_ГО) = 2.91264 m^2
m_ГО := K_ГО*S_ГО + 10 kg = 79.9033 kg
# Бортовая кабельная сеть (БКС)
m_БКС1 := ((0.8*l_ст1 + 2 m) + (0.8*l_тр1 + 2 m)*(1 - 1))*kg/m = 4.93946 kg
m_БКС2 := ((0.8*l_ст2 + 2 m) + (0.8*l_тр2 + 2 m)*(2 - 1))*kg/m = 8.84459 kg
m_БКС3 := ((0.8*l_ст3 + 2 m) + (0.8*l_тр3 + 2 m)*(3 - 1))*kg/m = 10.7747 kg
l_тр3 = 2.25011 m
# Уточнение относительных характеристик
# Масса конструкций ступеней:
m_КК1 := m_ск1 + m_фл1 + m_ю1 + m_ву1 + m_зск1 + m_тзп1 = 550.656 kg
m_КК2 := m_ск2 + m_фл2 + m_ю2 + m_ву2 + m_зск2 + m_тзп2 = 267.279 kg
m_КК3 := m_ск3 + m_фл3 + m_ю3 + m_ву3 + m_зск3 + m_тзп3 = 104.986 kg
m_КДУ1 := m_КК1 + m_уо1 + m_тзуо1 + m_кр1 + m_обл1 + m_г1 + m_РМУ1 = 774.245 kg
m_КДУ2 := m_КК2 + m_уо2 + m_тзуо2 + m_кр2 + m_обл2 + m_г2 + m_РМУ2 = 456.854 kg
m_КДУ3 := m_КК3 + m_уо3 + m_тзуо3 + m_кр3 + m_обл3 + m_г3 + m_РМУ3 = 182.365 kg
m_K1 := m_КК1 + m_уо1 + m_тзуо1 + m_кр1 + m_обл1 + m_г1 + m_РМУ1 + m_отс1 + m_отс2 + m_БКС1 = 958.904 kg
m_K2 := m_КК2 + m_уо2 + m_тзуо2 + m_кр2 + m_обл2 + m_г2 + m_РМУ2 + m_отс3 + m_отс4 + m_БКС2 = 615.272 kg
m_K3 := m_КК3 + m_уо3 + m_тзуо3 + m_кр3 + m_обл3 + m_г3 + m_РМУ3 + m_отс5 + m_отс6 + m_БКС3 + m_ГО = 385.229 kg
α_К1 := m_K1/ω_N1 = 0.100625
α_ДУ1 := m_КДУ1/ω_N1 = 0.0812472
α_К2 := m_K2/ω_N2 = 0.126618
α_ДУ2 := m_КДУ2/ω_N2 = 0.0940165
α_К3 := m_K3/ω_N3 = 0.204295
α_ДУ3 := m_КДУ3/ω_N3 = 0.0967122
m_03 := m_ПН + m_K3 + ω_N3 = 2993.43 kg
m_02 := m_03 + m_K2 + ω_N2 = 8468 kg
m_01 := m_02 + m_K2 + ω_N1 = 18612.8 kg  # Соломонов 1 ч стр 64
θ_k := linterp(L'_max, θ'_k, L_max) = 24.75 deg
p_h := 0.1 MPa
μ_1 := ω_N1/m_01 = 0.511987
μ_2 := ω_N2/m_02 = 0.573842
μ_3 := ω_N3/m_03 = 0.629929
θ'_1(θ_k) := asin(1 - μ_1*(sin(θ_k)^0.8))
θ'_1(θ_k) = 48.1486 deg
θ'_2(θ_k) := 0.25*θ'_1(θ_k) + 0.75*θ_k
θ'_2(θ_k) = 30.5997 deg
θ'_3(θ_k) := θ_k
θ'_3(θ_k) = 0.431969
θ_k1(θ_k) := 0.5*(θ'_1(θ_k) + θ'_2(θ_k))
θ_k1(θ_k) = 39.3741 deg
θ_k2(θ_k) := θ_k
θ_k2(θ_k) = 24.75 deg
θ_k3(θ_k) := θ_k
θ_k3(θ_k) = 0.431969
# Площадь миделя: | Стартовая нагрузка на мидель
J_11 := J_1П1 - d_a1/m*p_h/P_N1*β_t = 2837.3 m/s
S_m1 := π*D_1^2/4 = 1.6392 m^2
P_m1 := m_01*g/S_m1 = 0.111353 MPa
K_п1 := J_1П1/J_11 - 1 = 0.00397534
K_п2 := 0
K_п3 := 0
K_a2 := 1
K_a3 := 1
K_a1(θ_k) := 1 + K_п1 - (0.3*K_п1 + (4.8*μ_1/(τ_N1/s*sin(θ_k1(θ_k))^(2/3))*12000/(P_m1/Pa)))/ln(1/(1 - μ_1))
J_12 := J_1П2 = 2967.76 m/s
J_13 := J_1П3 = 2969.44 m/s
ΔV_g1(θ_k) := τ_N1*g*sin(θ_k1(θ_k))
ΔV_g1(θ_k) = 311.058 m/s
K_a1(θ_k) = 0.992313
ΔV_g2(θ_k) := τ_N2*g*sin(θ_k2(θ_k))
ΔV_g2(θ_k) = 147.803 m/s
ΔV_g3(θ_k) := τ_N3*g*sin(θ_k3(θ_k))
ΔV_g3(θ_k) = 135.486 m/s
V_1(θ_k) := K_a1(θ_k)*J_11*ln(1/(1 - μ_1)) - ΔV_g1(θ_k)
V_1(θ_k) = 1708.82 m/s
V_2(θ_k) := K_a2*J_12*ln(1/(1 - μ_2)) - ΔV_g2(θ_k)
V_2(θ_k) = 2383.53 m/s
V_3(θ_k) := K_a3*J_13*ln(1/(1 - μ_3)) - ΔV_g3(θ_k)
V_3(θ_k) = 2816.31 m/s
V_к(θ_k) := V_1(θ_k) + V_2(θ_k) + V_3(θ_k)
V_к(θ_k) = 6908.66 m/s
S_μ1 := μ_1 + (1 - μ_1)*ln(1 - μ_1) = 0.16188
S_μ2 := μ_2 + (1 - μ_2)*ln(1 - μ_2) = 0.210353
S_μ3 := μ_3 + (1 - μ_3)*ln(1 - μ_3) = 0.262056
Δh_1(θ_k) := (K_a1(θ_k)*J_11*τ_N1/μ_1*S_μ1 - g*τ_N1^2/2*sin(θ'_1(θ_k)))*sin(θ'_1(θ_k))
Δh_2(θ_k) := (V_1(θ_k)*τ_N2 + K_a2*J_12*τ_N2/μ_2*S_μ2 - g*τ_N2^2/2*sin(θ'_2(θ_k)))*sin(θ'_2(θ_k))
Δh_3(θ_k) := (V_1(θ_k)*τ_N3 + K_a3*J_13*τ_N3/μ_3*S_μ3 - g*τ_N3^2/2*sin(θ'_3(θ_k)))*sin(θ'_3(θ_k))
h_к(θ_k) := Δh_1(θ_k) + Δh_2(θ_k) + Δh_3(θ_k)
Δh_1(θ_k) = 26.3532 km
Δl_1(θ_k) := Δh_1(θ_k)*cot(θ'_1(θ_k))
Δh_2(θ_k) = 49.6039 km
Δl_2(θ_k) := Δh_2(θ_k)*cot(θ'_2(θ_k))
Δh_3(θ_k) = 39739.5 m
Δl_3(θ_k) := Δh_3(θ_k)*cot(θ'_3(θ_k))
h_к(θ_k) = 115.697 km
l_k(θ_k) := Δl_1(θ_k) + Δl_2(θ_k) + Δl_3(θ_k)
Δl_1(θ_k) = 23605.1 m
l_k(θ_k) = 193683 m
Δl_2(θ_k) = 83876.7 m
R_з := 6371 km
μ_0 := 3.968*10^5*km^3/s^2
Δl_3(θ_k) = 86201.6 m
r_к(θ_k) := R_з + h_к(θ_k)
r_к(θ_k) = 6486697 m
ν_к(θ_k) := V_к(θ_k)^2*r_к(θ_k)/μ_0
ν_к(θ_k) = 0.780261
L_элипт(θ_k) := 2*R_з*atan(ν_к(θ_k)*tan(θ_k)/(1 - ν_к(θ_k) + tan(θ_k)^2))
L_элипт(θ_k) = 8843375 m
L_расч(θ_k) := L_элипт(θ_k) + 2*l_k(θ_k)
L_расч(θ_k) = 9230.74 km
ΔL := L_расч(θ_k) - L_max = 230.742 km
ΔV_k := ΔL/dLdV(L_расч(θ_k)) = 45.6429 m/s
ΔV_1 := ΔV_k*V_1(θ_k)/V_к(θ_k) = 11.2895 m/s
ΔV_2 := ΔV_k*V_2(θ_k)/V_к(θ_k) = 15.7471 m/s
ΔV_3 := ΔV_k*V_3(θ_k)/V_к(θ_k) = 18.6063 m/s
L_0расч := L_расч(θ_k) = 9230.74 km
ω_01 := ω_N1 = 9529.51 kg
m_К01 := m_K1 = 958.904 kg
J_01П1 := J_1П1 = 2848.58 m/s
ω_02 := ω_N2 = 4859.3 kg
m_К02 := m_K2 = 615.272 kg
J_01П2 := J_1П2 = 2967.76 m/s
ω_03 := ω_N3 = 1885.65 kg
m_К03 := m_K3 = 385.229 kg
J_01П3 := J_1П3 = 2969.44 m/s
# Корректировка параметров
Δω_3 := -ΔV_3*m_03/J_13/(1 - (μ_3/(1 - μ_3))*0.7*α_ДУ3 - ln(1/(1 - μ_3))/μ_3*(J_1T/J_13)*(0.22/d'_a3^(2/3))) = -23.2715 kg
Δω_2 := (-ΔV_2*m_02/J_12 + (μ_2/(1 - μ_2))*(1 + 0.7*α_ДУ3)*Δω_3)/(1 - (μ_2/(1 - μ_2))*0.7*α_ДУ2 - ln(1/(1 - μ_2))/μ_2*(J_1T/J_12)*(0.22/d'_a2^(2/3))) = -94.4687 kg
Δω_1 := (-ΔV_1*m_01/J_11 + (μ_1/(1 - μ_1))*((1 + 0.7*α_ДУ2)*Δω_2))/(1 - (μ_1/(1 - μ_1))*0.7*α_ДУ1) = -191.094 kg
# Перерасчет
ω_N1 := ω_N1 + Δω_1 = 9338.41 kg
m_к1 := ω_N1*α_1 = 1194.6 kg
ω_N2 := ω_N2 + Δω_2 = 4764.83 kg
m_к2 := ω_N2*α_2 = 624.023 kg
ω_N3 := ω_N3 + Δω_3 = 1862.38 kg
m_к3 := ω_N3*α_3 = 272.654 kg
σ_кр1 := ω_N1*β_t/(P_N1*τ_N1) = 0.0284069 m^2
# Площадь сечения в критике:
σ_кр2 := ω_N2*β_t/(P_N2*τ_N2) = 0.0246046 m^2
σ_кр3 := ω_N3*β_t/(P_N3*τ_N3) = 0.0134887 m^2
d_кр1 := sqrt(4*σ_кр1/π) = 0.190181 m
# Диаметр критического сечения:
d_кр2 := sqrt(4*σ_кр2/π) = 0.176996 m
d_кр3 := sqrt(4*σ_кр3/π) = 0.131051 m
d'_a1 := sqrt(0.9*P_N1/MPa + 5) = 3.86005
# Степень расширения сопла:
d'_a2 := 0.8*D_1/d_кр2 = 6.52976
d'_a3 := 0.8*D_2/d_кр3 = 7.49618
d_a1 := d'_a1*d_кр1 = 0.734109 m
# Диаметр выходного сечения:
d_a2 := d'_a2*d_кр2 = 1.15574 m
d_a3 := d'_a3*d_кр3 = 0.98238 m
l_a1 := d_a1 = 0.734109 m
# Длина сопла:
l_a2 := d_a2 = 1.15574 m
l_a3 := d_a3 = 0.98238 m
J_1ПТ1 := J_1T*(1.57/sqrt(k) - 0.66/d'_a1^(2/3)) = 3073.25 m/s
# Теоретические значения удельного пустотного импульса:
J_1ПТ2 := J_1T*(1.57/sqrt(k) - 0.66/d'_a2^(2/3)) = 3277.04 m/s
J_1ПТ3 := J_1T*(1.57/sqrt(k) - 0.66/d'_a3^(2/3)) = 3319.72 m/s
ξ_1 := 0.025*(d'_a1^1.25 - 1)/d'_a1*(1 + 11.6*z/nthroot(d_кр1/cm, 3)) = 0.0732554
# Потери удельного импульса:
ξ_2 := 0.025*(d'_a2^1.25 - 1)/d'_a2*(1 + 11.6*z/nthroot(d_кр2/cm, 3)) = 0.0940379
ξ_3 := 0.025*(d'_a3^1.25 - 1)/d'_a3*(1 + 11.6*z/nthroot(d_кр3/cm, 3)) = 0.105395
J_1П1 := J_1ПТ1*(1 - ξ_1) = 2848.12 m/s
# Практические значения удельного пустотного импульса:
J_1П2 := J_1ПТ2*(1 - ξ_2) = 2968.87 m/s
J_1П3 := J_1ПТ3*(1 - ξ_3) = 2969.84 m/s
# Силовой корпус "кокон"
d_02 := [0.2; 0.3; 0.4]
K_ц.табл := [1.148; 1.17; 1.204]
K_v.табл := [0.505; 0.514; 0.533]
K_l.табл := [0.89; 0.902; 0.922]
d_02.i(d_крi, l_yi.отн, d_ai, l_ai) := 2*((d_ai - d_крi)/l_ai*(l_yi.отн*d_ai) + d_крi)
R_1 := D_1/2 = 0.722338 m
d_02.1 := d_02.i(d_кр1, l_y1.отн, d_a1, l_a1) = 0.54354 m
R_2 := D_2/2 = 0.613988 m
d_02.2 := d_02.i(d_кр2, l_y2.отн, d_a2, l_a2) = 0.549741 m
d_02.3 := d_02.i(d_кр3, l_y3.отн, d_a3, l_a3) = 0.381288 m
R_3 := D_3/2 = 0.521889 m
d_02.отн1 := d_02.1/D_1 = 0.376237
d_02.отн2 := d_02.2/D_2 = 0.447681
d_02.отн3 := d_02.3/D_3 = 0.365296
K_ц1 := linterp(d_02, K_ц.табл, d_02.отн1) = 1.19592
K_ц2 := linterp(d_02, K_ц.табл, d_02.отн2) = 1.22021
K_ц3 := linterp(d_02, K_ц.табл, d_02.отн3) = 1.1922
K_v1 := linterp(d_02, K_v.табл, d_02.отн1) = 0.528485
K_v2 := linterp(d_02, K_v.табл, d_02.отн2) = 0.542059
K_v3 := linterp(d_02, K_v.табл, d_02.отн3) = 0.526406
K_l1 := linterp(d_02, K_l.табл, d_02.отн1) = 0.917247
K_l2 := linterp(d_02, K_l.табл, d_02.отн2) = 0.931536
K_l3 := linterp(d_02, K_l.табл, d_02.отн3) = 0.915059
η_ц1.зв := 4*e'_1*(1 - e'_1) = 0.954554
η_ц2.зв := 4*e'_2*(1 - e'_2) = 0.967563
η_ц3.зв := 4*e'_3*(1 - e'_3) = 0.980932
η_ц1 := 0.985*η_ц1.зв = 0.940235  # - коэффициент заполнения цилидрической части 1 ступени
η_ц2 := 0.985*η_ц2.зв = 0.95305  # - коэффициент заполнения цилидрической части 2 ступени
η_ц3 := 0.985*η_ц3.зв = 0.966218  # - коэффициент заполнения цилидрической части 3 ступени
η_дн1.зв := 1 - 1.5*(1 - η_ц1.зв) = 0.931831
f_р := 1.15
η_дн2.зв := 1 - 1.5*(1 - η_ц2.зв) = 0.951345
S_maxSср := 1.15
η_дн3.зв := 1 - 1.5*(1 - η_ц3.зв) = 0.971398
η_дн1 := η_дн1.зв*0.85 = 0.792056
k_σ := 1.05
η_дн2 := η_дн2.зв*0.85 = 0.808643
η_дн3 := η_дн3.зв*0.85 = 0.825688
σ'_к := σ_k/ρ_k = 1407407 m^2/s^2
P_max.maxi(P_Ni) := f_р*P_Ni*(1 + ΔP_P.N)*S_maxSср^(1/(1 - ν))*k_σ
P_max.max1 := P_max.maxi(P_N1) = 17.382 MPa
ρ_T = 1850 kg/m^3
P_max.max2 := P_max.maxi(P_N2) = 14.2216 MPa
P_max.max3 := P_max.maxi(P_N3) = 11.0612 MPa
K_ск1 := K_ц1/η_ц1 + K_v1*π*R_1^3/ω_N1*ρ_T = 1.3959
K_ск2 := K_ц2/η_ц2 + K_v2*π*R_2^3/ω_N2*ρ_T = 1.43336
K_ск3 := K_ц3/η_ц3 + K_v3*π*R_3^3/ω_N3*ρ_T = 1.4674
m_ск1 := 3*K_ск1*P_max.max1*ω_N1/(σ'_к*ρ_T) = 261.07 kg
m_ск2 := 3*K_ск2*P_max.max2*ω_N2/(σ'_к*ρ_T) = 111.913 kg
m_ск3 := 3*K_ск3*P_max.max3*ω_N3/(σ'_к*ρ_T) = 34.8296 kg
l_ц1 := 4*ω_N1/(π*D_1^2*ρ_T*η_ц1) - K_l1*R_1*η_дн1/η_ц1 = 2.71702 m
d_01.отн := 0.2
d'_y1 := d_02.1/2/d_кр1 = 1.42901
l_ц2 := 4*ω_N2/(π*D_2^2*ρ_T*η_ц2) - K_l2*R_2*η_дн2/η_ц2 = 1.79658 m
l_ц3 := 4*ω_N3/(π*D_3^2*ρ_T*η_ц3) - K_l3*R_3*η_дн3/η_ц3 = 0.809523 m
d'_y2 := d_02.2/2/d_кр2 = 1.55298
l_дн11 := (0.305 + 0.1*d_01.отн)*D_1 = 0.46952 m
d'_y3 := d_02.3/2/d_кр3 = 1.45473
l_дн12 := (0.305 + 0.1*d_02.отн1)*D_1 = 0.49498 m
l_дн21 := (0.305 + 0.1*d_01.отн)*D_2 = 0.399092 m
l_дн22 := (0.305 + 0.1*d_02.отн2)*D_2 = 0.429507 m
l_дн31 := (0.305 + 0.1*d_01.отн)*D_3 = 0.339228 m
l_дн32 := (0.305 + 0.1*d_02.отн3)*D_3 = 0.356481 m
ρ_ВТ_4 := 4540*kg/m^3
λ_ц1 := l_ц1/D_1 = 1.88071
λ_ц2 := l_ц2/D_2 = 1.46304
λ_ц3 := l_ц3/D_3 = 0.775569
σ_ВТ_4 := 1400 MPa
# Закладные фланцы "кокона"
K_фл := 0.9
m_фл1 := K_фл*D_1^3*((d_01.отн + d_02.отн1)/2)^3*sqrt(P_N1)*ρ_ВТ_4/sqrt(σ_ВТ_4) = 26.1189 kg
m_фл2 := K_фл*D_2^3*((d_01.отн + d_02.отн2)/2)^3*sqrt(P_N2)*ρ_ВТ_4/sqrt(σ_ВТ_4) = 20.6024 kg
m_фл3 := K_фл*D_3^3*((d_01.отн + d_02.отн3)/2)^3*sqrt(P_N3)*ρ_ВТ_4/sqrt(σ_ВТ_4) = 7.419 kg
# Юбки "кокона"
K_ю := 1.61
m_ю1 := K_ю*P_N1*D_1^3/σ'_к = 37.9412 kg
m_ю2 := K_ю*P_N2*D_2^3/σ'_к = 19.0641 kg
m_ю3 := K_ю*P_N3*D_3^3/σ'_к = 9.10604 kg
# Крышка воспломинительного устройства
K_ву := 0.9
m_ву1 := K_ву*P_N1*D_1^3/(σ_ВТ_4/ρ_ВТ_4) = 96.7999 kg
m_ву2 := K_ву*P_N2*D_2^3/(σ_ВТ_4/ρ_ВТ_4) = 48.6387 kg
m_ву3 := K_ву*P_N3*D_3^3/(σ_ВТ_4/ρ_ВТ_4) = 23.2324 kg
# Защитно-крепящий слой
q_зск := 2.4*kg/m^2
S_зкс1 := π*D_1^2*(λ_ц1 + 0.615) = 16.3639 m^2
m_зск1 := S_зкс1*q_зск = 39.2733 kg
S_зкс2 := π*D_2^2*(λ_ц2 + 0.615) = 9.84427 m^2
m_зск2 := S_зкс2*q_зск = 23.6262 kg
S_зкс3 := π*D_3^2*(λ_ц3 + 0.615) = 4.75948 m^2
m_зск3 := S_зкс3*q_зск = 11.4228 kg
ρ_тзп := 1000*kg/m^3
# Теплозащитное покрытие кокона (ТПЗ)
K_тзп := 1.17*10^-3
m_тзп1 := K_тзп*ω_N1*sqrt(P_N1/MPa*τ_N1/s)/(ρ_T*D_1/m*λ_ц1^0.25)*ρ_тзп = 81.8686 kg
m_тзп2 := K_тзп*ω_N2*sqrt(P_N2/MPa*τ_N2/s)/(ρ_T*D_2/m*λ_ц2^0.25)*ρ_тзп = 40.1633 kg
m_тзп3 := K_тзп*ω_N3*sqrt(P_N3/MPa*τ_N3/s)/(ρ_T*D_3/m*λ_ц3^0.25)*ρ_тзп = 18.2757 kg
# Утопленная оболочка сопла
K_уо := 16.5*10^-9
ρ_ВТ_6 := 4500*kg/m^3
E_ВТ_6 := 122000 MPa
m_уо1 := K_уо*(β_t*ω_N1/τ_N1)^1.5*d'_y1^2.35*l_y1.отн^0.4*d'_a1^0.4/(P_N1/10^6)^1.1*ρ_ВТ_6/(E_ВТ_6/10^6)^0.4 = 15.9313 kg
m_уо2 := K_уо*(β_t*ω_N2/τ_N2)^1.5*d'_y2^2.35*l_y2.отн^0.4*d'_a2^0.4/(P_N2/10^6)^1.1*ρ_ВТ_6/(E_ВТ_6/10^6)^0.4 = 15.1206 kg
m_уо3 := K_уо*(β_t*ω_N3/τ_N3)^1.5*d'_y3^2.35*l_y3.отн^0.4*d'_a3^0.4/(P_N3/10^6)^1.1*ρ_ВТ_6/(E_ВТ_6/10^6)^0.4 = 4.36176 kg
# Теплозащитное покрытие утопленной оболочки (ТЗУО)
К_тзуо := 3.7*10^-9*1/(m^-1.5*kg^0.5*s^-0.5)
ρ_тзуо := 1400*kg/m^3
m_тзуо1 := К_тзуо*β_t*ω_N1/sqrt(P_N1/10^6*τ_N1)*d'_y1^1.75*ρ_тзуо = 6.44534 kg
m_тзуо2 := К_тзуо*β_t*ω_N2/sqrt(P_N2/10^6*τ_N2)*d'_y2^1.75*ρ_тзуо = 4.95629 kg
m_тзуо3 := К_тзуо*β_t*ω_N3/sqrt(P_N3/10^6*τ_N3)*d'_y3^1.75*ρ_тзуо = 2.04633 kg
# Корпус раструба
K_кр := 11.2*10^-9
σ_ВТ_6 := 1300 MPa
m_кр1 := K_кр*(β_t*ω_N1/τ_N1)^1.5*d'_a1^1.75*ρ_ВТ_6/(sqrt(P_N1/10^6)*σ_ВТ_6/10^6) = 21.7047 kg
m_кр2 := K_кр*(β_t*ω_N2/τ_N2)^1.5*4.5^1.75*ρ_ВТ_6/(sqrt(P_N2/10^6)*σ_ВТ_6/10^6) = 18.723 kg
m_кр3 := K_кр*(β_t*ω_N3/τ_N3)^1.5*4.5^1.75*ρ_ВТ_6/(sqrt(P_N3/10^6)*σ_ВТ_6/10^6) = 5.911 kg
# Облицовка раструба
K_обл := 3.1*10^-9*1/(m^-1.5*kg^0.5*s^-0.5)
ρ_обл := 1400*kg/m^3
l_дн12 = 0.49498 m
D_1 = 1.44468 m
R'_дн := 1 mm
m_обл1 := K_обл*β_t*ω_N1/sqrt(P_N1/10^6*τ_N1)*d'_a1^1.75*ρ_обл = 30.735 kg
Given
R'_дн^2 == (R'_дн - l_дн)^2 + R^2
R_дн(l_дн, R) := Find(R'_дн)
m_обл2 := K_обл*β_t*ω_N2/sqrt(P_N2/10^6*τ_N2)*d'_a2^1.75*ρ_обл = 51.2683 kg
r_кон := R_дн(l_дн11, R_1)*sin(30 deg) = 0.395202 m
2*r_кон = 0.790405 m
x := R_дн(l_дн11, R_1)*(1 - cos(30 deg)) = 0.105894 m
m_обл3 := K_обл*β_t*ω_N3/sqrt(P_N3/10^6*τ_N3)*d'_a3^1.75*ρ_обл = 30.2159 kg
l'_заз := 0.1 m
Given
# Горловина
K_г := 6.44*10^-5*kg^0.5/(m^1.5*s^-0.5)
d_a2/(R_дн(l_дн11, R_1) + l'_заз) == 2*r_кон/(R_дн(l_дн11, R_1) - x)
m_г1 := K_г*β_t*ω_N1/sqrt(P_N1/10^6*τ_N1) = 42.9034 kg
m_г2 := K_г*β_t*ω_N2/sqrt(P_N2/10^6*τ_N2) = 28.5216 kg
l_заз := Find(l'_заз) = 0.210497 m
d_кон := (R_дн(l_дн11, R_1) - x)*d_a2/(R_дн(l_дн11, R_1) + l_заз) = 0.790405 m
m_г3 := K_г*β_t*ω_N3/sqrt(P_N3/10^6*τ_N3) = 13.2027 kg
# Привод рулевых машин и устройства управления вектором тяги
K_РМУ1 := 0.65*s*sqrt(m)
K_РМУ2 := 0.57*s*sqrt(m)
m_РМУ1 := K_РМУ1*ω_N1/(τ_N1*sqrt(D_1)) = 101.002 kg
K_РМУ3 := 0.38*s*sqrt(m)
l_y2.отн*d_a2 = 0.115574 m
m_РМУ2 := K_РМУ2*ω_N2/(τ_N2*sqrt(D_2)) = 68.0808 kg
m_РМУ3 := K_РМУ3*ω_N3/(τ_N3*sqrt(D_3)) = 20.991 kg
# Длины отсеков и ступеней
l_ю1 := 0.15*D_1 = 0.216702 m
l_ю2 := 0.15*D_2 = 0.184196 m
l_ю3 := 0.15*D_3 = 0.156567 m
l_хо1 := l_дн11 + l_a1 - l_y1.отн*d_a1 - 150 mm - l_ю1 = 0.726811 m
l_по1_хо2 := l_дн22 + l_a2 - l_y2.отн*d_a2 + l_дн11 + l_заз - l_ю1 - l_ю2 = 1.74879 m
l_по1 := (D_1^2 - l_ю1^2)^0.5 - l_ю1 - (R_дн(l_дн11, R_1) - l_дн11) = 0.890745 m
l_хо2 := l_по1_хо2 - l_по1 = 0.858047 m
l_по2 := (D_2^2 - l_ю2^2)^0.5 - l_ю2 - (R_дн(l_дн21, R_2) - l_дн21) = 0.757133 m
l_ст1 := l_по1 + l_ц1 = 3.60777 m
l_ст2 := l_по2 + l_ц2 = 2.55371 m
l_тр1 := 0 m
l_тр2 := l_ст2 + l_хо2 = 3.41176 m  # Поперечное-продольное разделение
l_по2_хо3 := l_дн32 + l_a3 - l_y3.отн*d_a3 + l_дн21 + l_заз - l_ю2 - l_ю3 = 1.53892 m
l_хо3 := l_по2_хо3 - l_по2 = 0.781787 m
l_по3 := (D_3^2 - l_ю3^2)^0.5 - l_ю3 - (R_дн(l_дн31, R_3) - l_дн31) = 0.643563 m
l_ст3 := l_по3 + l_ц3 = 1.45309 m
l_тр3 := l_ст3 + l_хо3 = 2.23487 m
# Отсеки ступеней
K_отс := 24*kg/m^2
m_отс1 := K_отс*π*D_1*l_хо1 = 79.1687 kg
m_отс2 := K_отс*π*D_1*l_по1 = 97.0254 kg
m_отс3 := K_отс*π*D_2*l_хо2 = 79.4442 kg
m_отс4 := K_отс*π*D_2*l_по2 = 70.1008 kg
m_отс5 := K_отс*π*D_3*l_хо3 = 61.5259 kg
m_отс6 := K_отс*π*D_3*l_хо3 = 61.5259 kg
# Поперечное-продольное разделение
# Головной обтекатель
K_ГО := 24*kg/m^2
ΔL_ГО := 400 mm = 0.4 m
S_ГО := π*D_2/2*(l_ББ + ΔL_ГО) = 2.91264 m^2
m_ГО := K_ГО*S_ГО + 10 kg = 79.9033 kg
# Бортовая кабельная сеть (БКС)
m_БКС1 := ((0.8*l_ст1 + 2 m) + (0.8*l_тр1 + 2 m)*(1 - 1))*kg/m = 4.88621 kg
m_БКС2 := ((0.8*l_ст2 + 2 m) + (0.8*l_тр2 + 2 m)*(2 - 1))*kg/m = 8.77238 kg
m_БКС3 := ((0.8*l_ст3 + 2 m) + (0.8*l_тр3 + 2 m)*(3 - 1))*kg/m = 10.7383 kg
# Уточнение относительных характеристик
# Масса конструкций ступеней:
m_КК1 := m_ск1 + m_фл1 + m_ю1 + m_ву1 + m_зск1 + m_тзп1 = 543.072 kg
m_КК2 := m_ск2 + m_фл2 + m_ю2 + m_ву2 + m_зск2 + m_тзп2 = 264.008 kg
m_КК3 := m_ск3 + m_фл3 + m_ю3 + m_ву3 + m_зск3 + m_тзп3 = 104.285 kg
m_КДУ1 := m_КК1 + m_уо1 + m_тзуо1 + m_кр1 + m_обл1 + m_г1 + m_РМУ1 = 761.794 kg
m_КДУ2 := m_КК2 + m_уо2 + m_тзуо2 + m_кр2 + m_обл2 + m_г2 + m_РМУ2 = 450.679 kg
m_КДУ3 := m_КК3 + m_уо3 + m_тзуо3 + m_кр3 + m_обл3 + m_г3 + m_РМУ3 = 181.014 kg
m_K1 := m_КК1 + m_уо1 + m_тзуо1 + m_кр1 + m_обл1 + m_г1 + m_РМУ1 + m_отс1 + m_отс2 + m_БКС1 = 942.874 kg
m_K2 := m_КК2 + m_уо2 + m_тзуо2 + m_кр2 + m_обл2 + m_г2 + m_РМУ2 + m_отс3 + m_отс4 + m_БКС2 = 608.996 kg
m_K3 := m_КК3 + m_уо3 + m_тзуо3 + m_кр3 + m_обл3 + m_г3 + m_РМУ3 + m_отс5 + m_отс6 + m_БКС3 + m_ГО = 394.707 kg
α_К1 := m_K1/ω_N1 = 0.100967
α_ДУ1 := m_КДУ1/ω_N1 = 0.0815764
α_К2 := m_K2/ω_N2 = 0.127811
α_ДУ2 := m_КДУ2/ω_N2 = 0.0945845
α_К3 := m_K3/ω_N3 = 0.211938
α_ДУ3 := m_КДУ3/ω_N3 = 0.0971952
m_03 := m_ПН + m_K3 + ω_N3 = 2979.63 kg
m_02 := m_03 + m_K2 + ω_N2 = 8353.46 kg
m_01 := m_02 + m_K2 + ω_N1 = 18300.9 kg  # Соломонов 1 ч стр 64
θ_k := linterp(L'_max, θ'_k, L_max) = 24.75 deg
p_h := 0.1 MPa
μ_1 := ω_N1/m_01 = 0.510272
μ_2 := ω_N2/m_02 = 0.570402
μ_3 := ω_N3/m_03 = 0.625035
θ'_1(θ_k) := asin(1 - μ_1*(sin(θ_k)^0.8))
θ'_1(θ_k) = 48.2221 deg
θ'_2(θ_k) := 0.25*θ'_1(θ_k) + 0.75*θ_k
θ'_2(θ_k) = 30.618 deg
θ'_3(θ_k) := θ_k
θ'_3(θ_k) = 0.431969
θ_k1(θ_k) := 0.5*(θ'_1(θ_k) + θ'_2(θ_k))
θ_k1(θ_k) = 39.42 deg
θ_k2(θ_k) := θ_k
θ_k2(θ_k) = 24.75 deg
θ_k3(θ_k) := θ_k
θ_k3(θ_k) = 0.431969
# Площадь миделя: | Стартовая нагрузка на мидель
J_11 := J_1П1 - d_a1/m*p_h/P_N1*β_t = 2836.95 m/s
S_m1 := π*D_1^2/4 = 1.6392 m^2
P_m1 := m_01*g/S_m1 = 0.109487 MPa
K_п1 := J_1П1/J_11 - 1 = 0.00393577
K_п2 := 0
K_п3 := 0
K_a2 := 1
K_a3 := 1
K_a1(θ_k) := 1 + K_п1 - (0.3*K_п1 + (4.8*μ_1/(τ_N1/s*sin(θ_k1(θ_k))^(2/3))*12000/(P_m1/Pa)))/ln(1/(1 - μ_1))
J_12 := J_1П2
J_13 := J_1П3
K_a1(θ_k) = 0.992102
ΔV_g1(θ_k) := τ_N1*g*sin(θ_k1(θ_k))
ΔV_g2(θ_k) := τ_N2*g*sin(θ_k2(θ_k))
ΔV_g3(θ_k) := τ_N3*g*sin(θ_k3(θ_k))
V_1(θ_k) := K_a1(θ_k)*J_11*ln(1/(1 - μ_1)) - ΔV_g1(θ_k)
V_1(θ_k) = 1697.96 m/s
V_2(θ_k) := K_a2*J_12*ln(1/(1 - μ_2)) - ΔV_g2(θ_k)
V_2(θ_k) = 2360.61 m/s
V_3(θ_k) := K_a3*J_13*ln(1/(1 - μ_3)) - ΔV_g3(θ_k)
V_3(θ_k) = 2777.69 m/s
V_к(θ_k) := V_1(θ_k) + V_2(θ_k) + V_3(θ_k)
V_к(θ_k) = 6836.26 m/s
S_μ1 := μ_1 + (1 - μ_1)*ln(1 - μ_1) = 0.160652
S_μ2 := μ_2 + (1 - μ_2)*ln(1 - μ_2) = 0.207432
S_μ3 := μ_3 + (1 - μ_3)*ln(1 - μ_3) = 0.257223
Δh_1(θ_k) := (K_a1(θ_k)*J_11*τ_N1/μ_1*S_μ1 - g*τ_N1^2/2*sin(θ'_1(θ_k)))*sin(θ'_1(θ_k))
Δh_2(θ_k) := (V_1(θ_k)*τ_N2 + K_a2*J_12*τ_N2/μ_2*S_μ2 - g*τ_N2^2/2*sin(θ'_2(θ_k)))*sin(θ'_2(θ_k))
Δh_3(θ_k) := (V_1(θ_k)*τ_N3 + K_a3*J_13*τ_N3/μ_3*S_μ3 - g*τ_N3^2/2*sin(θ'_3(θ_k)))*sin(θ'_3(θ_k))
h_к(θ_k) := Δh_1(θ_k) + Δh_2(θ_k) + Δh_3(θ_k)
Δh_1(θ_k) = 26.2235 km
Δl_1(θ_k) := Δh_1(θ_k)*cot(θ'_1(θ_k))
Δh_2(θ_k) = 49.2798 km
Δl_2(θ_k) := Δh_2(θ_k)*cot(θ'_2(θ_k))
Δh_3(θ_k) = 39408.2 m
Δl_3(θ_k) := Δh_3(θ_k)*cot(θ'_3(θ_k))
h_к(θ_k) = 114.912 km
l_k(θ_k) := Δl_1(θ_k) + Δl_2(θ_k) + Δl_3(θ_k)
R_з := 6371 km
μ_0 := 3.968*10^5*km^3/s^2
r_к(θ_k) := R_з + h_к(θ_k)
ν_к(θ_k) := V_к(θ_k)^2*r_к(θ_k)/μ_0
L_элипт(θ_k) := 2*R_з*atan(ν_к(θ_k)*tan(θ_k)/(1 - ν_к(θ_k) + tan(θ_k)^2))
L_расч(θ_k) := L_элипт(θ_k) + 2*l_k(θ_k)
L_расч(θ_k) = 8864.35 km
ΔL := L_расч(θ_k) - L_max = -135.648 km
ΔV_k := ΔL/dLdV(L_расч(θ_k)) = -28.5388 m/s
ΔV_1 := ΔV_k*V_1(θ_k)/V_к(θ_k) = -7.08834 m/s
ΔV_2 := ΔV_k*V_2(θ_k)/V_к(θ_k) = -9.85467 m/s
ΔV_3 := ΔV_k*V_3(θ_k)/V_к(θ_k) = -11.5958 m/s
L_1расч := L_расч(θ_k) = 8864.35 km
ω_11 := ω_N1 = 9338.41 kg
m_К11 := m_K1 = 942.874 kg
J_11П1 := J_1П1 = 2848.12 m/s
ω_12 := ω_N2 = 4764.83 kg
m_К12 := m_K2 = 608.996 kg
J_11П2 := J_1П2 = 2968.87 m/s
ω_13 := ω_N3 = 1862.38 kg
m_К13 := m_K3 = 394.707 kg
J_11П3 := J_1П3 = 2969.84 m/s
L_расч := [L_1расч; L_0расч] = [8864.35; 9230.74] km
ω_2расч := [ω_12; ω_02] = [4764.83; 4859.3] kg
ω_1расч := [ω_11; ω_01] = [9338.41; 9529.51] kg
ω_3расч := [ω_13; ω_03] = [1862.38; 1885.65] kg
m_K1расч := [m_К11; m_К01] = [942.874; 958.904] kg
m_K2расч := [m_К12; m_К02] = [608.996; 615.272] kg
m_K3расч := [m_К13; m_К03] = [394.707; 385.229] kg
J_1П1расч := [J_11П1; J_01П1] = [2848.12; 2848.58] m/s
J_1П2расч := [J_11П2; J_01П2] = [2968.87; 2967.76] m/s
J_1П3расч := [J_11П3; J_01П3] = [2969.84; 2969.44] m/s
L_финал := L_max + 100 km = 9100 km
9483.814 kg
ω_1финал := linterp(L_расч, ω_1расч, L_финал) = 9461.32 kg
4841.345 kg
ω_2финал := linterp(L_расч, ω_2расч, L_финал) = 4825.59 kg
1881.482 kg
ω_3финал := linterp(L_расч, ω_3расч, L_финал) = 1877.34 kg
m_K1финал := linterp(L_расч, m_K1расч, L_финал) = 953.184 kg
m_K2финал := linterp(L_расч, m_K2расч, L_финал) = 613.033 kg
m_K3финал := linterp(L_расч, m_K3расч, L_финал) = 388.611 kg
J_1П1финал := linterp(L_расч, J_1П1расч, L_финал) = 2848.42 m/s
J_1П2финал := linterp(L_расч, J_1П2расч, L_финал) = 2968.16 m/s
J_1П3финал := linterp(L_расч, J_1П3расч, L_финал) = 2969.58 m/s
m_00 = 21443.8 kg
