# Дано:
L_max := 6000 km
n_ББ := 4  # Топливо:
ΔP_ф := 8  # MPa
ΔL := 200 km
J_1T := 2520*m/s
K_T := 0.15 %
R_ц := 3  # km
ΔB := 100 km
Δu_1u.1 := 2 %
ρ_T := 1.81*gm/cm^3
τ_Σ := 125 s
Δ_сл := 3.5 %
h_k := 100 km
k := 1.15
n_xmax := 20
z := 0.33
ΔT_экспл := 0  # °C
ν := 0.25
# Материал:
σ_r := 0.15  # km
# Органопластик
σ_K := 130 km
P_1тр := 0.9
M_1тр := 0.9
σ_k := 1900 MPa
Δp_ф := 0.03  # MPa
ρ_k := 1350*kg/m^3
# ТЗП
ρ_ср := 1.1*gm/cm^3
# Расчет массы полезной нагрузки:
# Мощность боевого блока
# Точечные цели:
# Коэффициент защищенности:
K_цт := 0.97*ΔP_ф^-0.37 = 0.449395
q_1р := (2/n_ББ)^(3/2)*(σ_r/K_цт)^3*ln(1/(1 - P_1тр))^(3/2) = 0.0459375  # Мт
# Площадная цель:
# Коэффициент защищенности:
K_цп := 0.78*Δp_ф^-0.5 = 4.50333
q_1x := (M_1тр/n_ББ)^(3/2)*(R_ц/K_цп)^3 = 0.0315526  # Мт
q'_1 := max(q_1x, q_1р) = 0.0459375  # Мт
# Выбор массы и габартиов ББ
q'_1*90*% = 0.0413437
q_1 := 0.1
m_ББ := 100 kg
d_ББ := 0.037*(m_ББ/kg)^0.5*m = 0.37 m
l_ББ := 3*d_ББ = 1.11 m
r_нос := 0.1*d_ББ = 0.037 m
# Расчет массы полезной нагрузки
# Двухрежимная ДУ БС
ω_дд := 106.8 kg  # масса топлива доводочного двигателя
m_БК := m_ББ*n_ББ = 400 kg  # масса боевой комлпектности
m_пл := (10*n_ББ)*kg + 0.1*m_БК = 80 kg  # масса платформы разведения
m_СУ := (95 + 5*n_ББ^0.5)*kg = 105 kg  # масса системы управления
m_КБС := (45 + 0.06*n_ББ)*kg = 45.24 kg  # масса конструктивных элементов
m_дд := 13.8 kg^(2/3)*ω_дд^(1/3) + ω_дд = 172.274 kg  # масса доводочного двигателя
K_з := 1.1  # Моб. база
m_ПН := K_з*(m_БК + m_пл + m_СУ + m_КБС + m_дд) = 882.766 kg  # масса полезной нагрузки
R_ддmin := 0.5*m/s^2*m_ПН = 441.383 N
ω_ддmin := R_ддmin/J_1T = 0.175152 kg/s
R_ддmax := 2.5*m/s^2*m_ПН = 2206.91 N
ω_ддmax := R_ддmax/J_1T = 0.875759 kg/s
L'_max := [1000; 2500; 4500; 6000; 8000; 10000; 12000]*km
dLdV' := [0.66; 1.23; 2.05; 2.78; 4.04; 5.69; 8]*km/(m/s)
dBdV' := [0.46; 0.69; 0.88; 0.97; 1.01; 0.98; 0.88]*km/(m/s)
θ'_k := [42.7; 38.4; 34.9; 31.5; 27.0; 22.5; 18.0]*deg
dLdV(L) := linterp(L'_max, dLdV', L)
dBdV(L) := linterp(L'_max, dBdV', L)
dLdV(L_max) = 2.78 km/(m/s)
dBdV(L_max) = 0.97 km/(m/s)
ΔL_гар := 0.04*L_max = 240 km
ΔV_гар := ΔL_гар/dLdV(L_max) = 86.3309 m/s
β := 10 deg  # Угол наклона осей толкающих сопел к оси БС
ΔV_λ := ΔL/dLdV(L_max) = 71.9424 m/s
ΔV_ρ := ΔB/dBdV(L_max) = 103.093 m/s
# 0) Перед началом работы:
m_0 := m_ПН = 882.766 kg
ω_0 := ω_дд = 106.8 kg
t_0 := 0 s
# 1) Отработка промаха:
Δω_1 := ΔV_гар*m_0/(J_1T*cos(β)) = 30.7086 kg
Δt_1 := Δω_1/ω_ддmax = 35.0651 s
# После окончания отработки промаха:
m_1 := m_0 - Δω_1 = 852.057 kg
t_1 := t_0 + Δt_1 = 35.0651 s
ω_1 := ω_0 - Δω_1 = 76.0914 kg
# 2) Разворот стабилизация:
Δt_2 := 10 s
Δω_2 := Δt_2*ω_ддmin = 1.75152 kg
# Отделение первого ББ:
Δm_2 := m_ББ = 100 kg
# После отделения
# первого ББ:
m_2 := m_1 - Δω_2 - Δm_2 = 750.305 kg
t_2 := t_1 + Δt_2 = 45.0651 s
ω_2 := ω_1 - Δω_2 = 74.3399 kg
# 3) Разворот стабилизация
# по λ направлению:
Δt_3 := 10 s
Δω_3 := Δt_3*ω_ддmin = 1.75152 kg
# После разворота,
# стабилизации:
m_3 := m_2 - Δω_3 = 748.554 kg
t_3 := t_2 + Δt_3 = 55.0651 s
ω_3 := ω_2 - Δω_3 = 72.5884 kg
# 4) Разгон по λ направлению:
Δω_4 := ΔV_λ*m_3/(J_1T*cos(β)) = 21.6998 kg
Δt_4 := Δω_4/ω_ддmax = 24.7783 s
# После разгона:
m_4 := m_3 - Δω_4 = 726.854 kg
t_4 := t_3 + Δt_4 = 79.8434 s
ω_4 := ω_3 - Δω_4 = 50.8886 kg
# 5) Разворот стабилизация:
Δt_5 := 10 s
Δω_5 := Δt_5*ω_ддmin = 1.75152 kg
# Отделение второго ББ:
Δm_5 := m_ББ = 100 kg
# После отделения
# второго ББ:
m_5 := m_4 - Δω_5 - Δm_5 = 625.103 kg
t_5 := t_4 + Δt_5 = 89.8434 s
ω_5 := ω_4 - Δω_5 = 49.137 kg
# 6) Разворот стабилизация
# по ρ направлению:
Δt_6 := 10 s
Δω_6 := Δt_6*ω_ддmin = 1.75152 kg
# После разворота,
# стабилизации:
m_6 := m_5 - Δω_6 = 623.351 kg
t_6 := t_5 + Δt_6 = 99.8434 s
ω_6 := ω_5 - Δω_6 = 47.3855 kg
# 7) Разгон по ρ направлению:
Δω_7 := ΔV_ρ*m_6/(J_1T*cos(β)) = 25.8946 kg
Δt_7 := Δω_7/ω_ддmax = 29.5681 s
# После разгона:
m_7 := m_6 - Δω_7 = 597.456 kg
t_7 := t_6 + Δt_7 = 129.412 s
ω_7 := ω_6 - Δω_7 = 21.4909 kg
# 8) Разворот стабилизация:
Δt_8 := 10 s
Δω_8 := Δt_8*ω_ддmin = 1.75152 kg
# Отделение третьего ББ:
Δm_8 := m_ББ = 100 kg
# После отделения
# третьего ББ:
m_8 := m_7 - Δω_8 - Δm_8 = 495.705 kg
t_8 := t_7 + Δt_8 = 139.412 s
ω_8 := ω_7 - Δω_8 = 19.7394 kg
# 9) Разворот стабилизация
# по λ направлению:
Δt_9 := 10 s
Δω_9 := Δt_9*ω_ддmin = 1.75152 kg
# После разворота,
# стабилизации:
m_9 := m_8 - Δω_9 = 493.953 kg
t_9 := t_8 + Δt_9 = 149.412 s
ω_9 := ω_8 - Δω_9 = 17.9879 kg
# 10) Разгон по λ направлению:
Δω_10 := ΔV_λ*m_9/(J_1T*cos(β)) = 14.3192 kg
Δt_10 := Δω_10/ω_ддmax = 16.3506 s
# После разгона:
m_10 := m_9 - Δω_10 = 479.634 kg
t_10 := t_9 + Δt_10 = 165.762 s
ω_10 := ω_9 - Δω_10 = 3.66868 kg
# 11) Разворот стабилизация:
Δt_11 := 10 s
Δω_11 := Δt_11*ω_ддmin = 1.75152 kg
# Отделение четвертого ББ:
Δm_11 := m_ББ = 100 kg
# После отделения
# четвертого ББ:
m_11 := m_10 - Δω_11 - Δm_11 = 377.883 kg
t_11 := t_10 + Δt_11 = 175.762 s
ω_11 := ω_10 - Δω_11 = 1.91716 kg
# 12) Отход от ББ:
Δt_12 := 10 s
Δω_12 := Δt_12*ω_ддmin = 1.75152 kg
# После отхода:
m_12 := m_11 - Δω_12 = 376.131 kg
t_12 := t_11 + Δt_12 = 185.762 s
ω_12 := ω_11 - Δω_12 = 0.16564 kg
# Предварительное определение параметров УБР
KvVk := 800*(L_max/km)^(1/4)*m/s = 7040.89 m/s
L_max = 6000 km
Λ_0 := 1.65
n := 2
m'_0 := 0.01*(L_max/km)^(2/3)*tonne = 3.30193 tonne
J_1п1 := 1.095*J_1T = 2759.4 m/s
J_1п2 := 1.135*J_1T = 2860.2 m/s
J' := (J_1п1 + J_1п2)/2 = 2809.8 m/s
m_00 := (Λ_0*m_ПН*e^(KvVk/J') + m'_0) = 21.1503 tonne
# Распределение масс топлив по ступеням
μ_отн := 1 - nthroot(e^(-KvVk/J'), n) = 0.71433
# Для трехступенчатой ракеты:
μ_1 := 0.9*μ_отн = 0.642897
μ_2 := 1 - e^(-KvVk/J')/(1 - μ_1) = 0.771474
# Время работы:
ΔP_P.N := 1/(1 - ν)*sqrt(Δu_1u.1^2 + Δ_сл^2 + (K_T*ΔT_экспл)^2) = 0.0537484
τ_N2.min := J_1п2/(n_xmax*g*(1 - ΔP_P.N))*μ_2/(1 - μ_2) = 52.0264 s
τ_N1 := 57 s
τ_N2 := 55 s
τ_N2 ≥ J_1п2/(n_xmax*g*(1 - ΔP_P.N))*μ_2/(1 - μ_2) = 1
τ_N1 + τ_N2 = 112 s
τ_Σ*(1 - ΔP_P.N) = 118.281 s
τ_N1 + τ_N2 ≤ τ_Σ*(1 - ΔP_P.N) = 1
# Относитльная масса полезной нагрузки:
m_ПН.отн := m_ПН/m_00 = 0.0417377
α_отн := (1 - μ_отн - sqrt(m_ПН.отн))/μ_отн = 0.113914
α_1 := 0.9*α_отн = 0.102523
α_2 := (1 - μ_2)/μ_2 - m_ПН.отн/(μ_2*(1 - μ_1*(1 + α_1))) = 0.110428
# Массы ступеней | Масса топлива
m_00 = 21150.3 kg
ω_N1 := μ_1*m_00 = 13597.5 kg
m_к1 := ω_N1*α_1 = 1394.05 kg
m_02 := m_00*(1 - μ_1*(1 + α_1)) = 6158.8 kg
ω_N2 := μ_2*m_02 = 4751.35 kg
m_к2 := ω_N2*α_2 = 524.682 kg
ω_N1 := 13597.481 kg
ω_N2 := 4751.353 kg
# Диаметры ступеней
D_1 := 0.52*nthroot(m_00/tonne, 3)*m = 1.43806 m  # Давления в баках:  # Относительное расширение ступеней
P_N1 := 11 MPa
l_y1.отн := 0.15
D_2 := 0.85*D_1 = 1.22235 m
P_N2 := 9 MPa
l_y2.отн := 0.1
# Промежуточные результаты первого приближения
# Мощность боевого блока:
q_1 = 0.1  # Мт
# Диаметр боевого блока:
d_ББ = 0.37 m
# Масса боевого блока:
m_ББ = 100 kg
# Длина боевого блока:
l_ББ = 1.11 m
# Радиус скругления носа:
r_нос = 0.037 m
# Масса топлива доводочного двигателя:
ω_дд = 106.8 kg
# Масса боевой комлпектности:
m_БК = 400 kg
# Масса платформы разведения:
m_пл = 80 kg
# Масса системы управления:
m_СУ = 105 kg
# Масса конструктивных элементов:
m_КБС = 45.24 kg
# Масса доводочного двигателя:
m_дд = 172.274 kg
# Масса полезной нагрузки:
m_ПН = 882.766 kg
# Первая ступень | Вторая ступень
# Масса топлива:
ω_N1 = 13597.5 kg
ω_N2 = 4751.35 kg
# Масса конструкции:
m_к2 = 524.682 kg
m_к2 = 524.682 kg
# Давления в баках:
P_N1 = 11 MPa
P_N2 = 9 MPa
# Время работы:
τ_N1 = 57 s
τ_N2 = 55 s
# Диаметр бака:
D_1 = 1.43806 m
D_2 = 1.22235 m
# Удельный импульс в путоте:
J_1п1 = 2759.4 m/s
J_1п2 = 2860.2 m/s
P_max1 := (1 + ΔP_P.N)*P_N1 = 11591232 kg/(m*s^2)
P_max2 := (1 + ΔP_P.N)*P_N2 = 9483735 kg/(m*s^2)
# Определение свода:
ε_доп := 0.4  # допустимая деформация
f := 1.35  # коэффициент запаса
# P_Ni | давление, которое может возникнуть в двигателе
α_Т := 10^-4  # коэффициент линейного температурного расширения
α_к := 10^-5  # коэффициент температурного расширения конструкции двигателя
E_Т := 7.5 MPa  # модуль Юнга
μ_Т := 0.495  # коэффициент Пуассона
# Относительные диаметры зарядов ступеней
M_1 := sqrt((P_max1/E_Т*(1 + μ_Т)*(1 - 2*μ_Т) + 45*(α_к - α_Т)*μ_Т + ε_доп/f)/(P_max1/E_Т*(1 + μ_Т)*(1 - 2*μ_Т) + 45*(α_к - α_Т)*(2 - μ_Т) - ε_доп/f*(1 - 2*μ_Т))) = 4.75346
M_2 := sqrt((P_max2/E_Т*(1 + μ_Т)*(1 - 2*μ_Т) + 45*(α_к - α_Т)*μ_Т + ε_доп/f)/(P_max2/E_Т*(1 + μ_Т)*(1 - 2*μ_Т) + 45*(α_к - α_Т)*(2 - μ_Т) - ε_доп/f*(1 - 2*μ_Т))) = 5.63998
# Относительные своды горения зарядов ступеней
e'_1 := 0.5*(1 - 1/M_1) = 0.394813
e'_2 := 0.5*(1 - 1/M_2) = 0.411347
# Диаметры каналов зарядов ступеней | Своды горения зарядов ступеней
e_1 := e'_1*D_1 = 0.567764 m
d_1 := D_1/M_1 = 0.302528 m
e_2 := e'_2*D_2 = 0.502809 m
d_2 := D_2/M_2 = 0.216729 m
# Мин и макс значение скорости горения топлива при стандартных условиях
u_min := 5*mm/s
u_max := 13*mm/s
# Мин и макс реализуемые номинальные значения скоростей горения топлива при номинальных давлениях в корпусах ДУ ступеней
u_N1min := u_min*(P_N1/(4 MPa))^ν = 6.43877 mm/s
u_N1max := u_max*(P_N1/(4 MPa))^ν = 16.7408 mm/s
u_N2min := u_min*(P_N2/(4 MPa))^ν = 6.12372 mm/s
u_N2max := u_max*(P_N2/(4 MPa))^ν = 15.9217 mm/s
# Мин и макс реализуемые номинальные значения времени работы ДУ ступеней
τ_N1min := e'_1*D_1/u_N1max = 33.9149 s
τ_N1 = 57 s
τ_N1max := e'_1*D_1/u_N1min = 88.1789 s
τ_N2min := e'_2*D_2/u_N2max = 31.5801 s
τ_N2 = 55 s
τ_N2max := e'_2*D_2/u_N2min = 82.1084 s
# Номинальных значений скоростей горения топлива
u_N1 := e_1/τ_N1 = 9.96077 mm/s
u_N2 := e_2/τ_N2 = 9.14198 mm/s
# Расширение сопел, удельный импульс
# Расходный комплекс ДУ ступеней:
β_t := 0.651*J_1T = 1640.52 m/s
σ_кр1 := ω_N1*β_t/(P_N1*τ_N1) = 0.0355773 m^2
# Площадь сечения в критике:
σ_кр2 := ω_N2*β_t/(P_N2*τ_N2) = 0.0157468 m^2
d_кр1 := sqrt(4*σ_кр1/π) = 0.212834 m
# Диаметр критического сечения:
d_кр2 := sqrt(4*σ_кр2/π) = 0.141596 m
d'_a1 := sqrt(0.9*P_N1/MPa + 5) = 3.86005
# Степень расширения сопла:
d'_a2 := 0.8*D_1/d_кр2 = 8.12482
d_a1 := d'_a1*d_кр1 = 0.821551 m
# Диаметр выходного сечения:
d_a2 := d'_a2*d_кр2 = 1.15044 m
l_a1 := d_a1 = 0.821551 m
# Длина сопла:
l_a2 := d_a2 = 1.15044 m
# Глубина утопленности сопел ДУ
l_у1 := l_y1.отн*l_a1 = 0.123233 m
l_у2 := l_y2.отн*l_a2 = 0.115044 m
J_1ПТ1 := J_1T*(1.57/sqrt(k) - 0.66/d'_a1^(2/3)) = 3013.46 m/s
# Теоретические значения удельного пустотного импульса:
J_1ПТ2 := J_1T*(1.57/sqrt(k) - 0.66/d'_a2^(2/3)) = 3277.83 m/s
ξ_1 := 0.025*(d'_a1^1.25 - 1)/d'_a1*(1 + 11.6*z/nthroot(d_кр1/cm, 3)) = 0.068023
# Потери удельного импульса:
ξ_2 := 0.025*(d'_a2^1.25 - 1)/d'_a2*(1 + 11.6*z/nthroot(d_кр2/cm, 3)) = 0.101048
J_1П1 := J_1ПТ1*(1 - ξ_1) = 2808.48 m/s
# Практические значения удельного пустотного импульса:
J_1П2 := J_1ПТ2*(1 - ξ_2) = 2946.61 m/s
# Силовой корпус "кокон"
l_y1.отн = 0.15
l_у1 := l_y1.отн*d_a1 = 0.123233 m
l_y2.отн = 0.1
l_у2 := l_y2.отн*d_a2 = 0.115044 m
d_02 := [0.2; 0.3; 0.4]
K_ц.табл := [1.148; 1.17; 1.204]
K_v.табл := [0.505; 0.514; 0.533]
K_l.табл := [0.89; 0.902; 0.922]
R_1 := D_1/2 = 0.719028 m
d_02.i(d_крi, l_yi.отн, d_ai, l_ai) := 2*((d_ai - d_крi)/l_ai*(l_yi.отн*d_ai) + d_крi)
d_02.1 := d_02.i(d_кр1, l_y1.отн, d_a1, l_a1) = 0.608283 m
R_2 := D_2/2 = 0.611174 m
d_02.2 := d_02.i(d_кр2, l_y2.отн, d_a2, l_a2) = 0.484962 m
d_02.отн1 := d_02.1/D_1 = 0.42299
d_02.отн2 := d_02.2/D_2 = 0.396747
K_ц1 := linterp(d_02, K_ц.табл, d_02.отн1) = 1.21182
K_ц2 := linterp(d_02, K_ц.табл, d_02.отн2) = 1.20289
K_v1 := linterp(d_02, K_v.табл, d_02.отн1) = 0.537368
K_v2 := linterp(d_02, K_v.табл, d_02.отн2) = 0.532382
K_l1 := linterp(d_02, K_l.табл, d_02.отн1) = 0.926598
K_l2 := linterp(d_02, K_l.табл, d_02.отн2) = 0.921349
η_ц1.зв := 4*e'_1*(1 - e'_1) = 0.955743
η_ц2.зв := 4*e'_2*(1 - e'_2) = 0.968563
η_ц1 := 0.985*η_ц1.зв = 0.941407  # - коэффициент заполнения цилидрической части 1 ступени
η_ц2 := 0.985*η_ц2.зв = 0.954034  # - коэффициент заполнения цилидрической части 2 ступени
η_дн1.зв := 1 - 1.5*(1 - η_ц1.зв) = 0.933615
f_р := 1.15
η_дн2.зв := 1 - 1.5*(1 - η_ц2.зв) = 0.952844
S_maxSср := 1.15
k_σ := 1.05
η_дн1 := η_дн1.зв*0.85 = 0.793573
η_дн2 := η_дн2.зв*0.85 = 0.809917
σ'_к := σ_k/ρ_k = 1407407 m^2/s^2
ρ_T = 1810 kg/m^3
P_max.maxi(P_Ni) := f_р*P_Ni*(1 + ΔP_P.N)*S_maxSср^(1/(1 - ν))*k_σ
P_max.max1 := P_max.maxi(P_N1) = 16.8635 MPa
P_max.max2 := P_max.maxi(P_N2) = 13.7974 MPa
K_ск1 := K_ц1/η_ц1 + K_v1*π*R_1^3/ω_N1*ρ_T = 1.37078
K_ск2 := K_ц2/η_ц2 + K_v2*π*R_2^3/ω_N2*ρ_T = 1.4063
m_ск1 := 3*K_ск1*P_max.max1*ω_N1/(σ'_к*ρ_T) = 370.165 kg
m_ск2 := 3*K_ск2*P_max.max2*ω_N2/(σ'_к*ρ_T) = 108.572 kg
l_ц1 := 4*ω_N1/(π*D_1^2*ρ_T*η_ц1) - K_l1*R_1*η_дн1/η_ц1 = 4.35154 m
d_01.отн := 0.2
l_ц2 := 4*ω_N2/(π*D_2^2*ρ_T*η_ц2) - K_l2*R_2*η_дн2/η_ц2 = 1.8667 m
d_011 := d_01.отн*D_1 = 0.287611 m
d'_y1 := d_02.1/2/d_кр1 = 1.42901
d_012 := d_01.отн*D_2 = 0.244469 m
d'_y2 := d_02.2/2/d_кр2 = 1.71248
l_дн11 := (0.305 + 0.1*d_01.отн)*D_1 = 0.467368 m
l_дн12 := (0.305 + 0.1*d_02.отн1)*D_1 = 0.499435 m
l_дн21 := (0.305 + 0.1*d_01.отн)*D_2 = 0.397263 m
l_дн22 := (0.305 + 0.1*d_02.отн2)*D_2 = 0.421312 m
λ_ц1 := l_ц1/D_1 = 3.02599
λ_ц2 := l_ц2/D_2 = 1.52715
ρ_ВТ_4 := 4540*kg/m^3
# Закладные фланцы "кокона"
σ_ВТ_4 := 1400 MPa
K_фл := 0.9
m_фл1 := K_фл*D_1^3*((d_01.отн + d_02.отн1)/2)^3*sqrt(P_N1)*ρ_ВТ_4/sqrt(σ_ВТ_4) = 32.5545 kg
(d_01.отн + d_02.отн1)/2 = 0.311495
m_фл2 := K_фл*D_2^3*((d_01.отн + d_02.отн2)/2)^3*sqrt(P_N2)*ρ_ВТ_4/sqrt(σ_ВТ_4) = 15.8935 kg
(d_01.отн + d_02.отн2)/2 = 0.298373
# Юбки "кокона"
K_ю := 1.61
m_ю1 := K_ю*P_N1*D_1^3/σ'_к = 37.4219 kg
l_ю1 := 0.15*D_1 = 0.215708 m
m_ю2 := K_ю*P_N2*D_2^3/σ'_к = 18.8032 kg
l_ю2 := 0.15*D_2 = 0.183352 m
# Крышка воспломинительного устройства
K_ву := 0.9
m_ву1 := K_ву*P_N1*D_1^3/(σ_ВТ_4/ρ_ВТ_4) = 95.4751 kg
m_ву2 := K_ву*P_N2*D_2^3/(σ_ВТ_4/ρ_ВТ_4) = 47.973 kg
# Защитно-крепящий слой
q_зск := 2.4*kg/m^2
S_зкс1 := π*D_1^2*(λ_ц1 + 0.615) = 23.6549 m^2
m_зск1 := S_зкс1*q_зск = 56.7717 kg
S_зкс2 := π*D_2^2*(λ_ц2 + 0.615) = 10.0551 m^2
m_зск2 := S_зкс2*q_зск = 24.1323 kg
ρ_тзп := 1000*kg/m^3
# Теплозащитное покрытие кокона (ТПЗ)
K_тзп := 1.17*10^-3
m_тзп1 := K_тзп*ω_N1*sqrt(P_N1/MPa*τ_N1/s)/(ρ_T*D_1/m*λ_ц1^0.25)*ρ_тзп = 116.04 kg
m_тзп2 := K_тзп*ω_N2*sqrt(P_N2/MPa*τ_N2/s)/(ρ_T*D_2/m*λ_ц2^0.25)*ρ_тзп = 50.2878 kg
# Утопленная оболочка сопла
K_уо := 16.5*10^-9
ρ_ВТ_6 := 4500*kg/m^3
E_ВТ_6 := 122000 MPa
m_уо1 := K_уо*(β_t*ω_N1/τ_N1)^1.5*d'_y1^2.35*l_y1.отн^0.4*d'_a1^0.4/(P_N1/10^6)^1.1*ρ_ВТ_6/(E_ВТ_6/10^6)^0.4 = 22.3292 kg
d'_y1 = 1.42901
m_уо2 := K_уо*(β_t*ω_N2/τ_N2)^1.5*d'_y2^2.35*l_y2.отн^0.4*d'_a2^0.4/(P_N2/10^6)^1.1*ρ_ВТ_6/(E_ВТ_6/10^6)^0.4 = 10.6313 kg
d'_y2 = 1.71248
# Теплозащитное покрытие утопленной оболочки (ТЗУО)
К_тзуо := 3.7*10^-9*1/(m^-1.5*kg^0.5*s^-0.5)
ρ_тзуо := 1400*kg/m^3
m_тзуо1 := К_тзуо*β_t*ω_N1/sqrt(P_N1/10^6*τ_N1)*d'_y1^1.75*ρ_тзуо = 8.61879 kg
m_тзуо2 := К_тзуо*β_t*ω_N2/sqrt(P_N2/10^6*τ_N2)*d'_y2^1.75*ρ_тзуо = 4.65234 kg
# Корпус раструба
K_кр := 11.2*10^-9
σ_ВТ_6 := 1300 MPa
m_кр1 := K_кр*(β_t*ω_N1/τ_N1)^1.5*d'_a1^1.75*ρ_ВТ_6/(sqrt(P_N1/10^6)*σ_ВТ_6/10^6) = 30.4212 kg
d'_a1 = 3.86005
d_кр1*d'_a1 = 0.821551 m
m_кр2 := K_кр*(β_t*ω_N2/τ_N2)^1.5*4.5^1.75*ρ_ВТ_6/(sqrt(P_N2/10^6)*σ_ВТ_6/10^6) = 9.5861 kg
d_кр1 := sqrt(4*σ_кр1/π) = 0.212834 m
4.5*d_кр2 = 0.637183 m
d_кр2 := sqrt(4*σ_кр2/π) = 0.141596 m
# Облицовка раструба
K_обл := 3.1*10^-9*1/(m^-1.5*kg^0.5*s^-0.5)
ρ_обл := 1400*kg/m^3
m_обл1 := K_обл*β_t*ω_N1/sqrt(P_N1/10^6*τ_N1)*d'_a1^1.75*ρ_обл = 41.0993 kg
l_дн12 = 0.499435 m
D_1 = 1.43806 m
R'_дн := 1 mm
m_обл2 := K_обл*β_t*ω_N2/sqrt(P_N2/10^6*τ_N2)*d'_a2^1.75*ρ_обл = 59.4511 kg
Given
R'_дн^2 == (R'_дн - l_дн)^2 + R^2
R_дн(l_дн, R) := Find(R'_дн)
r_кон := R_дн(l_дн11, R_1)*sin(30 deg) = 0.393391 m
2*r_кон = 0.786782 m
# Горловина
x := R_дн(l_дн11, R_1)*(1 - cos(30 deg)) = 0.105409 m
K_г := 6.44*10^-5*kg^0.5/(m^1.5*s^-0.5)
m_г1 := K_г*β_t*ω_N1/sqrt(P_N1/10^6*τ_N1) = 57.371 kg
l'_заз := 0.1 m
m_г2 := K_г*β_t*ω_N2/sqrt(P_N2/10^6*τ_N2) = 22.5622 kg
Given
d_a2/(R_дн(l_дн11, R_1) + l'_заз) == 2*r_кон/(R_дн(l_дн11, R_1) - x)
l_заз := Find(l'_заз) = 0.209532 m
# Привод рулевых машин и устройства управления вектором тяги
d_кон := (R_дн(l_дн11, R_1) - x)*d_a2/(R_дн(l_дн11, R_1) + l_заз) = 0.786782 m
K_РМУ1 := 0.65*s*sqrt(m)
m_РМУ1 := K_РМУ1*ω_N1/(τ_N1*sqrt(D_1)) = 129.303 kg
K_РМУ2 := 0.57*s*sqrt(m)
K_РМУ3 := 0.38*s*sqrt(m)
m_РМУ2 := K_РМУ2*ω_N2/(τ_N2*sqrt(D_2)) = 44.5381 kg
# Длины отсеков и ступеней
l_ю1 := 0.15*D_1 = 0.215708 m
l_ю2 := 0.15*D_2 = 0.183352 m
l_хо1 := l_дн12 + l_a1 - l_y1.отн*d_a1 - 150 mm - l_ю1 = 0.832045 m  # l.дн22 - длина правого днища второй ступени
l_по1_хо2 := l_дн22 + l_a2 - l_y2.отн*d_a2 + l_дн11 + l_заз - l_ю1 - l_ю2 = 1.73455 m
l_по1 := (D_1^2 - l_ю1^2)^0.5 - l_ю1 - (R_дн(l_дн11, R_1) - l_дн11) = 0.886663 m
R_дн(l_дн11, R_1) = 0.786782 m  # l.a2 - длина сопла
l_хо2 := l_по1_хо2 - l_по1 = 0.847889 m
R_дн(l_дн21, R_2) = 0.668765 m  # l.y2.отн -
l_по2 := (D_2^2 - l_ю2^2)^0.5 - l_ю2 - (R_дн(l_дн21, R_2) - l_дн21) = 0.753664 m
l_ст1 := l_по1 + l_ц1 = 5.2382 m
l_ст2 := l_по2 + l_ц2 = 2.62037 m
l_тр1 := 0 m  # Поперечное разделение
l_тр2 := l_ст2 + l_хо2 = 3.46826 m
# Отсеки ступеней
K_отс := 20*kg/m^2
m_отс1 := K_отс*π*D_1*l_хо1 = 75.18 kg
m_отс2 := K_отс*π*D_1*l_по1 = 80.1151 kg
m_отс3 := K_отс*π*D_2*l_хо2 = 65.1199 kg
m_отс4 := K_отс*π*D_2*l_по2 = 57.8831 kg
# Поперечное-продольное разделение
# Головной обтекатель
K_ГО := 24*kg/m^2
ΔL_ГО := 400 mm = 0.4 m
S_ГО := π*D_2/2*(l_ББ + ΔL_ГО) = 2.89929 m^2
m_ГО := K_ГО*S_ГО + 10 kg = 79.5829 kg
# Бортовая кабельная сеть (БКС)
m_БКС1 := ((0.8*l_ст1 + 2 m) + (0.8*l_тр1 + 2 m)*(1 - 1))*kg/m = 6.19056 kg
m_БКС2 := ((0.8*l_ст2 + 2 m) + (0.8*l_тр2 + 2 m)*(2 - 1))*kg/m = 8.8709 kg
l_тр2 = 3.46826 m
# Уточнение относительных характеристик
# Масса конструкций ступеней:
m_КК1 := m_ск1 + m_фл1 + m_ю1 + m_ву1 + m_зск1 + m_тзп1 = 708.428 kg
m_КК2 := m_ск2 + m_фл2 + m_ю2 + m_ву2 + m_зск2 + m_тзп2 = 265.662 kg
m_КДУ1 := m_КК1 + m_уо1 + m_тзуо1 + m_кр1 + m_обл1 + m_г1 + m_РМУ1 = 997.571 kg
m_КДУ2 := m_КК2 + m_уо2 + m_тзуо2 + m_кр2 + m_обл2 + m_г2 + m_РМУ2 = 417.083 kg
m_K1 := m_КК1 + m_уо1 + m_тзуо1 + m_кр1 + m_обл1 + m_г1 + m_РМУ1 + m_отс1 + m_отс2 + m_БКС1 = 1159.06 kg
m_K2 := m_КК2 + m_уо2 + m_тзуо2 + m_кр2 + m_обл2 + m_г2 + m_РМУ2 + m_отс3 + m_отс4 + m_БКС2 + m_ГО = 628.54 kg
α_К1 := m_K1/ω_N1 = 0.0852405
α_ДУ1 := m_КДУ1/ω_N1 = 0.0733644
α_К2 := m_K2/ω_N2 = 0.132286
α_ДУ2 := m_КДУ2/ω_N2 = 0.0877819
m_02 := m_ПН + m_K2 + ω_N2 = 6262.66 kg
m_01 := m_02 + m_K2 + ω_N1 = 20488.7 kg  # Соломонов 1 ч стр 64
θ_k := linterp(L'_max, θ'_k, L_max) = 31.5 deg
p_h := 0.1 MPa
μ_1 := ω_N1/m_01 = 0.663658
μ_2 := ω_N2/m_02 = 0.75868
θ'_1(θ_k) := asin(1 - μ_1*(sin(θ_k)^0.8))
θ'_1(θ_k) = 37.2409 deg
θ'_2(θ_k) := 0.25*θ'_1(θ_k) + 0.75*θ_k
θ'_2(θ_k) = 32.9352 deg
θ_k1(θ_k) := 0.5*(θ'_1(θ_k) + θ'_2(θ_k))
θ_k1(θ_k) = 35.0881 deg
θ_k2(θ_k) := θ_k
θ_k2(θ_k) = 31.5 deg
# Площадь миделя: | Стартовая нагрузка на мидель
J_11 := J_1П1 - d_a1/m*p_h/P_N1*β_t = 2796.22 m/s
S_m1 := π*D_1^2/4 = 1.62421 m^2
P_m1 := m_01*g/S_m1 = 0.123707 MPa
K_п1 := J_1П1/J_11 - 1 = 0.00438179
K_п2 := 0
K_a2 := 1
K_a1(θ_k) := 1 + K_п1 - (0.3*K_п1 + (4.8*μ_1/(τ_N1/s*sin(θ_k1(θ_k))^(2/3))*12000/(P_m1/Pa)))/ln(1/(1 - μ_1))
J_12 := J_1П2 = 2946.61 m/s
ΔV_g1(θ_k) := τ_N1*g*sin(θ_k1(θ_k))
ΔV_g1(θ_k) = 321.321 m/s
K_a1(θ_k) = 0.995979
ΔV_g2(θ_k) := τ_N2*g*sin(θ_k2(θ_k))
ΔV_g2(θ_k) = 281.818 m/s
V_1(θ_k) := K_a1(θ_k)*J_11*ln(1/(1 - μ_1)) - ΔV_g1(θ_k)
V_1(θ_k) = 2713.27 m/s
V_2(θ_k) := K_a2*J_12*ln(1/(1 - μ_2)) - ΔV_g2(θ_k)
V_2(θ_k) = 3907.18 m/s
V_к(θ_k) := V_1(θ_k) + V_2(θ_k)
V_к(θ_k) = 6620.45 m/s
S_μ1 := μ_1 + (1 - μ_1)*ln(1 - μ_1) = 0.297171
S_μ2 := μ_2 + (1 - μ_2)*ln(1 - μ_2) = 0.415612
Δh_1(θ_k) := (K_a1(θ_k)*J_11*τ_N1/μ_1*S_μ1 - g*τ_N1^2/2*sin(θ'_1(θ_k)))*sin(θ'_1(θ_k))
Δh_2(θ_k) := (V_1(θ_k)*τ_N2 + K_a2*J_12*τ_N2/μ_2*S_μ2 - g*τ_N2^2/2*sin(θ'_2(θ_k)))*sin(θ'_2(θ_k))
h_к(θ_k) := Δh_1(θ_k) + Δh_2(θ_k)
Δh_1(θ_k) = 37.1821 km
Δl_1(θ_k) := Δh_1(θ_k)*cot(θ'_1(θ_k))
Δh_2(θ_k) = 125.019 km
Δl_2(θ_k) := Δh_2(θ_k)*cot(θ'_2(θ_k))
h_к(θ_k) = 162.201 km
l_k(θ_k) := Δl_1(θ_k) + Δl_2(θ_k)
Δl_1(θ_k) = 48913.1 m
l_k(θ_k) = 241903 m
Δl_2(θ_k) = 192990 m
R_з := 6371 km
μ_0 := 3.968*10^5*km^3/s^2
r_к(θ_k) := R_з + h_к(θ_k)
r_к(θ_k) = 6533201 m
ν_к(θ_k) := V_к(θ_k)^2*r_к(θ_k)/μ_0
ν_к(θ_k) = 0.721655
L_элипт(θ_k) := 2*R_з*atan(ν_к(θ_k)*tan(θ_k)/(1 - ν_к(θ_k) + tan(θ_k)^2))
L_элипт(θ_k) = 7577183 m
L_расч(θ_k) := L_элипт(θ_k) + 2*l_k(θ_k)
L_расч(θ_k) = 8060.99 km
ΔL := L_расч(θ_k) - L_max = 2060.99 km
ΔV_k := ΔL/dLdV(L_расч(θ_k)) = 503.87 m/s
ΔV_1 := ΔV_k*V_1(θ_k)/V_к(θ_k) = 206.502 m/s
ΔV_2 := ΔV_k*V_2(θ_k)/V_к(θ_k) = 297.368 m/s
L_0расч := L_расч(θ_k) = 8060.99 km
ω_01 := ω_N1 = 13597.5 kg
m_К01 := m_K1 = 1159.06 kg
J_01П1 := J_1П1 = 2808.48 m/s
ω_02 := ω_N2 = 4751.35 kg
m_К02 := m_K2 = 628.54 kg
J_01П2 := J_1П2 = 2946.61 m/s
# Корректировка параметров
Δω_2 := -ΔV_2*m_02/J_12/(1 - (μ_2/(1 - μ_2))*0.7*α_ДУ2 - ln(1/(1 - μ_2))/μ_2*(J_1T/J_12)*(0.22/d'_a2^(2/3))) = -878.312 kg
Δω_1 := (-ΔV_1*m_01/J_11 + (μ_1/(1 - μ_1))*((1 + 0.7*α_ДУ2)*Δω_2))/(1 - (μ_1/(1 - μ_1))*0.7*α_ДУ1) = -3730.68 kg
# Перерасчет
ω_N1 := ω_N1 + Δω_1 = 9866.8 kg
ω_N2 := ω_N2 + Δω_2 = 3873.04 kg
m_к1 := ω_N1*α_1 = 1011.57 kg
m_к2 := ω_N2*α_2 = 427.692 kg
σ_кр1 := ω_N1*β_t/(P_N1*τ_N1) = 0.0258161 m^2
# Площадь сечения в критике:
σ_кр2 := ω_N2*β_t/(P_N2*τ_N2) = 0.012836 m^2
d_кр1 := sqrt(4*σ_кр1/π) = 0.181301 m
# Диаметр критического сечения:
d_кр2 := sqrt(4*σ_кр2/π) = 0.127841 m
d'_a1 := sqrt(0.9*P_N1/MPa + 5) = 3.86005
# Степень расширения сопла:
d'_a2 := 0.8*D_1/d_кр2 = 8.99905
d_a1 := d'_a1*d_кр1 = 0.699831 m
# Диаметр выходного сечения:
d_a2 := d'_a2*d_кр2 = 1.15044 m
l_a1 := d_a1 = 0.699831 m
# Длина сопла:
l_a2 := d_a2 = 1.15044 m
J_1ПТ1 := J_1T*(1.57/sqrt(k) - 0.66/d'_a1^(2/3)) = 3013.46 m/s
# Теоретические значения удельного пустотного импульса:
J_1ПТ2 := J_1T*(1.57/sqrt(k) - 0.66/d'_a2^(2/3)) = 3304.94 m/s
ξ_1 := 0.025*(d'_a1^1.25 - 1)/d'_a1*(1 + 11.6*z/nthroot(d_кр1/cm, 3)) = 0.0701895
# Потери удельного импульса:
ξ_2 := 0.025*(d'_a2^1.25 - 1)/d'_a2*(1 + 11.6*z/nthroot(d_кр2/cm, 3)) = 0.106862
J_1П1 := J_1ПТ1*(1 - ξ_1) = 2801.95 m/s
# Практические значения удельного пустотного импульса:
J_1П2 := J_1ПТ2*(1 - ξ_2) = 2951.76 m/s
# Силовой корпус "кокон"
d_02 := [0.2; 0.3; 0.4]
K_ц.табл := [1.148; 1.17; 1.204]
K_v.табл := [0.505; 0.514; 0.533]
K_l.табл := [0.89; 0.902; 0.922]
d_02.i(d_крi, l_yi.отн, d_ai, l_ai) := 2*((d_ai - d_крi)/l_ai*(l_yi.отн*d_ai) + d_крi)
R_1 := D_1/2 = 0.719028 m
d_02.1 := d_02.i(d_кр1, l_y1.отн, d_a1, l_a1) = 0.518161 m
R_2 := D_2/2 = 0.611174 m
d_02.2 := d_02.i(d_кр2, l_y2.отн, d_a2, l_a2) = 0.460202 m
d_02.отн1 := d_02.1/D_1 = 0.360321
d_02.отн2 := d_02.2/D_2 = 0.376491
K_ц1 := linterp(d_02, K_ц.табл, d_02.отн1) = 1.19051
K_ц2 := linterp(d_02, K_ц.табл, d_02.отн2) = 1.19601
K_v1 := linterp(d_02, K_v.табл, d_02.отн1) = 0.525461
K_v2 := linterp(d_02, K_v.табл, d_02.отн2) = 0.528533
K_l1 := linterp(d_02, K_l.табл, d_02.отн1) = 0.914064
K_l2 := linterp(d_02, K_l.табл, d_02.отн2) = 0.917298
η_ц1.зв := 4*e'_1*(1 - e'_1) = 0.955743
η_ц2.зв := 4*e'_2*(1 - e'_2) = 0.968563
η_ц1 := 0.985*η_ц1.зв = 0.941407  # - коэффициент заполнения цилидрической части 1 ступени
η_ц2 := 0.985*η_ц2.зв = 0.954034  # - коэффициент заполнения цилидрической части 2 ступени
η_дн1.зв := 1 - 1.5*(1 - η_ц1.зв) = 0.933615
f_р := 1.15
η_дн2.зв := 1 - 1.5*(1 - η_ц2.зв) = 0.952844
S_maxSср := 1.15
η_дн1 := η_дн1.зв*0.85 = 0.793573
k_σ := 1.05
η_дн2 := η_дн2.зв*0.85 = 0.809917
σ'_к := σ_k/ρ_k = 1407407 m^2/s^2
P_max.maxi(P_Ni) := f_р*P_Ni*(1 + ΔP_P.N)*S_maxSср^(1/(1 - ν))*k_σ
P_max.max1 := P_max.maxi(P_N1) = 16.8635 MPa
ρ_T = 1810 kg/m^3
P_max.max2 := P_max.maxi(P_N2) = 13.7974 MPa
K_ск1 := K_ц1/η_ц1 + K_v1*π*R_1^3/ω_N1*ρ_T = 1.37718
K_ск2 := K_ц2/η_ц2 + K_v2*π*R_2^3/ω_N2*ρ_T = 1.43078
m_ск1 := 3*K_ск1*P_max.max1*ω_N1/(σ'_к*ρ_T) = 269.859 kg
m_ск2 := 3*K_ск2*P_max.max2*ω_N2/(σ'_к*ρ_T) = 90.042 kg
l_ц1 := 4*ω_N1/(π*D_1^2*ρ_T*η_ц1) - K_l1*R_1*η_дн1/η_ц1 = 3.01113 m
d_01.отн := 0.2
d'_y1 := d_02.1/2/d_кр1 = 1.42901
l_ц2 := 4*ω_N2/(π*D_2^2*ρ_T*η_ц2) - K_l2*R_2*η_дн2/η_ц2 = 1.43537 m
d'_y2 := d_02.2/2/d_кр2 = 1.7999
l_дн11 := (0.305 + 0.1*d_01.отн)*D_1 = 0.467368 m
l_дн12 := (0.305 + 0.1*d_02.отн1)*D_1 = 0.490423 m
l_дн21 := (0.305 + 0.1*d_01.отн)*D_2 = 0.397263 m
l_дн22 := (0.305 + 0.1*d_02.отн2)*D_2 = 0.418836 m
ρ_ВТ_4 := 4540*kg/m^3
λ_ц1 := l_ц1/D_1 = 2.09389
λ_ц2 := l_ц2/D_2 = 1.17427
σ_ВТ_4 := 1400 MPa
# Закладные фланцы "кокона"
K_фл := 0.9
m_фл1 := K_фл*D_1^3*((d_01.отн + d_02.отн1)/2)^3*sqrt(P_N1)*ρ_ВТ_4/sqrt(σ_ВТ_4) = 23.6852 kg
m_фл2 := K_фл*D_2^3*((d_01.отн + d_02.отн2)/2)^3*sqrt(P_N2)*ρ_ВТ_4/sqrt(σ_ВТ_4) = 14.3293 kg
# Юбки "кокона"
K_ю := 1.61
m_ю1 := K_ю*P_N1*D_1^3/σ'_к = 37.4219 kg
m_ю2 := K_ю*P_N2*D_2^3/σ'_к = 18.8032 kg
# Крышка воспломинительного устройства
K_ву := 0.9
m_ву1 := K_ву*P_N1*D_1^3/(σ_ВТ_4/ρ_ВТ_4) = 95.4751 kg
m_ву2 := K_ву*P_N2*D_2^3/(σ_ВТ_4/ρ_ВТ_4) = 47.973 kg
# Защитно-крепящий слой
q_зск := 2.4*kg/m^2
S_зкс1 := π*D_1^2*(λ_ц1 + 0.615) = 17.5992 m^2
m_зск1 := S_зкс1*q_зск = 42.2381 kg
S_зкс2 := π*D_2^2*(λ_ц2 + 0.615) = 8.39876 m^2
m_зск2 := S_зкс2*q_зск = 20.157 kg
ρ_тзп := 1000*kg/m^3
# Теплозащитное покрытие кокона (ТПЗ)
K_тзп := 1.17*10^-3
m_тзп1 := K_тзп*ω_N1*sqrt(P_N1/MPa*τ_N1/s)/(ρ_T*D_1/m*λ_ц1^0.25)*ρ_тзп = 92.3216 kg
m_тзп2 := K_тзп*ω_N2*sqrt(P_N2/MPa*τ_N2/s)/(ρ_T*D_2/m*λ_ц2^0.25)*ρ_тзп = 43.7749 kg
# Утопленная оболочка сопла
K_уо := 16.5*10^-9
ρ_ВТ_6 := 4500*kg/m^3
E_ВТ_6 := 122000 MPa
m_уо1 := K_уо*(β_t*ω_N1/τ_N1)^1.5*d'_y1^2.35*l_y1.отн^0.4*d'_a1^0.4/(P_N1/10^6)^1.1*ρ_ВТ_6/(E_ВТ_6/10^6)^0.4 = 13.8023 kg
m_уо2 := K_уо*(β_t*ω_N2/τ_N2)^1.5*d'_y2^2.35*l_y2.отн^0.4*d'_a2^0.4/(P_N2/10^6)^1.1*ρ_ВТ_6/(E_ВТ_6/10^6)^0.4 = 9.16235 kg
# Теплозащитное покрытие утопленной оболочки (ТЗУО)
К_тзуо := 3.7*10^-9*1/(m^-1.5*kg^0.5*s^-0.5)
ρ_тзуо := 1400*kg/m^3
m_тзуо1 := К_тзуо*β_t*ω_N1/sqrt(P_N1/10^6*τ_N1)*d'_y1^1.75*ρ_тзуо = 6.25409 kg
m_тзуо2 := К_тзуо*β_t*ω_N2/sqrt(P_N2/10^6*τ_N2)*d'_y2^1.75*ρ_тзуо = 4.13759 kg
# Корпус раструба
K_кр := 11.2*10^-9
σ_ВТ_6 := 1300 MPa
m_кр1 := K_кр*(β_t*ω_N1/τ_N1)^1.5*d'_a1^1.75*ρ_ВТ_6/(sqrt(P_N1/10^6)*σ_ВТ_6/10^6) = 18.8041 kg
m_кр2 := K_кр*(β_t*ω_N2/τ_N2)^1.5*4.5^1.75*ρ_ВТ_6/(sqrt(P_N2/10^6)*σ_ВТ_6/10^6) = 7.05495 kg
# Облицовка раструба
K_обл := 3.1*10^-9*1/(m^-1.5*kg^0.5*s^-0.5)
ρ_обл := 1400*kg/m^3
l_дн12 = 0.490423 m
D_1 = 1.43806 m
R'_дн := 1 mm
m_обл1 := K_обл*β_t*ω_N1/sqrt(P_N1/10^6*τ_N1)*d'_a1^1.75*ρ_обл = 29.823 kg
Given
R'_дн^2 == (R'_дн - l_дн)^2 + R^2
R_дн(l_дн, R) := Find(R'_дн)
m_обл2 := K_обл*β_t*ω_N2/sqrt(P_N2/10^6*τ_N2)*d'_a2^1.75*ρ_обл = 57.9515 kg
r_кон := R_дн(l_дн11, R_1)*sin(30 deg) = 0.393391 m
2*r_кон = 0.786782 m
x := R_дн(l_дн11, R_1)*(1 - cos(30 deg)) = 0.105409 m
l'_заз := 0.1 m
Given
# Горловина
K_г := 6.44*10^-5*kg^0.5/(m^1.5*s^-0.5)
d_a2/(R_дн(l_дн11, R_1) + l'_заз) == 2*r_кон/(R_дн(l_дн11, R_1) - x)
m_г1 := K_г*β_t*ω_N1/sqrt(P_N1/10^6*τ_N1) = 41.6303 kg
m_г2 := K_г*β_t*ω_N2/sqrt(P_N2/10^6*τ_N2) = 18.3915 kg
l_заз := Find(l'_заз) = 0.209532 m
d_кон := (R_дн(l_дн11, R_1) - x)*d_a2/(R_дн(l_дн11, R_1) + l_заз) = 0.786782 m
# Привод рулевых машин и устройства управления вектором тяги
K_РМУ1 := 0.65*s*sqrt(m)
K_РМУ2 := 0.57*s*sqrt(m)
m_РМУ1 := K_РМУ1*ω_N1/(τ_N1*sqrt(D_1)) = 93.8268 kg
l_y2.отн*d_a2 = 0.115044 m
m_РМУ2 := K_РМУ2*ω_N2/(τ_N2*sqrt(D_2)) = 36.305 kg
# Длины отсеков и ступеней
l_ю1 := 0.15*D_1 = 0.215708 m
l_ю2 := 0.15*D_2 = 0.183352 m
l_ю3 := 0.15*D_3  # error: Эта переменная не определена.
l_хо1 := l_дн11 + l_a1 - l_y1.отн*d_a1 - 150 mm - l_ю1 = 0.696516 m
l_по1_хо2 := l_дн22 + l_a2 - l_y2.отн*d_a2 + l_дн11 + l_заз - l_ю1 - l_ю2 = 1.73208 m
l_по1 := (D_1^2 - l_ю1^2)^0.5 - l_ю1 - (R_дн(l_дн11, R_1) - l_дн11) = 0.886663 m
l_хо2 := l_по1_хо2 - l_по1 = 0.845413 m
l_по2 := (D_2^2 - l_ю2^2)^0.5 - l_ю2 - (R_дн(l_дн21, R_2) - l_дн21) = 0.753664 m
l_ст1 := l_по1 + l_ц1 = 3.89779 m
l_ст2 := l_по2 + l_ц2 = 2.18903 m
l_тр1 := 0 m
l_тр2 := l_ст2 + l_хо2 = 3.03444 m  # Поперечное-продольное разделение
# Отсеки ступеней
K_отс := 24*kg/m^2
m_отс1 := K_отс*π*D_1*l_хо1 = 75.5211 kg
m_отс2 := K_отс*π*D_1*l_по1 = 96.1381 kg
m_отс3 := K_отс*π*D_2*l_хо2 = 77.9156 kg
m_отс4 := K_отс*π*D_2*l_по2 = 69.4598 kg
# Поперечное-продольное разделение
# Головной обтекатель
K_ГО := 24*kg/m^2
ΔL_ГО := 400 mm = 0.4 m
S_ГО := π*D_2/2*(l_ББ + ΔL_ГО) = 2.89929 m^2
m_ГО := K_ГО*S_ГО + 10 kg = 79.5829 kg
# Бортовая кабельная сеть (БКС)
m_БКС1 := ((0.8*l_ст1 + 2 m) + (0.8*l_тр1 + 2 m)*(1 - 1))*kg/m = 5.11824 kg
m_БКС2 := ((0.8*l_ст2 + 2 m) + (0.8*l_тр2 + 2 m)*(2 - 1))*kg/m = 8.17878 kg
# Уточнение относительных характеристик
# Масса конструкций ступеней:
m_КК1 := m_ск1 + m_фл1 + m_ю1 + m_ву1 + m_зск1 + m_тзп1 = 561.001 kg
m_КК2 := m_ск2 + m_фл2 + m_ю2 + m_ву2 + m_зск2 + m_тзп2 = 235.08 kg
m_КДУ1 := m_КК1 + m_уо1 + m_тзуо1 + m_кр1 + m_обл1 + m_г1 + m_РМУ1 = 765.141 kg
m_КДУ2 := m_КК2 + m_уо2 + m_тзуо2 + m_кр2 + m_обл2 + m_г2 + m_РМУ2 = 368.082 kg
m_K1 := m_КК1 + m_уо1 + m_тзуо1 + m_кр1 + m_обл1 + m_г1 + m_РМУ1 + m_отс1 + m_отс2 + m_БКС1 = 941.919 kg
m_K2 := m_КК2 + m_уо2 + m_тзуо2 + m_кр2 + m_обл2 + m_г2 + m_РМУ2 + m_отс3 + m_отс4 + m_БКС2 + m_ГО = 603.22 kg
α_К1 := m_K1/ω_N1 = 0.0954634
α_ДУ1 := m_КДУ1/ω_N1 = 0.0775471
α_К2 := m_K2/ω_N2 = 0.155748
α_ДУ2 := m_КДУ2/ω_N2 = 0.0950371
m_02 := m_ПН + m_K2 + ω_N2 = 5359.03 kg
m_01 := m_02 + m_K2 + ω_N1 = 15829 kg  # Соломонов 1 ч стр 64
θ_k := linterp(L'_max, θ'_k, L_max) = 31.5 deg
p_h := 0.1 MPa
μ_1 := ω_N1/m_01 = 0.623335
μ_2 := ω_N2/m_02 = 0.722714
θ'_1(θ_k) := asin(1 - μ_1*(sin(θ_k)^0.8))
θ'_1(θ_k) = 38.988 deg
θ'_2(θ_k) := 0.25*θ'_1(θ_k) + 0.75*θ_k
θ'_2(θ_k) = 33.372 deg
θ'_3(θ_k) := θ_k
θ'_3(θ_k) = 0.549779
θ_k1(θ_k) := 0.5*(θ'_1(θ_k) + θ'_2(θ_k))
θ_k1(θ_k) = 36.18 deg
θ_k2(θ_k) := θ_k
θ_k2(θ_k) = 31.5 deg
θ_k3(θ_k) := θ_k
θ_k3(θ_k) = 0.549779
# Площадь миделя: | Стартовая нагрузка на мидель
J_11 := J_1П1 - d_a1/m*p_h/P_N1*β_t = 2791.51 m/s
S_m1 := π*D_1^2/4 = 1.62421 m^2
P_m1 := m_01*g/S_m1 = 0.0955727 MPa
K_п1 := J_1П1/J_11 - 1 = 0.00373889
K_п2 := 0
K_п3 := 0
K_a2 := 1
K_a3 := 1
K_a1(θ_k) := 1 + K_п1 - (0.3*K_п1 + (4.8*μ_1/(τ_N1/s*sin(θ_k1(θ_k))^(2/3))*12000/(P_m1/Pa)))/ln(1/(1 - μ_1))
J_12 := J_1П2
K_a1(θ_k) = 0.992998
ΔV_g1(θ_k) := τ_N1*g*sin(θ_k1(θ_k))
ΔV_g2(θ_k) := τ_N2*g*sin(θ_k2(θ_k))
V_1(θ_k) := K_a1(θ_k)*J_11*ln(1/(1 - μ_1)) - ΔV_g1(θ_k)
V_1(θ_k) = 2376.57 m/s
V_2(θ_k) := K_a2*J_12*ln(1/(1 - μ_2)) - ΔV_g2(θ_k)
V_2(θ_k) = 3504.42 m/s
V_к(θ_k) := V_1(θ_k) + V_2(θ_k)
V_к(θ_k) = 5880.99 m/s
S_μ1 := μ_1 + (1 - μ_1)*ln(1 - μ_1) = 0.25556
S_μ2 := μ_2 + (1 - μ_2)*ln(1 - μ_2) = 0.367037
Δh_1(θ_k) := (K_a1(θ_k)*J_11*τ_N1/μ_1*S_μ1 - g*τ_N1^2/2*sin(θ'_1(θ_k)))*sin(θ'_1(θ_k))
Δh_2(θ_k) := (V_1(θ_k)*τ_N2 + K_a2*J_12*τ_N2/μ_2*S_μ2 - g*τ_N2^2/2*sin(θ'_2(θ_k)))*sin(θ'_2(θ_k))
h_к(θ_k) := Δh_1(θ_k) + Δh_2(θ_k)
Δh_1(θ_k) = 34.45 km
Δl_1(θ_k) := Δh_1(θ_k)*cot(θ'_1(θ_k))
Δh_2(θ_k) = 112.766 km
Δl_2(θ_k) := Δh_2(θ_k)*cot(θ'_2(θ_k))
h_к(θ_k) = 147.216 km
l_k(θ_k) := Δl_1(θ_k) + Δl_2(θ_k)
R_з := 6371 km
μ_0 := 3.968*10^5*km^3/s^2
r_к(θ_k) := R_з + h_к(θ_k)
ν_к(θ_k) := V_к(θ_k)^2*r_к(θ_k)/μ_0
L_элипт(θ_k) := 2*R_з*atan(ν_к(θ_k)*tan(θ_k)/(1 - ν_к(θ_k) + tan(θ_k)^2))
L_расч(θ_k) := L_элипт(θ_k) + 2*l_k(θ_k)
L_расч(θ_k) = 5615.13 km
ΔL := L_расч(θ_k) - L_max = -384.868 km
ΔV_k := ΔL/dLdV(L_расч(θ_k)) = -148.443 m/s
ΔV_1 := ΔV_k*V_1(θ_k)/V_к(θ_k) = -59.9873 m/s
ΔV_2 := ΔV_k*V_2(θ_k)/V_к(θ_k) = -88.4557 m/s
L_1расч := L_расч(θ_k) = 5615.13 km
ω_11 := ω_N1 = 9866.8 kg
m_К11 := m_K1 = 941.919 kg
J_11П1 := J_1П1 = 2801.95 m/s
ω_12 := ω_N2 = 3873.04 kg
m_К12 := m_K2 = 603.22 kg
J_11П2 := J_1П2 = 2951.76 m/s
L_расч := [L_1расч; L_0расч] = [5615.13; 8060.99] km
ω_2расч := [ω_12; ω_02] = [3873.04; 4751.35] kg
ω_1расч := [ω_11; ω_01] = [9866.8; 13597.5] kg
m_K1расч := [m_К11; m_К01] = [941.919; 1159.06] kg
m_K2расч := [m_К12; m_К02] = [603.22; 628.54] kg
J_1П1расч := [J_11П1; J_01П1] = [2801.95; 2808.48] m/s
J_1П2расч := [J_11П2; J_01П2] = [2951.76; 2946.61] m/s
L_финал := L_max + 100 km = 6100 km
9483.814 kg
ω_1финал := linterp(L_расч, ω_1расч, L_финал) = 10606.4 kg
4841.345 kg
ω_2финал := linterp(L_расч, ω_2расч, L_финал) = 4047.16 kg
1881.482 kg
m_K1финал := linterp(L_расч, m_K1расч, L_финал) = 984.964 kg
m_K2финал := linterp(L_расч, m_K2расч, L_финал) = 608.239 kg
J_1П1финал := linterp(L_расч, J_1П1расч, L_финал) = 2803.24 m/s
J_1П2финал := linterp(L_расч, J_1П2расч, L_финал) = 2950.74 m/s
m_00 = 21150.3 kg
ω_N1 := ω_1финал = 10606.4 kg
ω_N2 := ω_2финал = 4047.16 kg
m_к1 := ω_N1*α_1 = 1087.39 kg
m_к2 := ω_N2*α_2 = 446.92 kg
σ_кр1 := ω_N1*β_t/(P_N1*τ_N1) = 0.0277511 m^2
# Площадь сечения в критике:
σ_кр2 := ω_N2*β_t/(P_N2*τ_N2) = 0.013413 m^2
d_кр1 := sqrt(4*σ_кр1/π) = 0.187973 m
# Диаметр критического сечения:
d_кр2 := sqrt(4*σ_кр2/π) = 0.130683 m
d'_a1 := sqrt(0.9*P_N1/MPa + 5) = 3.86005
# Степень расширения сопла:
d'_a2 := 0.8*D_1/d_кр2 = 8.80334
d_a1 := d'_a1*d_кр1 = 0.725586 m
# Диаметр выходного сечения:
d_a2 := d'_a2*d_кр2 = 1.15044 m
l_y1 := 0.15*d_a1 = 0.108838 m
l_a1 := d_a1 = 0.725586 m
# Длина сопла:
lya2 := 0.1*d_a2 = 0.115044 m
l_a2 := d_a2 = 1.15044 m
J_1ПТ1 := J_1T*(1.57/sqrt(k) - 0.66/d'_a1^(2/3)) = 3013.46 m/s
# Теоретические значения удельного пустотного импульса:
J_1ПТ2 := J_1T*(1.57/sqrt(k) - 0.66/d'_a2^(2/3)) = 3299.26 m/s
ξ_1 := 0.025*(d'_a1^1.25 - 1)/d'_a1*(1 + 11.6*z/nthroot(d_кр1/cm, 3)) = 0.069691
# Потери удельного импульса:
ξ_2 := 0.025*(d'_a2^1.25 - 1)/d'_a2*(1 + 11.6*z/nthroot(d_кр2/cm, 3)) = 0.105592
J_1П1 := J_1ПТ1*(1 - ξ_1) = 2803.45 m/s
# Практические значения удельного пустотного импульса:
J_1П2 := J_1ПТ2*(1 - ξ_2) = 2950.88 m/s
# Силовой корпус "кокон"
d_02 := [0.2; 0.3; 0.4]
K_ц.табл := [1.148; 1.17; 1.204]
K_v.табл := [0.505; 0.514; 0.533]
K_l.табл := [0.89; 0.902; 0.922]
d_02.i(d_крi, l_yi.отн, d_ai, l_ai) := 2*((d_ai - d_крi)/l_ai*(l_yi.отн*d_ai) + d_крi)
R_1 := D_1/2 = 0.719028 m
d_02.1 := d_02.i(d_кр1, l_y1.отн, d_a1, l_a1) = 0.53723 m
R_2 := D_2/2 = 0.611174 m
d_02.2 := d_02.i(d_кр2, l_y2.отн, d_a2, l_a2) = 0.465318 m
D_1 = 1.43806 m
D_2 = 1.22235 m
d_02.отн1 := d_02.1/D_1 = 0.373581
d_02.отн2 := d_02.2/D_2 = 0.380676
K_ц1 := linterp(d_02, K_ц.табл, d_02.отн1) = 1.19502
K_ц2 := linterp(d_02, K_ц.табл, d_02.отн2) = 1.19743
K_v1 := linterp(d_02, K_v.табл, d_02.отн1) = 0.52798
K_v2 := linterp(d_02, K_v.табл, d_02.отн2) = 0.529328
K_l1 := linterp(d_02, K_l.табл, d_02.отн1) = 0.916716
K_l2 := linterp(d_02, K_l.табл, d_02.отн2) = 0.918135
η_ц1.зв := 4*e'_1*(1 - e'_1) = 0.955743
η_ц2.зв := 4*e'_2*(1 - e'_2) = 0.968563
η_ц1 := 0.985*η_ц1.зв = 0.941407  # - коэффициент заполнения цилидрической части 1 ступени
η_ц2 := 0.985*η_ц2.зв = 0.954034  # - коэффициент заполнения цилидрической части 2 ступени
η_дн1.зв := 1 - 1.5*(1 - η_ц1.зв) = 0.933615
f_р := 1.15
η_дн2.зв := 1 - 1.5*(1 - η_ц2.зв) = 0.952844
S_maxSср := 1.15
η_дн1 := η_дн1.зв*0.85 = 0.793573
k_σ := 1.05
η_дн2 := η_дн2.зв*0.85 = 0.809917
σ'_к := σ_k/ρ_k = 1407407 m^2/s^2
P_max.maxi(P_Ni) := f_р*P_Ni*(1 + ΔP_P.N)*S_maxSср^(1/(1 - ν))*k_σ
P_max.max1 := P_max.maxi(P_N1) = 16.8635 MPa
ρ_T = 1810 kg/m^3
P_max.max2 := P_max.maxi(P_N2) = 13.7974 MPa
K_ск1 := K_ц1/η_ц1 + K_v1*π*R_1^3/ω_N1*ρ_T = 1.37462
K_ск2 := K_ц2/η_ц2 + K_v2*π*R_2^3/ω_N2*ρ_T = 1.42491
m_ск1 := 3*K_ск1*P_max.max1*ω_N1/(σ'_к*ρ_T) = 289.547 kg
m_ск2 := 3*K_ск2*P_max.max2*ω_N2/(σ'_к*ρ_T) = 93.7036 kg
l_ц1 := 4*ω_N1/(π*D_1^2*ρ_T*η_ц1) - K_l1*R_1*η_дн1/η_ц1 = 3.27675 m
d_01.отн := 0.2
d'_y1 := d_02.1/2/d_кр1 = 1.42901
l_ц2 := 4*ω_N2/(π*D_2^2*ρ_T*η_ц2) - K_l2*R_2*η_дн2/η_ц2 = 1.52086 m
d'_y2 := d_02.2/2/d_кр2 = 1.78033
l_дн11 := (0.305 + 0.1*d_01.отн)*D_1 = 0.467368 m
l_дн12 := (0.305 + 0.1*d_02.отн1)*D_1 = 0.49233 m
l_дн21 := (0.305 + 0.1*d_01.отн)*D_2 = 0.397263 m
l_дн22 := (0.305 + 0.1*d_02.отн2)*D_2 = 0.419348 m
ρ_ВТ_4 := 4540*kg/m^3
λ_ц1 := l_ц1/D_1 = 2.2786
λ_ц2 := l_ц2/D_2 = 1.24421
σ_ВТ_4 := 1400 MPa
# Закладные фланцы "кокона"
K_фл := 0.9
m_фл1 := K_фл*D_1^3*((d_01.отн + d_02.отн1)/2)^3*sqrt(P_N1)*ρ_ВТ_4/sqrt(σ_ВТ_4) = 25.4069 kg
m_фл2 := K_фл*D_2^3*((d_01.отн + d_02.отн2)/2)^3*sqrt(P_N2)*ρ_ВТ_4/sqrt(σ_ВТ_4) = 14.6437 kg
# Юбки "кокона"
K_ю := 1.61
m_ю1 := K_ю*P_N1*D_1^3/σ'_к = 37.4219 kg
m_ю2 := K_ю*P_N2*D_2^3/σ'_к = 18.8032 kg
# Крышка воспломинительного устройства
K_ву := 0.9
m_ву1 := K_ву*P_N1*D_1^3/(σ_ВТ_4/ρ_ВТ_4) = 95.4751 kg
m_ву2 := K_ву*P_N2*D_2^3/(σ_ВТ_4/ρ_ВТ_4) = 47.973 kg
# Защитно-крепящий слой
q_зск := 2.4*kg/m^2
S_зкс1 := π*D_1^2*(λ_ц1 + 0.615) = 18.7992 m^2
m_зск1 := S_зкс1*q_зск = 45.1181 kg
S_зкс2 := π*D_2^2*(λ_ц2 + 0.615) = 8.72706 m^2
m_зск2 := S_зкс2*q_зск = 20.9449 kg
ρ_тзп := 1000*kg/m^3
# Теплозащитное покрытие кокона (ТПЗ)
K_тзп := 1.17*10^-3
m_тзп1 := K_тзп*ω_N1*sqrt(P_N1/MPa*τ_N1/s)/(ρ_T*D_1/m*λ_ц1^0.25)*ρ_тзп = 97.1662 kg
m_тзп2 := K_тзп*ω_N2*sqrt(P_N2/MPa*τ_N2/s)/(ρ_T*D_2/m*λ_ц2^0.25)*ρ_тзп = 45.086 kg
# Утопленная оболочка сопла
K_уо := 16.5*10^-9
ρ_ВТ_6 := 4500*kg/m^3
E_ВТ_6 := 122000 MPa
m_уо1 := K_уо*(β_t*ω_N1/τ_N1)^1.5*d'_y1^2.35*l_y1.отн^0.4*d'_a1^0.4/(P_N1/10^6)^1.1*ρ_ВТ_6/(E_ВТ_6/10^6)^0.4 = 15.3828 kg
m_уо2 := K_уо*(β_t*ω_N2/τ_N2)^1.5*d'_y2^2.35*l_y2.отн^0.4*d'_a2^0.4/(P_N2/10^6)^1.1*ρ_ВТ_6/(E_ВТ_6/10^6)^0.4 = 9.45533 kg
# Теплозащитное покрытие утопленной оболочки (ТЗУО)
К_тзуо := 3.7*10^-9*1/(m^-1.5*kg^0.5*s^-0.5)
ρ_тзуо := 1400*kg/m^3
m_тзуо1 := К_тзуо*β_t*ω_N1/sqrt(P_N1/10^6*τ_N1)*d'_y1^1.75*ρ_тзуо = 6.72287 kg
m_тзуо2 := К_тзуо*β_t*ω_N2/sqrt(P_N2/10^6*τ_N2)*d'_y2^1.75*ρ_тзуо = 4.24167 kg
# Корпус раструба
K_кр := 11.2*10^-9
σ_ВТ_6 := 1300 MPa
m_кр1 := K_кр*(β_t*ω_N1/τ_N1)^1.5*d'_a1^1.75*ρ_ВТ_6/(sqrt(P_N1/10^6)*σ_ВТ_6/10^6) = 20.9575 kg
m_кр2 := K_кр*(β_t*ω_N2/τ_N2)^1.5*4.5^1.75*ρ_ВТ_6/(sqrt(P_N2/10^6)*σ_ВТ_6/10^6) = 7.53601 kg
l_дн11 = 0.467368 m
# Облицовка раструба
K_обл := 3.1*10^-9*1/(m^-1.5*kg^0.5*s^-0.5)
ρ_обл := 1400*kg/m^3
l_дн12 = 0.49233 m
D_1 = 1.43806 m
R'_дн := 1 mm
m_обл1 := K_обл*β_t*ω_N1/sqrt(P_N1/10^6*τ_N1)*d'_a1^1.75*ρ_обл = 32.0584 kg
Given
R'_дн^2 == (R'_дн - l_дн)^2 + R^2
R_дн(l_дн, R) := Find(R'_дн)
m_обл2 := K_обл*β_t*ω_N2/sqrt(P_N2/10^6*τ_N2)*d'_a2^1.75*ρ_обл = 58.2709 kg
r_кон := R_дн(l_дн11, R_1)*sin(30 deg) = 0.393391 m
2*r_кон = 0.786782 m
x := R_дн(l_дн11, R_1)*(1 - cos(30 deg)) = 0.105409 m
l'_заз := 0.1 m
Given
# Горловина
K_г := 6.44*10^-5*kg^0.5/(m^1.5*s^-0.5)
d_a2/(R_дн(l_дн11, R_1) + l'_заз) == 2*r_кон/(R_дн(l_дн11, R_1) - x)
m_г1 := K_г*β_t*ω_N1/sqrt(P_N1/10^6*τ_N1) = 44.7508 kg
m_г2 := K_г*β_t*ω_N2/sqrt(P_N2/10^6*τ_N2) = 19.2183 kg
l_заз := Find(l'_заз) = 0.209532 m
d_кон := (R_дн(l_дн11, R_1) - x)*d_a2/(R_дн(l_дн11, R_1) + l_заз) = 0.786782 m
# Привод рулевых машин и устройства управления вектором тяги
K_РМУ1 := 0.65*s*sqrt(m)
K_РМУ2 := 0.57*s*sqrt(m)
m_РМУ1 := K_РМУ1*ω_N1/(τ_N1*sqrt(D_1)) = 100.86 kg
l_y2.отн*d_a2 = 0.115044 m
m_РМУ2 := K_РМУ2*ω_N2/(τ_N2*sqrt(D_2)) = 37.9372 kg
# Длины отсеков и ступеней
l_ю1 := 0.15*D_1 = 0.215708 m
l_ю2 := 0.15*D_2 = 0.183352 m
l_хо1 := l_дн11 + l_a1 - l_y1.отн*d_a1 - 150 mm - l_ю1 = 0.718407 m
l_по1_хо2 := l_дн22 + l_a2 - l_y2.отн*d_a2 + l_дн11 + l_заз - l_ю1 - l_ю2 = 1.73259 m
l_по1 := (D_1^2 - l_ю1^2)^0.5 - l_ю1 - (R_дн(l_дн11, R_1) - l_дн11) = 0.886663 m
l_хо2 := l_по1_хо2 - l_по1 = 0.845924 m
l_по2 := (D_2^2 - l_ю2^2)^0.5 - l_ю2 - (R_дн(l_дн21, R_2) - l_дн21) = 0.753664 m
l_ст1 := l_по1 + l_ц1 = 4.16342 m
l_ст2 := l_по2 + l_ц2 = 2.27452 m
l_тр1 := 0 m
l_тр2 := l_ст2 + l_хо2 = 3.12045 m  # Поперечное-продольное разделение
# Отсеки ступеней
K_отс := 24*kg/m^2
m_отс1 := K_отс*π*D_1*l_хо1 = 77.8947 kg
m_отс2 := K_отс*π*D_1*l_по1 = 96.1381 kg
m_отс3 := K_отс*π*D_2*l_хо2 = 77.9628 kg
m_отс4 := K_отс*π*D_2*l_по2 = 69.4598 kg
# Поперечное-продольное разделение
# Головной обтекатель
K_ГО := 24*kg/m^2
ΔL_ГО := 400 mm = 0.4 m
S_ГО := π*D_2/2*(l_ББ + ΔL_ГО) = 2.89929 m^2
l_ББ + ΔL_ГО = 1.51 m
m_ГО := K_ГО*S_ГО + 10 kg = 79.5829 kg
# Бортовая кабельная сеть (БКС)
m_БКС1 := ((0.8*l_ст1 + 2 m) + (0.8*l_тр1 + 2 m)*(1 - 1))*kg/m = 5.33073 kg
m_БКС2 := ((0.8*l_ст2 + 2 m) + (0.8*l_тр2 + 2 m)*(2 - 1))*kg/m = 8.31597 kg
# Уточнение относительных характеристик
# Масса конструкций ступеней:
m_КК1 := m_ск1 + m_фл1 + m_ю1 + m_ву1 + m_зск1 + m_тзп1 = 590.135 kg
m_КК2 := m_ск2 + m_фл2 + m_ю2 + m_ву2 + m_зск2 + m_тзп2 = 241.154 kg
m_КДУ1 := m_КК1 + m_уо1 + m_тзуо1 + m_кр1 + m_обл1 + m_г1 + m_РМУ1 = 810.867 kg
m_КДУ2 := m_КК2 + m_уо2 + m_тзуо2 + m_кр2 + m_обл2 + m_г2 + m_РМУ2 = 377.814 kg
m_K1 := m_КК1 + m_уо1 + m_тзуо1 + m_кр1 + m_обл1 + m_г1 + m_РМУ1 + m_отс1 + m_отс2 + m_БКС1 = 990.231 kg
m_K2 := m_КК2 + m_уо2 + m_тзуо2 + m_кр2 + m_обл2 + m_г2 + m_РМУ2 + m_отс3 + m_отс4 + m_БКС2 + m_ГО = 613.135 kg
α_К1 := m_K1/ω_N1 = 0.0933619
α_ДУ1 := m_КДУ1/ω_N1 = 0.076451
α_К2 := m_K2/ω_N2 = 0.151498
α_ДУ2 := m_КДУ2/ω_N2 = 0.0933529
m_02 := m_ПН + m_K2 + ω_N2 = 5543.06 kg
m_01 := m_02 + m_K2 + ω_N1 = 16762.6 kg  # Соломонов 1 ч стр 64
θ_k := linterp(L'_max, θ'_k, L_max) = 31.5 deg
p_h := 0.1 MPa
μ_1 := ω_N1/m_01 = 0.632742
μ_2 := ω_N2/m_02 = 0.730131
θ'_1(θ_k) := asin(1 - μ_1*(sin(θ_k)^0.8))
θ'_1(θ_k) = 38.5767 deg
θ'_2(θ_k) := 0.25*θ'_1(θ_k) + 0.75*θ_k
θ'_2(θ_k) = 33.2692 deg
θ_k1(θ_k) := 0.5*(θ'_1(θ_k) + θ'_2(θ_k))
θ_k1(θ_k) = 35.9229 deg
J_1П2 = 2950.88 m/s
θ_k2(θ_k) := θ_k
θ_k2(θ_k) = 31.5 deg
# Площадь миделя: | Стартовая нагрузка на мидель
J_11 := J_1П1 - d_a1/m*p_h/P_N1*β_t = 2792.63 m/s
S_m1 := π*D_1^2/4 = 1.62421 m^2
P_m1 := m_01*g/S_m1 = 0.101209 MPa
K_п1 := J_1П1/J_11 - 1 = 0.00387493
K_п2 := 0
K_п3 := 0
K_a2 := 1
K_a3 := 1
K_a1(θ_k) := 1 + K_п1 - (0.3*K_п1 + (4.8*μ_1/(τ_N1/s*sin(θ_k1(θ_k))^(2/3))*12000/(P_m1/Pa)))/ln(1/(1 - μ_1))
J_12 := J_1П2
K_a1(θ_k) = 0.993715
ΔV_g1(θ_k) := τ_N1*g*sin(θ_k1(θ_k))
ΔV_g2(θ_k) := τ_N2*g*sin(θ_k2(θ_k))
V_1(θ_k) := K_a1(θ_k)*J_11*ln(1/(1 - μ_1)) - ΔV_g1(θ_k)
V_1(θ_k) = 2451.82 m/s
V_2(θ_k) := K_a2*J_12*ln(1/(1 - μ_2)) - ΔV_g2(θ_k)
V_2(θ_k) = 3583.3 m/s
V_к(θ_k) := V_1(θ_k) + V_2(θ_k)
V_к(θ_k) = 6035.12 m/s
S_μ1 := μ_1 + (1 - μ_1)*ln(1 - μ_1) = 0.264863
S_μ2 := μ_2 + (1 - μ_2)*ln(1 - μ_2) = 0.376651
Δh_1(θ_k) := (K_a1(θ_k)*J_11*τ_N1/μ_1*S_μ1 - g*τ_N1^2/2*sin(θ'_1(θ_k)))*sin(θ'_1(θ_k))
Δh_2(θ_k) := (V_1(θ_k)*τ_N2 + K_a2*J_12*τ_N2/μ_2*S_μ2 - g*τ_N2^2/2*sin(θ'_2(θ_k)))*sin(θ'_2(θ_k))
h_к(θ_k) := Δh_1(θ_k) + Δh_2(θ_k)
Δh_1(θ_k) = 35.0936 km
Δl_1(θ_k) := Δh_1(θ_k)*cot(θ'_1(θ_k))
Δh_2(θ_k) = 115.44 km
Δl_2(θ_k) := Δh_2(θ_k)*cot(θ'_2(θ_k))
h_к(θ_k) = 150.534 km
l_k(θ_k) := Δl_1(θ_k) + Δl_2(θ_k)
Δl_1(θ_k) = 43997.7 m
Δl_2(θ_k) = 175948 m
R_з := 6371 km
μ_0 := 3.968*10^5*km^3/s^2
r_к(θ_k) := R_з + h_к(θ_k)
ν_к(θ_k) := V_к(θ_k)^2*r_к(θ_k)/μ_0
L_элипт(θ_k) := 2*R_з*atan(ν_к(θ_k)*tan(θ_k)/(1 - ν_к(θ_k) + tan(θ_k)^2))
L_расч(θ_k) := L_элипт(θ_k) + 2*l_k(θ_k)
L_расч(θ_k) = 6060.87 km
ΔL := L_расч(θ_k) - L_max = 60.8703 km
ΔV_k := ΔL/dLdV(L_расч(θ_k)) = 21.5979 m/s
ΔV_1 := ΔV_k*V_1(θ_k)/V_к(θ_k) = 8.77431 m/s
ΔV_2 := ΔV_k*V_2(θ_k)/V_к(θ_k) = 12.8236 m/s
L_1расч := L_расч(θ_k) = 6060.87 km
ω_11 := ω_N1 = 10606.4 kg
m_К11 := m_K1 = 990.231 kg
J_11П1 := J_1П1 = 2803.45 m/s
ω_12 := ω_N2 = 4047.16 kg
m_К12 := m_K2 = 613.135 kg
J_11П2 := J_1П2 = 2950.88 m/s
