# Пересчет параметров ракеты
# Исходные данные
T_экспл := 20 °C
ν := 0.3
u_1min := 6 mm/s
u_1max := 15 mm/s
# Исходные данные БС
m_СУ := 100 kg
m_БС := 401 kg
m_ПН := m_БС = 401 kg
# Стандартный удельный импульс топлива
J_1Т0 := 2570 m/s
# Пустотный удельный импульс топлива на разных ступенях
J_1П := [1.095; 1.135; 1.145]*J_1Т0 = [2814.15; 2916.95; 2942.65] m/s
# Средний удельный импульс
J_1_ := (J_1П[0] + J_1П[1] + J_1П[2])/3 = 2891.25 m/s
# Масса топлива по ступеням
ω := [9.657; 4.087; 1.235] tonne
# Давление в камере сгорания ступеней
p_N := [11.5; 9.5; 7.5] MPa
# Коэффициент утопленности сопла
l_уx := [0.15; 0.1; 0.07]
# Расчет деформаций и относительного свода отверстия
α_к := 1*10^-5*1/K
α_т := 1*10^-4*1/K
μ_т := 0.495
E_т := 7.5 MPa
# Равновесная эксплуатационная температура
T_р := 50 °C
# Минимальная эксплуатационная температура
T_min := T_экспл - 15 K = 5 °C
# Разница равновесной и минимальной эксплуатационных температур
ΔT := T_min - T_р = -45 K
# Деформация от температурных напряжений
ε_T(M) := ΔT*(α_к - α_т)*(2*M^2 - μ_т*(M^2 + 1))/(1 + M^2*(1 - 2*μ_т))
# Максимальное давление в начальный период работы ДУ
p_max(p) := 1.31*p
p_max := p_max(p_N) = [15.065; 12.445; 9.825] MPa
# Деформация от давления
ε_p(M, p) := p_max(p)*(1 + μ_т)*(1 - 2*μ_т)*(M^2 - 1)/(E_т*(1 + M^2*(1 - 2*μ_т)))
# Допустимая деформация
ε_доп := 0.4
# Коэффициент безопасности
f := 1.35
# Отношение внешнего диаметра к внутреннему
M := sqrt((p_max/E_т*(1 + μ_т)*(1 - 2*μ_т) + ΔT*(α_к - α_т)*μ_т + ε_доп/f)/(p_max/E_т*(1 + μ_т)*(1 - 2*μ_т) + ΔT*(α_к - α_т)*(2 - μ_т) - ε_доп/f*(1 - 2*μ_т))) = [3.14656; 3.40068; 3.74078]
# Допустимый относительный свод горения
e_доп_ := 1/2*(1 - 1/M) = [0.341096; 0.352971; 0.366338]
# Предельные базовые скорости горения
u_1min = 6 mm/s
u_1max = 15 mm/s
# Функция скорости горения
u(p, u_1) := u_1*(p/(4 MPa))^ν
# Предельные скорости горения
u_min(p) := u(p, u_1min)
u_max(p) := u(p, u_1max)
# Предельные времена работы ступеней
i := 0 .. 2
τ_Nmin[i] := e_доп_[i]*D[i]/u_max(p_N)[i]
τ_Nmax[i] := e_доп_[i]*D[i]/u_min(p_N)[i]
τ_N =  # error: Эта переменная не определена. Проверьте правильность установки обозначения.
# Время работы ступеней укладывается в пределы
# Расширения сопел, удельный импульс
# Расходный комплекс топлива
β_т := 0.651*J_1Т0 = 1673.07 m/s
# Площадь критического сечения сопел ДУ ступеней
σ_кр[i] := ω[i]*β_т/(p_N[i]*τ_N[i])
# Диаметры критических сечений сопел ДУ ступеней
d_кр := sqrt(4*σ_кр/π)
# Диаметр входного отверстия дозвуковой части сопла
d_вх := 2*d_кр
# Относительное расширение сопла ДУ первой ступени
d_a_[0] := sqrt(0.9*p_N[0]/MPa + 5) = 3.91791
# Диаметры среза сопел ДУ ступеней
d_a := [d_a_[0]*d_кр[0]; 0.85*D[0]; 0.85*D[1]]
# Относительное расширение сопел верхних ступеней
j := 1 .. 2
d_a_[j] := d_a[j]/d_кр[j]
d_a_ =  # error
# Теоретический удельный импульс ДУ
J_1пТ := J_1Т0*(1.57/sqrt(k) - 0.66/d_a_^(2/3))
# Потери удельного импульса
ξ[i] := 0.025*(d_a_[i]^1.25 - 1)/d_a_[i]*(1 + 11.6*z/nthroot(d_кр[i]/cm, 3))
# Практический удельный импульс топлива
J_1п[i] := J_1пТ[i]*(1 - ξ[i])
# Массовый расчет
# Суммарная масса ступеней
# ДУ
# Корпус
# Коэффициенты заполнения КС
# Относительный свод горения
e_ := e_доп_ = [0.341096; 0.352971; 0.366338]
η_цx[i] := 4*e_[i]*(1 - e_[i]) = [0.898999; 0.913529; 0.928538]
η_днx := 1 - 1.5*(1 - η_цx) = [0.848498; 0.870294; 0.892807]
η_ц := 0.985*η_цx = [0.885514; 0.899827; 0.91461]
η_дн := 0.85*η_днx = [0.721223; 0.73975; 0.758886]
# Длина сверхзвуковой части сопла
l_a := d_a
# Длина утопленной части сопла
l_у[i] := l_уx[i]*l_a[i]
# Диаметр заднего полюсного отверстия
d_02[i] := 2*d_кр[i] + 2*(l_у[i] + d_кр[i])*tan(30*deg)
d_02_ := d_02/D
# Таблица коэффициентов
d_02_табл := [0.2; 0.3; 0.4]
k_ц := [1.148; 1.170; 1.204]
k_V := [0.505; 0.514; 0.533]
k_l := [0.890; 0.902; 0.922]
# Интерполяция
k_ц(d_02_) := linterp(d_02_табл, k_ц, d_02_)
k_V(d_02_) := linterp(d_02_табл, k_V, d_02_)
k_l(d_02_) := linterp(d_02_табл, k_l, d_02_)
k_ц := k_ц(d_02_)
k_V := k_V(d_02_)
k_l := k_l(d_02_)
# Радиусы ступеней
R := D/2
# Длина цилиндрической части ДУ
l_ц[i] := 4*ω[i]/(π*D[i]^2*ρ_т*η_ц[i]) - k_l[i]*R[i]*η_дн[i]/η_ц[i]
k_ск[i] := k_ц[i]/η_ц[i] + k_V[i]*π*R[i]^3/ω[i]*ρ_т
# Длина днища
d_0_ := [0.2; 0.2; 0.2]
d_0[i] := d_0_[i]*D[i]
l_дн[i] := (0.305 + 0.1*d_0_[i])*D[i]
# Удлинение цилиндрического участка
λ_ц := l_ц/D
f := 1.15
S_max.S_ср := 1.15
k_σ := 1.05
# Максимальное давление
p_max := f*p_N*(1 + ΔP.P_N)*S_max.S_ср^(1/(1 - ν))*k_σ
# Силовой корпус
# Материал корпуса - органопластик
σ_к := 1900 MPa
ρ := 1350 kg/m^3
σ_к_ := σ_к/ρ = 1407407 m^2/s^2
m_ск[i] := 3*k_ск[i]*p_max[i]*ω[i]/(σ_к_*ρ_т)
# Закладные фланцы
k_фл := 0.9
# Относительный радиус полюсных отверстий
r_0_ := (d_0_ + d_02_)/2
# Материал фланца - титановый сплав ВТ-4
σ := 1400 MPa
ρ_фл := 4540 kg/m^3
m_фл[i] := k_фл*D[i]^3*r_0_^3*sqrt(p_N)*ρ_фл/sqrt(σ)
# Юбки кокона
# Материал юбки - органопластик
σ_ю := 1900 MPa
ρ_ю := 1350 kg/m^3
σ_ю_ := σ_ю/ρ_ю = 1407407 m^2/s^2
k_ю := 1.61
m_ю[i] := k_ю*p_N[i]*D[i]^3/σ_ю_
# Крышка ВУ
k_ВУ := 0.9
# Материал крышки ВУ - титановый сплав ВТ-4
σ_ВУ := 1400 MPa
ρ_ВУ := 4540 kg/m^3
σ_ВУ_ := σ_ВУ/ρ_ВУ = 308370 m^2/s^2
m_ВУ[i] := k_ВУ*p_N[i]*D[i]^3/σ_ВУ_
# ЗКС
q_ЗКС := 2.4 kg/m^2
S_ЗКС[i] := π*D[i]^2*(λ_ц[i] + 0.615)
m_ЗКС := S_ЗКС*q_ЗКС
# ТЗП кокона
k_ТЗП := 1.17*10^-3
# Материал ТЗП - резина
ρ_ТЗП := 1000 kg/m^3
m_ТЗП[i] := k_ТЗП*ω[i]*sqrt(p_N[i]/MPa*τ_N[i]/s)*m/(ρ_т*D[i]*λ_ц[i]^0.25)*ρ_ТЗП
# Суммарная масса корпуса ДУ
m_к_ДУ := m_ск + m_фл + m_ю + m_ВУ + m_ЗКС + m_ТЗП
# Сопло
# Утопленная оболочка сопла
k_УО := 16.5*10^-9
# Материал утопленной оболочки сопла - титановый сплав ВТ-6
ρ_УО := 4500 kg/m^3
E := 122000 MPa
d_у_ := d_02/(2*d_кр)
# Коэффициент утопленности сопла
l_у_ := l_уx = [0.15; 0.1; 0.07]
m_УО[i] := k_УО*(β_т*ω[i]/τ_N[i])^1.5*d_у_[i]^2.35*l_у_[i]^0.4*d_a_[i]^0.4*1/(p_N[i]/10^6)^1.1*ρ/(E/10^6)^0.4
# Теплозащита утопленной оболочки
# Материал ТЗУО - углепластик
ρ_ТЗУО := 1400 kg/m^3
k_ТЗУО := 3.7*10^-9
m_ТЗУО[i] := k_ТЗУО*β_т*ω[i]/(sqrt(τ_N[i]/s*p_N[i]/MPa)*kg/(m^2*s))*d_у_[i]^1.75*ρ_ТЗУО
# Корпус раструба
# Материал корпуса раструба - титановый сплав ВТ-6
ρ_КР := 4500 kg/m^3
σ_КР := 1300 MPa
k_КР := 11.2*10^-9
# Относительный диаметр раструба
d_р_ := [d_a_[0]; 4.5; 4.5]
m_КР[i] := k_КР*(β_т/(m/s)*ω[i]/kg/(τ_N[i]/s))^1.5*d_р_[i]^1.75*ρ_КР/(kg/m^3)/(p_N[i]/MPa*σ_КР/MPa)*kg
# Облицовка раструба
k_обл := 3.1*10^-9
# Материал облицовки - углепластик
ρ_обл := 1400 kg/m^3
m_обл[i] := k_обл*β_т/(m/s)*ω[i]/kg/sqrt(p_N[i]/MPa*τ_N[i]/s)*d_a_[i]^1.75*ρ_обл/(kg/m^3)*kg
# Горловина
k_г := 6.44*10^-5
m_г[i] := k_г*β_т/(m/s)*ω[i]/kg/sqrt(p_N[i]/MPa*τ_N[i]/s)*kg
# Суммарная масса сопел ДУ
m_с_ДУ := m_УО + m_ТЗУО + m_КР + m_обл + m_г
# Привод рулевых машин
k_РМУ := [0.65; 0.57; 0.38]
m_РМУ[i] := k_РМУ[i]*ω[i]/kg/(sqrt(D[i]/m)*τ_N[i]/s)*kg
# Суммарная масса ДУ
m_ДУ := m_к_ДУ + m_с_ДУ + m_РМУ
# Соединительные отсеки
# Диаметр боевой ступени
D_БС := 800 mm
D_БС := D[2] = 1.19 m  # disabled
# Приборный отсек
# Плотность ПО
ρ_ПО := 300 kg/m^3
# Объем ПО
m_СУ = 100 kg
V_ПО := m_СУ/ρ_ПО = 0.333333 m^3
# Длина ПО
l_ПО := V_ПО/(π*D_БС^2/4) = 663.146 mm
# Хвостовой отсек
K_ХО := 20 kg/m^2
# Длина хвостового отсека
l_ХО := 857 mm
m_ХО := K_ХО*π*D[0]*l_ХО
# Переходные отсеки
# Разделение первой и второй ступеней - продольно-поперечное, остальных - поперечное
K_ПХО := [24; 20; 20] kg/m^2
# Длины переходных отсеков
l_ПХО := [1506; 1366; 445] mm
m_ПХО := K_ПХО*π*D*l_ПХО
# Масса отсеков
m_отс := m_ПХО + [m_ХО; 0; 0]
# Головной обтекатель
# Отделение головного обтекателя - поперечное
k_ГО := 20 kg/m^2
# Площадь головного обтекателя
# Приближенно примем форму обтекателя конической
# Длина образующей ГО
l_обр_ГО := 1370 mm
S_ГО := π*D_БС/2*l_обр_ГО = 1.72159 m^2
m_ГО := k_ГО*S_ГО + 10 kg = 44.4319 kg
# Бортовая кабельная сеть
# Длины ступеней
l_ст := [5572; 3118; 1998] mm
# Длины транзитных кабелей
l_тр := [0; 2; 2] m
m_БКС[i] := (0.8*l_ст[i]/m + 2 + 0.8*l_тр[i]/m + 2) kg = [8.4576; 8.0944; 7.1984] kg
# Масса конструкции
m_к := m_ДУ + m_отс + m_ГО + m_БКС
μ =  # error
