# Исходные данные
# Тип базирования УБР - ШПУ
# Максимальная дальность стрельбы
L_max := 9000 km
# Число ББ
n_ББ := 1
# Наличие КСП ПРО: +
# Требуемое давление во фронте ударной волны
Δp_ф := 1 MPa
# Требуемый радиус поражения площадной цели
R_ц := 2 km
# Предельное время работы ступеней
τ_Σ_max := 140 s
# Максимальная высота конца АУТ, не более
h_кmax := 150 km
# Ограничение по перегрузке
n_x_max := 20
# Температурный диапазон эксплуатации
T_экспл := 20 °C
ΔT := 30 K
# Параметры топлива
J_1Т0 := 2570 m/s
ρ_т := 1.85 gm/cm^3 = 1850 kg/m^3
u_1min := 6 mm/s
u_1max := 15 mm/s
ν := 0.3
K_Т := 0.002*1/K
Δu_1.u_1 := 0.02
Δ_сл := 0.035
k := 1.15
z := 0.35
# Дальность больше 6000 км, тогда число ступеней равно
n := 3
# Ускорение свободного падения
g := 9.81 m/s^2
# Расчет массы БК
# Мощность ББ
# Малоразмерные цели
Δp_ф := 1 MPa
σ_r := 0.15 km
P_1xтр := 0.9
K_ц := 0.97*(Δp_ф/MPa)^-0.37 = 0.97
P_1x == P_1/P_дост
P_1x == 1 - exp(-n_ББ*K_ц^2*q^(2/3)/(2*σ_r^2))
q_1p := (2/n_ББ)^(3/2)*(σ_r/(K_ц*km))^3*ln(1/(1 - P_1xтр))^(3/2) = 0.0365449  # Мт
# Площадные цели
Δp_ф := 0.03 MPa
R_ц := 2 km
M_1xтр := 0.9
K_ц := 0.78*(Δp_ф/MPa)^-0.5 = 4.50333
q_1s := (M_1xтр/n_ББ)^(3/2)*(R_ц/(K_ц*km))^3 = 0.0747914
# Принимаем мощность ББ
q_1 := max(q_1p, q_1s) = 0.0747914
# Масса и габариты ББ
q_1 := 0.1
m_ББ := 100 kg
d_ББ := (0.037*(m_ББ/kg)^0.5) m = 370 mm
l_ББ := 3*d_ББ = 1110 mm
r_нос := 0.1*d_ББ = 37 mm
# Масса СП ПРО
m_КСП := 0.25*m_ББ = 25 kg
m_ТЛЦ := 0.8*m_КСП/2 = 10 kg
m_ЛЛЦ := 0.2*m_КСП/3 = 1.66667 kg
# Масса боевой комплектности
m_БК := n_ББ*m_ББ + m_КСП = 125 kg
# Расчет массы ПН
m_пл := 10*n_ББ*kg + 0.1*m_БК = 22.5 kg
m_СУ := (95 + 5*n_ББ^0.5) kg = 100 kg
m_КБС := (45 + 0.06*n_ББ) kg = 45.06 kg
K_з := 1.15
# Расчет массы доводочного двигателя
Δv_ν := 10 m/s
J_1ДД := 2570 m/s
# Изменение скорости при компенсации промаха
dLdv := ((4.04 + 5.69)/2) km/(m/s) = 4865 s
Δv_гор := 0.04*L_max/dLdv = 73.9979 m/s
# Тяга ДД
R_ДД(m_ПН) := 2*m_ПН/kg*N
# Масса ДД
m_ДД(ω_ДД) := 9.7*(ω_ДД/kg)^(1/3)*kg + ω_ДД
# Расход топлива ДД
ω_ДД.(m_ПН) := R_ДД(m_ПН)/J_1ДД
# Масса боевой ступени
m_БС(m_ДД) := K_з*(m_БК + m_пл + m_СУ + m_КБС + m_ДД)
# Изменение массы топлива на участках движения БС
β := 45 deg
Δω(Δv, m) := Δv*m/(J_1ДД*cos(β))
# Время на разворот, стабилизацию
Δt_разв := 10 s
V :=
    V ← [0]
    ω_ДД0 ← 0 kg
    ω_ДД7 ← 10 kg
    while ω_ДД7 < 0 kg or ω_ДД7 > 1 kg
        ω_ДД ← ω_ДД0
        m_ДДcur ← m_ДД(ω_ДД)
        m ← m_БС(m_ДДcur)
        ω_. ← ω_ДД.(m)
        t ← 0 s
        V[0] ← [m, 0, ω_ДД, 0, t, 0 s]
        Δω_1 ← Δω(Δv_гор, m)
        Δt_1 ← Δω_1/ω_.
        Δm_1 ← Δω_1
        m ← m - Δm_1
        ω_ДД ← ω_ДД - Δω_1
        t ← t + Δt_1
        V[1] ← [m, Δm_1, ω_ДД, Δω_1, t, Δt_1]
        Δt_2 ← 2*Δt_разв
        Δω_2 ← Δt_2*ω_.
        Δm_2 ← Δω_2
        m ← m - Δm_2
        ω_ДД ← ω_ДД - Δω_2
        t ← t + Δt_2
        V[2] ← [m, Δm_2, ω_ДД, Δω_2, t, Δt_2]
        Δm_3 ← m_ТЛЦ + m_ЛЛЦ
        m ← m - Δm_3
        Δω_3 ← 0
        Δt_3 ← 0
        V[3] ← [m, Δm_3, ω_ДД, Δω_3, t, Δt_3]
        Δω_4 ← Δω(Δv_ν, m)
        Δt_4 ← Δω_4/ω_.
        Δm_4 ← Δω_4
        m ← m - Δm_4
        ω_ДД ← ω_ДД - Δω_4
        t ← t + Δt_4
        V[4] ← [m, Δm_4, ω_ДД, Δω_4, t, Δt_4]
        Δm_5 ← m_ТЛЦ + m_ЛЛЦ
        m ← m - Δm_5
        Δω_5 ← 0
        Δt_5 ← 0
        V[5] ← [m, Δm_5, ω_ДД, Δω_5, t, Δt_5]
        Δω_6 ← Δω(Δv_ν, m)
        Δt_6 ← Δω_6/ω_.
        Δm_6 ← Δω_6
        m ← m - Δm_6
        ω_ДД ← ω_ДД - Δω_6
        t ← t + Δt_6
        V[6] ← [m, Δm_6, ω_ДД, Δω_6, t, Δt_6]
        Δm_7 ← m_ТЛЦ
        m ← m - Δm_7
        Δω_7 ← 0
        Δt_7 ← 0
        V[7] ← [m, Δm_7, ω_ДД, Δω_7, t, Δt_7]
        ω_ДД7 ← ω_ДД
        ω_ДД0 ← ω_ДД0 - ω_ДД7
    return V
# 1 - компенсация промаха
# 2 - разворот, стабилизация
# 3 - отделение ТЛЦ1
# 4 - движение в ню направлении
# 5 - отделение ТЛЦ2
# 6 - движение в ню направлении
# 7 - отделение ББ
# Баллистическая сводка БС по этапам работы
# m | Δm | ω | Δω | t | Δt
V[0] = [400.134 kg, 0 kg, 26.4732 kg, 0 kg, 0 s, 0 s]
V[1] = [383.841 kg, 16.2932 kg, 10.1799 kg, 16.2932 kg, 52.3244 s, 52.3244 s]
V[2] = [377.613 kg, 6.22777 kg, 3.95216 kg, 6.22777 kg, 72.3244 s, 20 s]
V[3] = [365.946 kg, 11.6667 kg, 3.95216 kg, 0 kg, 72.3244 s, 0 kg]
V[4] = [363.933 kg, 2.01372 kg, 1.93844 kg, 2.01372 kg, 78.7914 s, 6.46691 s]
V[5] = [352.266 kg, 11.6667 kg, 1.93844 kg, 0 kg, 78.7914 s, 0 kg]
V[6] = [350.328 kg, 1.93844 kg, 8.88178e-16 kg, 1.93844 kg, 85.0165 s, 6.22516 s]
V[7] = [340.328 kg, 10 kg, 8.88178e-16 kg, 0 kg, 85.0165 s, 0 kg]
ω_ДД := 26.5 kg
m_ДД := m_ДД(ω_ДД) = 55.4192 kg
m_БС := m_БС(m_ДД) = 400.176 kg
# Примем:
m_БС := 401 kg
m_ПН := m_БС = 401 kg
# Предварительное определение параметров УБР
# Характеристическая скорость
K_vV_к := 800*nthroot(L_max/km, 4)*m/s = 7792.03 m/s
# Коэффициент затяжеления для n=3
Λ_0 := 1.6
# Стартовая масса ракеты, доставляющая на максимальную дальность пустую ПН
m_0x := 0.01*(L_max/km)^(2/3)*tonne = 4.32675 tonne
# Стандартный удельный импульс топлива
J_1Т0 := 2570 m/s
# Пустотный удельный импульс топлива на разных ступенях
J_1П := [1.095; 1.135; 1.145]*J_1Т0 = [2814.15; 2916.95; 2942.65] m/s
# Средний удельный импульс
J_1_ := (J_1П[0] + J_1П[1] + J_1П[2])/3 = 2891.25 m/s
# Стартовая масса
m_0 := Λ_0*m_ПН*exp(K_vV_к/J_1_) + m_0x = 13.8263 tonne
# Средний относительный запас топлива
μ_ := 1 - nthroot(exp(-K_vV_к/J_1_), n) = 0.592757
# Относительный запас топлива по ступеням
μ[0] := 0.9*μ_ = 0.533482
μ[2] := 1.2*μ[0] = 0.640178
μ[1] := 1 - exp(-K_vV_к/J_1_)/((1 - μ[0])*(1 - μ[2])) = 0.597651
μ = [0.533482; 0.597651; 0.640178]
# Диаметр первой ступени
D[0] := 0.52*nthroot(m_0/tonne, 3)*m = 1.24807 m
# Примем диаметры ступеней равными
D[1] := 0.85*D[0] = 1.06086 m
D[2] := D[1] = 1.06086 m
D = [1.24807; 1.06086; 1.06086] m
# Давление в камере сгорания ступеней
p_N := [11.5; 9.5; 7.5] MPa
# Коэффициент утопленности сопла
l_уx := [0.15; 0.1; 0.07]
# Относительная масса полезной нагрузки
m_ПН_ := m_ПН/m_0 = 0.0290026
# Относительное изменение давления
ΔT = 30 K
K_Т = 0.002 1/K
Δu_1.u_1 = 0.02
ν = 0.3
Δ_сл = 0.035
ΔP.P_N := 1/(1 - ν)*sqrt(Δu_1.u_1^2 + Δ_сл^2 + (K_Т*ΔT)^2) = 0.103263
# Время работы маршевых ступеней в связи с отклонениями давления в КС
Στ_Ni := τ_Σ_max*(1 - ΔP.P_N) = 125.543 s
τ_Σ_max = 140 s
# Должно выполняться условие:
sum(τ_Ni) ≤ Στ_Ni
# Время работы ступеней (принимаем)
τ_N := [51; 39; 35] s
# Суммарное время работы маршевых ступеней
τ_Σ := τ_N[0] + τ_N[1] + τ_N[2] = 125 s
Στ_Ni = 125.543 s
# Ограничение на время работы ступеней по максимальной перегрузке
# Должно выполняться условие
τ_Ni ≥ J_1Пi/(n_x_max*g*(1 - ΔP.P_N))*μ_i/(1 - μ_i)
i := 0 .. 2
τ_min[i] := J_1П[i]/(n_x_max*g*(1 - ΔP.P_N))*μ[i]/(1 - μ[i]) = [18.2909; 24.6269; 29.7569] s
# Средний коэффициент массового совершенства
α_ := (1 - μ_ - nthroot(m_ПН_, n))/μ_ = 0.168706
# Коэффициенты массового совершенства
α := [0.9*α_; 0; 1.03*α_] = [0.151835; 0; 0.173767]
α[1] := (1 - μ[1])/μ[1] - m_ПН_/(μ[1]*(1 - μ[0]*(1 + α[0]))*(1 - μ[2]*(1 + α[2]))) = 0.166834
α = [0.151835; 0.166834; 0.173767]
# Начальные массы ступеней
m_0v[0] := m_0 = 13.8263 tonne
m_0v[1] := m_0*(1 - μ[0]*(1 + α[0])) = 5.33029 tonne
m_0v[2] := m_0v[1]*(1 - μ[1]*(1 + α[1])) = 1.61316 tonne
m_0v = [13.8263; 5.33029; 1.61316] tonne
# Масса топлива по ступеням
ω[i] := μ[i]*m_0v[i] = [7.3761; 3.18565; 1.03271] tonne
# Конечные массы ступеней
m_к[i] := α[i]*ω[i] = [1.11995; 0.531475; 0.179451] tonne
# Расчет деформаций и относительного свода отверстия
α_к := 1*10^-5*1/K
α_т := 1*10^-4*1/K
μ_т := 0.495
E_т := 7.5 MPa
# Равновесная эксплуатационная температура
T_р := 50 °C
# Минимальная эксплуатационная температура
T_min := T_экспл - 15 K = 5 °C
# Разница равновесной и минимальной эксплуатационных температур
ΔT := T_min - T_р = -45 K
# Деформация от температурных напряжений
ε_T(M) := ΔT*(α_к - α_т)*(2*M^2 - μ_т*(M^2 + 1))/(1 + M^2*(1 - 2*μ_т))
# Максимальное давление в начальный период работы ДУ
p_max(p) := 1.31*p
p_max := p_max(p_N) = [15.065; 12.445; 9.825] MPa
# Деформация от давления
ε_p(M, p) := p_max(p)*(1 + μ_т)*(1 - 2*μ_т)*(M^2 - 1)/(E_т*(1 + M^2*(1 - 2*μ_т)))
# Допустимая деформация
ε_доп := 0.4
# Коэффициент безопасности
f := 1.35
# Отношение внешнего диаметра к внутреннему
M := sqrt((p_max/E_т*(1 + μ_т)*(1 - 2*μ_т) + ΔT*(α_к - α_т)*μ_т + ε_доп/f)/(p_max/E_т*(1 + μ_т)*(1 - 2*μ_т) + ΔT*(α_к - α_т)*(2 - μ_т) - ε_доп/f*(1 - 2*μ_т))) = [3.14656; 3.40068; 3.74078]
M == D/d
# Допустимый относительный свод горения
e_доп_ := 1/2*(1 - 1/M) = [0.341096; 0.352971; 0.366338]
# Предельные базовые скорости горения
u_1min = 6 mm/s
u_1max = 15 mm/s
# Функция скорости горения
u(p, u_1) := u_1*(p/(4 MPa))^ν
# Предельные скорости горения
u_min(p) := u(p, u_1min)
u_max(p) := u(p, u_1max)
# Предельные времена работы ступеней
τ_Nmin[i] := e_доп_[i]*D[i]/u_max(p_N)[i] = [20.6744; 19.2578; 21.456] s
τ_Nmax[i] := e_доп_[i]*D[i]/u_min(p_N)[i] = [51.6861; 48.1445; 53.6399] s
τ_N = [51; 39; 35] s
# Время работы ступеней укладывается в пределы
# Расширения сопел, удельный импульс
# Расходный комплекс топлива
β_т := 0.651*J_1Т0 = 1673.07 m/s
# Площадь критического сечения сопел ДУ ступеней
σ_кр[i] := ω[i]*β_т/(p_N[i]*τ_N[i]) = [21041.3; 14385.5; 6582.08] mm^2
# Диаметры критических сечений сопел ДУ ступеней
d_кр := sqrt(4*σ_кр/π) = [163.678; 135.337; 91.5455] mm
# Диаметр входного отверстия дозвуковой части сопла
d_вх := 2*d_кр = [327.357; 270.674; 183.091] mm
# Относительное расширение сопла ДУ первой ступени
d_a_[0] := sqrt(0.9*p_N[0]/MPa + 5) = 3.91791
# Диаметры среза сопел ДУ ступеней
d_a := [d_a_[0]*d_кр[0]; 0.85*D[0]; 0.85*D[1]] = [0.641277; 1.06086; 0.901731] m
# Относительное расширение сопел верхних ступеней
j := 1 .. 2
d_a_[j] := d_a[j]/d_кр[j] = [7.83864; 9.85009]
d_a_ = [3.91791; 7.83864; 9.85009]
y_a_ := d_a_ = [3.91791; 7.83864; 9.85009]
# Теоретический удельный импульс ДУ
J_1пТ := J_1Т0*(1.57/sqrt(k) - 0.66/d_a_^(2/3)) = [3080.06; 3332.71; 3393.43] m/s
# Потери удельного импульса
ξ[i] := 0.025*(d_a_[i]^1.25 - 1)/d_a_[i]*(1 + 11.6*z/nthroot(d_кр[i]/cm, 3)) = [0.0748307; 0.104475; 0.122782]
# Практический удельный импульс топлива
J_1п[i] := J_1пТ[i]*(1 - ξ[i]) = [2849.57; 2984.53; 2976.78] m/s
# Активный участок траектории
# Радиус Земли
R := 6371 km
# Угловая протяженность баллистического участка
β := L_max/(2*R) = 40.4695 deg
# Угол наклона траектории в конце АУТ (угол бросания)
θ_кx := (90 deg - β)/2 = 24.7653 deg
# Средний угол наклона траектории
sinθ_1_ := 1 - μ[0]*sin(θ_кx)^0.8 = 0.734044
θ__[0] := asin(sinθ_1_) = 47.2265 deg
θ__[1] := 0.25*θ__[0] + 0.75*θ_кx = 30.3806 deg
θ__[2] := θ_кx = 24.7653 deg
# Угол наклона траектории в конце работы ступеней
θ_к := [0.5*(θ__[0] + θ__[1]); θ_кx; θ_кx] = [38.8036; 24.7653; 24.7653] deg
# Коэффициент потерь для первой ступени
# Давление при старте
p_h1 := 0.1 MPa
J_1[0] := J_1п[0] - d_a_[0]^2*p_h1/p_N[0]*β_т = 2626.25 m/s
K_п1 := J_1п[0]/J_1[0] - 1 = 0.0850331
S_м1 := π*D[0]^2/4 = 1.2234 m^2
P_м1 := m_0*g/S_м1 = 110868 Pa
c_x1 := 0.29
K_a[0] := 1 + K_п1 - (0.3*K_п1 + 4.8*μ[0]/(τ_N[0]/s*sin(θ_к[0])^(2/3))*(12000 kgf/m^2)/P_м1*c_x1/0.29)/ln(1/(1 - μ[0])) = 0.956124
# Коэффициент потерь для верхних ступеней
K_a[1] := 1
K_a[2] := 1
K_a = [0.956124; 1; 1]
J_1[1] := J_1п[1] = 2984.53 m/s
J_1[2] := J_1п[2] = 2976.78 m/s
# Потери скорости на гравитацию
Δv_g[i] := g*τ_N[i]*sin(θ__[i]) = [367.25; 193.492; 143.83] m/s
Δv_gΣ := Δv_g[0] + Δv_g[1] + Δv_g[2] = 704.571 m/s
# Скорости при окончании работы маршевых ступеней
Δv[i] := K_a[i]*J_1[i]*ln(1/(1 - μ[i])) - Δv_g[i] = [1547.3; 2523.73; 2898.87] m/s
v[0] := Δv[0] = 1547.3 m/s
j := 1 .. 2
v[j] := v[j - 1] + Δv[j]
v = [1547.3; 4071.03; 6969.9] m/s
v_хар := v[2] + Δv_gΣ = 7674.47 m/s
K_vV_к = 7792.03 m/s
# Высоты окончания работы маршевых ступеней
# Вспомогательная функция
S(μ) := μ + (1 - μ)*ln(1 - μ)
Δh[i] := (K_a[i]*J_1[i]*τ_N[i]/μ[i]*S(μ[i]) - g*τ_N[i]^2/2*sin(θ__[i]))*sin(θ__[i]) = [24.4521; 20.8778; 17.5156] km
j := 1 .. 2
Δh[j] := Δh[j] + v[j - 1]*τ_N[j]*sin(θ__[j]) = [51.3966; 77.2033] km
Δh = [24.4521; 51.3966; 77.2033] km
h[0] := Δh[0] = 24.4521 km
h[j] := h[j - 1] + Δh[j]
h = [24.4521; 75.8487; 153.052] km
h_к := h[2] = 153.052 km
# Дальность окончания работы маршевых ступеней
Δl[i] := Δh[i]*cot(θ__[i]) = [22.6219; 87.6715; 167.35] km
l_к := Δl[0] + Δl[1] + Δl[1] = 197.965 km
# Скоростной напор
# Функция плотности от высоты
ρ(h) :=
    h ← h/km
    if h ≤ 13
        exp(-1.721*10^-3*h^2 - 9.163*10^-2*h + 1.985*10^-1)*kg/m^3
    else
        exp(4.787*10^-4*h^2 - 1.814*10^-1*h + 9.912*10^-1)*kg/m^3
q := ρ(h[0])*v[0]^2/2 = 5188.16 kgf/m^2
q < 6000 kgf/m^2 = 1
# Разделение первой и второй ступеней - горячее
# Массовый расчет
# Суммарная масса ступеней
# ДУ
# Корпус
# Коэффициенты заполнения КС
# Относительный свод горения
e_ := e_доп_ = [0.341096; 0.352971; 0.366338]
η_цx[i] := 4*e_[i]*(1 - e_[i]) = [0.898999; 0.913529; 0.928538]
η_днx := 1 - 1.5*(1 - η_цx) = [0.848498; 0.870294; 0.892807]
η_ц := 0.985*η_цx = [0.885514; 0.899827; 0.91461]
η_дн := 0.85*η_днx = [0.721223; 0.73975; 0.758886]
# Длина сверхзвуковой части сопла
l_a := d_a = [641.277; 1060.86; 901.731] mm
# Длина утопленной части сопла
l_у[i] := l_уx[i]*l_a[i] = [96.1915; 106.086; 63.1212] mm
# Диаметр заднего полюсного отверстия
d_02[i] := 2*d_кр[i] + 2*(l_у[i] + d_кр[i])*tan(30 deg) = [0.627429; 0.549446; 0.361685] m
d_02_ := d_02/D = [0.502719; 0.517925; 0.340935]
# Таблица коэффициентов
d_02_табл := [0.2; 0.3; 0.4]
k_ц := [1.148; 1.170; 1.204]
k_V := [0.505; 0.514; 0.533]
k_l := [0.890; 0.902; 0.922]
# Интерполяция
k_ц(d_02_) := linterp(d_02_табл, k_ц, d_02_)
k_V(d_02_) := linterp(d_02_табл, k_V, d_02_)
k_l(d_02_) := linterp(d_02_табл, k_l, d_02_)
k_ц := k_ц(d_02_) = [1.23892; 1.24409; 1.18392]
k_V := k_V(d_02_) = [0.552517; 0.555406; 0.521778]
k_l := k_l(d_02_) = [0.942544; 0.945585; 0.910187]
# Радиусы ступеней
R := D/2 = [0.624035; 0.53043; 0.53043] m
# Длина цилиндрической части ДУ
l_ц[i] := 4*ω[i]/(π*D[i]^2*ρ_т*η_ц[i]) - k_l[i]*R[i]*η_дн[i]/η_ц[i] = [3201.32; 1752.68; 289.913] mm
k_ск[i] := k_ц[i]/η_ц[i] + k_V[i]*π*R[i]^3/ω[i]*ρ_т = [1.5049; 1.53382; 1.73269]
# Длина днища
d_0_ := [0.2; 0.2; 0.2]
d_0[i] := d_0_[i]*D[i] = [0.249614; 0.212172; 0.212172] m
l_дн[i] := (0.305 + 0.1*d_0_[i])*D[i] = [405.623; 344.779; 344.779] mm
# Удлинение цилиндрического участка
λ_ц := l_ц/D = [2.56501; 1.65213; 0.273281]
f := 1.15
S_max.S_ср := 1.15
k_σ := 1.05
# Максимальное давление
p_max := f*p_N*(1 + ΔP.P_N)*S_max.S_ср^(1/(1 - ν))*k_σ = [18705756; 15452581; 12199406] Pa
# Силовой корпус
# Материал корпуса - органопластик
σ_к := 1900 MPa
ρ := 1350 kg/m^3
σ_к_ := σ_к/ρ = 1407407 m^2/s^2
m_ск[i] := 3*k_ск[i]*p_max[i]*ω[i]/(σ_к_*ρ_т) = [239.243; 86.9966; 25.1518] kg
# Закладные фланцы
k_фл := 0.9
# Относительный радиус полюсных отверстий
r_0_ := (d_0_ + d_02_)/2 = [0.35136; 0.358962; 0.270468]
# Материал фланца - титановый сплав ВТ-4
σ := 1400 MPa
ρ_фл := 4540 kg/m^3
m_фл[i] := k_фл*D[i]^3*r_0_^3*sqrt(p_N)*ρ_фл/sqrt(σ) = [72.9987; 44.8303; 44.8303] kg
# Юбки кокона
# Материал юбки - органопластик
σ_ю := 1900 MPa
ρ_ю := 1350 kg/m^3
σ_ю_ := σ_ю/ρ_ю = 1407407 m^2/s^2
k_ю := 1.61
m_ю[i] := k_ю*p_N[i]*D[i]^3/σ_ю_ = [25.5753; 12.9749; 10.2433] kg
# Крышка ВУ
k_ВУ := 0.9
# Материал крышки ВУ - титановый сплав ВТ-4
σ_ВУ := 1400 MPa
ρ_ВУ := 4540 kg/m^3
σ_ВУ_ := σ_ВУ/ρ_ВУ = 308370 m^2/s^2
m_ВУ[i] := k_ВУ*p_N[i]*D[i]^3/σ_ВУ_ = [65.2507; 33.103; 26.134] kg
# ЗКС
q_ЗКС := 2.4 kg/m^2
S_ЗКС[i] := π*D[i]^2*(λ_ц[i] + 0.615) = [15.5617; 8.01572; 3.14063] m^2
m_ЗКС := S_ЗКС*q_ЗКС = [37.3481; 19.2377; 7.53751] kg
# ТЗП кокона
k_ТЗП := 1.17*10^-3
# Материал ТЗП - резина
ρ_ТЗП := 1000 kg/m^3
m_ТЗП[i] := k_ТЗП*ω[i]*sqrt(p_N[i]/MPa*τ_N[i]/s)*m/(ρ_т*D[i]*λ_ц[i]^0.25)*ρ_ТЗП = [71.5259; 32.2431; 13.7958] kg
# Суммарная масса корпуса ДУ
m_к_ДУ := m_ск + m_фл + m_ю + m_ВУ + m_ЗКС + m_ТЗП = [511.941; 229.386; 127.693] kg
# Сопло
# Утопленная оболочка сопла
k_УО := 16.5*10^-9
# Материал утопленной оболочки сопла - титановый сплав ВТ-6
ρ_УО := 4500 kg/m^3
E := 122000 MPa
d_у_ := d_02/(2*d_кр) = [1.91665; 2.02991; 1.97544]
# Коэффициент утопленности сопла
l_у_ := l_уx = [0.15; 0.1; 0.07]
m_УО[i] := k_УО*(β_т*ω[i]/τ_N[i])^1.5*d_у_[i]^2.35*l_у_[i]^0.4*d_a_[i]^0.4*1/(p_N[i]/10^6)^1.1*ρ/(E/10^6)^0.4 = [6.22008; 4.18329; 1.0497] kg
# Теплозащита утопленной оболочки
# Материал ТЗУО - углепластик
ρ_ТЗУО := 1400 kg/m^3
k_ТЗУО := 3.7*10^-9
m_ТЗУО[i] := k_ТЗУО*β_т*ω[i]/(sqrt(τ_N[i]/s*p_N[i]/MPa)*kg/(m^2*s))*d_у_[i]^1.75*ρ_ТЗУО = [8.24113; 4.95147; 1.81831] kg
# Корпус раструба
# Материал корпуса раструба - титановый сплав ВТ-6
ρ_КР := 4500 kg/m^3
σ_КР := 1300 MPa
k_КР := 11.2*10^-9
# Относительный диаметр раструба
d_р_ := [d_a_[0]; 4.5; 4.5] = [3.91791; 4.5; 4.5]
m_КР[i] := k_КР*(β_т/(m/s)*ω[i]/kg/(τ_N[i]/s))^1.5*d_р_[i]^1.75*ρ_КР/(kg/m^3)/(p_N[i]/MPa*σ_КР/MPa)*kg = [4.37814; 2.86653; 0.788288] kg
# Облицовка раструба
k_обл := 3.1*10^-9
# Материал облицовки - углепластик
ρ_обл := 1400 kg/m^3
m_обл[i] := k_обл*β_т/(m/s)*ω[i]/kg/sqrt(p_N[i]/MPa*τ_N[i]/s)*d_a_[i]^1.75*ρ_обл/(kg/m^3)*kg = [24.1291; 44.1295; 25.3477] kg
# Горловина
k_г := 6.44*10^-5
m_г[i] := k_г*β_т/(m/s)*ω[i]/kg/sqrt(p_N[i]/MPa*τ_N[i]/s)*kg = [32.8165; 17.8322; 6.86774] kg
# Суммарная масса сопел ДУ
m_с_ДУ := m_УО + m_ТЗУО + m_КР + m_обл + m_г = [75.785; 73.963; 35.8717] kg
# Привод рулевых машин
k_РМУ := [0.65; 0.57; 0.38]
m_РМУ[i] := k_РМУ[i]*ω[i]/kg/(sqrt(D[i]/m)*τ_N[i]/s)*kg = [84.1492; 45.2043; 10.8859] kg
# Суммарная масса ДУ
m_ДУ := m_к_ДУ + m_с_ДУ + m_РМУ = [671.876; 348.553; 174.45] kg
# Соединительные отсеки
# Диаметр боевой ступени
D_БС := 800 mm
D_БС := D[2] = 1.06086 m
# Приборный отсек
# Плотность ПО
ρ_ПО := 300 kg/m^3
# Объем ПО
V_ПО := m_СУ/ρ_ПО = 0.333333 m^3
m_СУ = 100 kg
# Длина ПО
l_ПО := V_ПО/(π*D_БС^2/4) = 377.114 mm
# Хвостовой отсек
K_ХО := 20 kg/m^2
# Длина хвостового отсека
l_ХО := 857 mm
m_ХО := K_ХО*π*D[0]*l_ХО = 67.2047 kg
# Переходные отсеки
# Разделение первой и второй ступеней - продольно-поперечное, остальных - поперечное
K_ПХО := [20; 24; 20] kg/m^2
# Длины переходных отсеков
l_ПХО := [1506; 1366; 445] mm
m_ПХО := K_ПХО*π*D*l_ПХО = [338.942; 307.434; 100.152] kg
# Масса отсеков
m_отс := m_ПХО + [m_ХО; 0; 0] = [406.147; 307.434; 100.152] kg
# Головной обтекатель
# Отделение головного обтекателя - поперечное
k_ГО := 20 kg/m^2
# Площадь головного обтекателя
# Приближенно примем форму обтекателя конической
# Длина образующей ГО
l_обр_ГО := 1370 mm
S_ГО := π*D_БС/2*l_обр_ГО = 2.28296 m^2
m_ГО := k_ГО*S_ГО + 10 kg = 55.6592 kg
# Бортовая кабельная сеть
# Длины ступеней
l_ст := [5572; 3118; 1698] mm
# Длины транзитных кабелей
l_тр := [0; 2; 2] m
m_БКС[i] := (0.8*l_ст[i]/m + 2 + 0.8*l_тр[i]/m + 2) kg = [8.4576; 8.0944; 6.9584] kg
# Масса конструкции
m_к := m_ДУ + m_отс + m_ГО + m_БКС = [1142.14; 719.74; 337.22] kg
# Стартовая масса ступеней
m_0[2] := m_ПН + m_к[2] + ω[2] = 1.77093 tonne
m_0[1] := m_0[2] + m_к[1] + ω[1] = 5.67632 tonne
m_0[0] := m_0[1] + m_к[0] + ω[0] = 14.1946 tonne
# Относительный запас топлива
μ := ω/m_0 = [0.519643; 0.561217; 0.583146]
# Коэффициент массового совершенства
α := m_к/ω = [0.154843; 0.225932; 0.326539]
# Коэффициент массового совершенства ДУ
α_ДУ := m_ДУ/ω = [0.0910882; 0.109413; 0.168925]
# Определение параметров АУТ и определение максимальной дальности
# Радиус Земли
R_З := 6371 km
# Угловая протяженность баллистического участка
β := L_max/(2*R_З) = 40.4695 deg
# Угол наклона траектории в конце АУТ (угол бросания)
θ_кx := (90 deg - β)/2 = 24.7653 deg
# Средний угол наклона траектории
sinθ_1_ := 1 - μ[0]*sin(θ_кx)^0.8 = 0.740944
θ__[0] := asin(sinθ_1_) = 47.8119 deg
θ__[1] := 0.25*θ__[0] + 0.75*θ_кx = 30.5269 deg
θ__[2] := θ_кx = 24.7653 deg
# Угол наклона траектории в конце работы ступеней
θ_к := [0.5*(θ__[0] + θ__[1]); θ_кx; θ_кx] = [39.1694; 24.7653; 24.7653] deg
# Коэффициент потерь для первой ступени
# Давление при старте
p_h1 := 0.1 MPa
J_1[0] := J_1п[0] - d_a_[0]^2*p_h1/p_N[0]*β_т = 2626.25 m/s
K_п1 := J_1п[0]/J_1[0] - 1 = 0.0850331
S_м1 := π*D[0]^2/4 = 1.2234 m^2
P_м1 := m_0[0]*g/S_м1 = 113821 Pa
c_x1 := 0.29
K_a[0] := 1 + K_п1 - (0.3*K_п1 + 4.8*μ[0]/(τ_N[0]/s*sin(θ_к[0])^(2/3))*(12000 kgf/m^2)/P_м1*c_x1/0.29)/ln(1/(1 - μ[0])) = 0.956561
# Коэффициент потерь для верхних ступеней
K_a[1] := 1
K_a[2] := 1
K_a = [0.956561; 1; 1]
J_1[1] := J_1п[1] = 2984.53 m/s
J_1[2] := J_1п[2] = 2976.78 m/s
# Потери скорости на гравитацию
Δv_g[i] := g*τ_N[i]*sin(θ__[i]) = [370.701; 194.334; 143.83] m/s
Δv_gΣ := Δv_g[0] + Δv_g[1] + Δv_g[2] = 708.865 m/s
# Скорости при окончании работы маршевых ступеней
Δv[i] := K_a[i]*J_1[i]*ln(1/(1 - μ[i])) - Δv_g[i] = [1471.29; 2264.18; 2460.9] m/s
v[0] := Δv[0] = 1471.29 m/s
j := 1 .. 2
v[j] := v[j - 1] + Δv[j]
v = [1471.29; 3735.46; 6196.37] m/s
v_хар := v[2] + Δv_gΣ = 6905.23 m/s
K_vV_к = 7792.03 m/s
# Высоты окончания работы маршевых ступеней
# Вспомогательная функция
S(μ) := μ + (1 - μ)*ln(1 - μ)
Δh[i] := (K_a[i]*J_1[i]*τ_N[i]/μ[i]*S(μ[i]) - g*τ_N[i]^2/2*sin(θ__[i]))*sin(θ__[i]) = [23.5832; 19.1204; 15.2905] km
j := 1 .. 2
Δh[j] := Δh[j] + v[j - 1]*τ_N[j]*sin(θ__[j]) = [48.2662; 70.0582] km
Δh = [23.5832; 48.2662; 70.0582] km
h[0] := Δh[0] = 23.5832 km
h[j] := h[j - 1] + Δh[j]
h = [23.5832; 71.8494; 141.908] km
h_к := h[2] = 141.908 km
# Дальность окончания работы маршевых ступеней
Δl[i] := Δh[i]*cot(θ__[i]) = [21.375; 81.8519; 151.862] km
l_к := Δl[0] + Δl[1] + Δl[1] = 185.079 km
# Скоростной напор
# Функция плотности от высоты
ρ(h) :=
    h ← h/km
    if h ≤ 13
        exp(-1.721*10^-3*h^2 - 9.163*10^-2*h + 1.985*10^-1)*kg/m^3
    else
        exp(4.787*10^-4*h^2 - 1.814*10^-1*h + 9.912*10^-1)*kg/m^3
q := ρ(h[0])*v[0]^2/2 = 5383.13 kgf/m^2
q < 6000 kgf/m^2 = 1
# Разделение первой и второй ступеней - горячее
# Максимальная дальность полета ракеты
μ_0 := 3.988*10^5 km^3/s^2
r_к := R_З + h_к = 6512.91 km
# Конечная скорость ракеты
v_к := v[2] = 6196.37 m/s
# Относительная скорость ракеты в конце АУТ
ν_к := v_к^2*r_к/μ_0 = 0.627038
# Угол наклона траектории в конце АУТ
θ_к := θ_к[2] = 24.7653 deg
# Дальность баллистического участка
L_бал := 2*R_З*atan(ν_к*tan(θ_к)/(1 - ν_к + tan(θ_к)^2)) = 5844.61 km
# Полная дальность полета
L_расч := L_бал + 2*l_к = 6214.76 km
# Разность дальностей
ΔL := L_расч - L_max = -2785.24 km
# Перерасчет параметров
# Разница скорости в конце АУТ
dL.dv_к := 3.8 km/(m/s)
Δv_к := ΔL/dL.dv_к = -732.957 m/s
# Распределение разницы скорости по ступеням
Δv' := Δv_к*Δv/v_к = [-174.036; -267.825; -291.096] m/s
# Корректировка массы топлива
Δω[2] := -Δv'[2]*m_0[2]/J_1[2]/(1 - (μ[2]/(1 - μ[2]))*0.7*α_ДУ[2] - ln(1/(1 - μ[2]))/μ[2]*(J_1Т0/J_1[2])*(0.22/d_a_[2]^(2/3))) = 224.161 kg
Δω[1] := (-Δv'[1]*m_0[1]/J_1[1] + (μ[1]/(1 - μ[1]))*(1 + 0.7*α_ДУ[2])*Δω[2])/(1 - (μ[1]/(1 - μ[1]))*0.7*α_ДУ[1] - ln(1/(1 - μ[1]))/μ[1]*(J_1Т0/J_1[1])*(0.22/d_a_[1]^(2/3))) = 998.1 kg
Δω[0] := (-Δv'[0]*m_0[0]/J_1[0] + (μ[0]/(1 - μ[0]))*(1 + 0.7*α_ДУ[1])*Δω[1] + (1 + 0.7*α_ДУ[2])*Δω[2])/(1 - (μ[0]/(1 - μ[0]))*0.7*α_ДУ[0]) = 2528.11 kg
Δω = [2528.11; 998.1; 224.161] kg
ω' := ω + Δω = [9.90421; 4.18375; 1.25687] tonne
# Корректировка суммарной массы
ΔQ := vectorize((1 + 0.7*α_ДУ)*Δω) = [2689.31; 1074.54; 250.668] kg
# Корректировка относительного расширения сопла
Δy_a_ := -0.5*vectorize(y_a_*(Δω/ω)) = [-0.671419; -1.22797; -1.06903]
y'_a_ := y_a_ + Δy_a_ = [3.24649; 6.61068; 8.78105]
# Корректировка практического удельного импульса
ΔJ_1п := -0.22*(J_1Т0/y_a_)*(Δω/ω) = -84.5204 m/s
# Корректировка массы конструкции
Δm_к := vectorize(α_ДУ*Δω) = [230.281; 109.206; 37.8663] kg
m'_к := m_к + Δm_к = [1372.42; 828.946; 375.087] kg
# Корректировка диаметра критического сечения
d'_кр := vectorize(d_кр*sqrt(ω'/ω)) = [189.665; 155.096; 100.993] mm
# Корректировка удельного импульса
J'_1ПТ := J_1Т0*(1.57/sqrt(k) - 0.66/y'_a_^(2/3)) = [2988.93; 3281.01; 3364.05] m/s
Σζ' := vectorize(0.025*(y_a_^1.25 - 1)*(1 + 11.6*z/(d'_кр/mm)^(1/3)))/y'_a_ = [0.0592989; 0.0804439; 0.0876656]
J'_1 := vectorize(J'_1ПТ*(1 - Σζ')) = [2811.69; 3017.07; 3069.14] m/s
# Корректировка стартовой массы
m'_0 := m_0 + Δm_к + Δω = [16.9529; 6.78363; 2.03296] tonne
# Корректировка относительного запаса топлива
μ' := ω'/m'_0 = [0.584217; 0.616742; 0.618248]
μ = [0.519643; 0.561217; 0.583146]
# После перерасчета по формулам, представленным выше, используя полученные значения масс, получим новые параметры ракеты
# Стартовая масса ступени
m_0 := [18.23; 7.002; 2.021]*tonne
# Масса конструкции
m_к := [1323.261; 797.65; 362.817] kg
# Масса топлива
ω := [9.904; 4.184; 1.257] tonne
# Практический удельный импульс
J_1 := [2.632*10^3; 2.966*10^3; 2.973*10^3] m/s
# Для новой ракеты рассчитаем максимальную дальность полета
L_расч := 9.135*10^3 km
# Разность между требуемой и рассчитанной дальностью
ΔL := 135.212 km
# Данное значение попадает в промежуток [L, L+200км], поэтому принимаем полученные параметры ракеты
