# Вариант 13
# Исходные данные
L := 3900 km
M_ПГ := 2.2 tonne
# Топливо: АТ + НДМГ
# Радиус Земли
R_З := 6371 km
# Гравитационный параметр Земли
μ := 3.986*10^14 m^3/s^2
# Ускорение свободного падения на старте
g_0 := 9.81 m/s^2
# Баллистический расчет
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# Находим коэффициент дальности по графику
K_Д == a*L^2 + b*L + c
dK_Д/dL == 2*a*L + b
K_Д(400*km) == 1.3
K_Д(4000*km) == 1.1
dK_Д/dL*(4000*km) == 0
A := [400^2, 400, 1; 4000^2, 4000, 1; 2*4000, 1, 0]
b := [1.3; 1.1; 0]
a := lsolve(A, b) = [1.54321e-8; -0.000123457; 1.34691]
a[0] := a[0] km^-2
a[1] := a[1] km^-1
K_Д(L) := a[0]*L^2 + a[1]*L + a[2]
x := 0 km, 100 km .. 4000 km
# [chart]
    X[1] := x/km
    Y[1] := K_Д(x)
# pic2
K_Д := K_Д(L) = 1.10015
# Длина баллистического участка
L_балл := L/K_Д = 3544.96 km
# Угол, на котором разворачивается баллистический участок
β := L_балл/(2*R_З) = 15.9403 deg
# Угол бросания
φ_A(β) := π/4 - β/2
x := 0 deg, 1 deg .. 90 deg
φ_A(90 deg) = 0
# [chart]
    X[1] := x/deg
    Y[1] := φ_A(x)/deg
# pic3
φ_A := φ_A(β) = 37.0299 deg
# Безразмерная скорость
solve block
    # guess values
    ν_A := 1
    # constraints
    tan(β) == ν_A*tan(φ_A)/(1 - ν_A + tan(φ_A)^2)
    # solver
    ν_A := find(ν_A) = 0.430924
end solve block
ν_A = 0.430924
# Высота конца АУТ
h_акт(L) := 50 km + 100 km/(4500 km)*(L - 500 km)
x := 0 km, 100 km .. 4000 km
# [chart]
    X[1] := x/km
    Y[1] := h_акт(x)/km
# pic4
h_A := h_акт(L) = 125.556 km
# Геоцентрический радиус
r_A := R_З + h_A = 6496.56 km
# Круговая скорость
v_круг := sqrt(μ/r_A) = 7832.98 m/s
# Скорость в конце АУТ
v_A := sqrt(ν_A)*v_круг = 5141.94 m/s
# Второе приближение для баллистического расчета
# Оптимальный угол бросания
tgφ_A_opt := sqrt(ν_A/2*(2*R_З - (r_A + R_З)*ν_A)/(R_З*ν_A + 2*(r_A - R_З))) = 0.719373
φ_A_opt := atan(tgφ_A_opt) = 35.7302 deg
# Уточнение параметров
# Безразмерная скорость
solve block
    # guess values
    ν_A := 1
    # constraints
    tan(β) == ν_A*tgφ_A_opt/(1 - ν_A + tgφ_A_opt^2)
    # solver
    ν_A := find(ν_A) = 0.431272
end solve block
ν_A = 0.431272
# Скорость в конце АУТ
v_A := sqrt(ν_A)*v_круг = 5144.02 m/s
# Потери характеристической скорости
ΣΔv_i := 0.25*v_A = 1286 m/s
# Характеристическая скорость
v_хар := v_A + ΣΔv_i = 6430.02 m/s
# Пустотный удельный импульс для данного топлива
J_п := 3200 m/s
# Относительная конечная масса ракеты
μ_к := exp(-v_хар/J_п) = 0.134071
M_к/M_0 == μ_к
# Массовый расчет
# Весовые коэффициенты
a_ТО(M_Т) := 0.033*(1 + 0.5*exp(-0.014*M_Т/tonne))
γ_ДУ(P_п) := 0.012*(1 + 1.0*exp(-0.0009*P_п/kN))
μ_пр(M_0) := 0.013*(1 + 0.59*exp(-0.0048*M_0/tonne)) + 0.25 tonne/M_0
# Время работы двигательной установки
# Коэффициент тяги в пустоте для данной топливной пары
k_п := 1.15
# Стартовая нагрузка на тягу
ν_0 := 0.6
t_к := J_п*ν_0*(1 - μ_к)/(k_п*g_0) = 147.373 s
# Зависимость массы топлива от стартовой массы
M_Т(M_0) := M_0*(1 - μ_к)
# Секундный массовый расход (в первом приближении)
m(M_0) := M_Т(M_0)/t_к
# Пустотная тяга
P_п(M_0) := m(M_0)*J_п
# Переопределение функций весовых коэффициентов
a_ТО(M_0) := a_ТО(M_Т(M_0))
γ_ДУ(M_0) := γ_ДУ(P_п(M_0))
solve block
    # guess values
    M_0 := 10 tonne
    # constraints
    M_0 == M_ПГ/(μ_к*(1 + a_ТО(M_0)) - a_ТО(M_0) - γ_ДУ(M_0)/ν_0 - μ_пр(M_0))
    # solver
    M_0 := find(M_0) = 49.1419 tonne
end solve block
a_ТО := a_ТО(M_0) = 0.042094
γ_ДУ := γ_ДУ(M_0) = 0.0172243
μ_пр := μ_пр(M_0) = 0.0241456
m := m(M_0) = 288.747 kg/s
# Масса топлива
M_Т := M_0*(1 - μ_к) = 42.5534 tonne
# Масса горючего
k_M := 2.8
M_Г := M_Т/(1 + k_M) = 11.1983 tonne
# Масса окислителя
M_ОК := k_M*M_Г = 31.3552 tonne
# Масса топливного отсека
M_ТО := a_ТО*M_Т = 1.79124 tonne
# Масса двигательной установки
M_ДУ := γ_ДУ*M_0/ν_0 = 1.41072 tonne
# Прочая масса
M_пр := μ_пр*M_0 = 1.18656 tonne
# Проверка
M_ПГ + M_ТО + M_ОК + M_Г + M_ДУ + M_пр = 49.1419 tonne
M_0 = 49.1419 tonne
# Объемно-габаритный расчет
# Диаметр ракеты
d := 2 m
λ == 8, □ .. 10
# Длина межбакового отсека
L_меж := 0.1*d = 0.2 m
# Расчет тоннельной трубы
# Расход окислителя в тоннельной трубе
m_ОК := k_M/(k_M + 1)*m = 212.761 kg/s
# Диаметр тоннельной трубы
# Скорость движения окислителя в тоннельной трубе
v_тр := 3 m/s
# Плотность окислителя
ρ_ОК := 1440 kg/m^3
d_тр := sqrt(m_ОК/(π/4*v_тр*ρ_ОК)) = 0.250414 m
# Диаметр магистральной трубы
d_тон := d_тр + 0.06 m = 0.310414 m
# Расчет баков
# Объем окислителя
V_ОК := M_ОК/ρ_ОК = 21.7744 m^3
# Объем горючего
# Плотность горючего
ρ_Г := 790 kg/m^3
V_Г := M_Г/ρ_Г = 14.175 m^3
# Объем бака окислителя
V_БО := 1.1*V_ОК = 23.9519 m^3
# Объем бака горючего
V_БГ := 1.1*V_Г = 15.5925 m^3
# Вылет днища баков
h := 0.25*d = 0.5 m
# Радиус днища
R_дн := 1.25*d/2 = 1.25 m
# Объем сегмента днища
V_дн := 1/3*π*h^2*(3*R_дн - h) = 0.850848 m^3
# Объем цилиндрической части бака окислителя
V_ЦО := V_БО - 2*V_дн = 22.2502 m^3
# Длина цилиндрической части бака окислителя
L_ЦО := V_ЦО/(π*d^2/4) = 7.08244 m
# Объем цилиндрической части бака горючего
V_ЦГ := V_БГ - 2*(V_дн - π*d_тон^2/4*h) = 13.9665 m^3
# Длина цилиндрической части бака горючего
L_ЦГ := V_ЦГ/(π/4*(d^2 - d_тон^2)) = 4.55541 m
# Расчет приборного отсека
# Масса приборного отсека
M_ПО := M_пр/2 = 593.282 kg
# Объем приборного отсека
# Плотность приборного отсека
ρ_ПО := 325 kg/m^3
V_ПО := M_ПО/ρ_ПО = 1.82548 m^3
# Длина приборного отсека
L_ПО := V_ПО/(π*d^2/4) = 0.581069 m
# Расчет головной части
# Угол раскрыва головной части
α := 40 deg
# Длина головной части
L_ГЧ := d/(2*tan(α/2)) = 2.74748 m
# Объем головной части
V_ГЧ := 1/3*L_ГЧ*π/4*d^2 = 2.87715 m^3
# Плотность головной части
ρ_ГЧ := M_ПГ/V_ГЧ = 764.645 kg/m^3
# Расчет хвостового отсека
# Расходный комплекс для топливной пары АТ + НДМГ
β_Т := 170 s
β_Т := β_Т*g_0 = 1667.7 m/s
# Давление в камере сгорания для двигателя с открытой схемы
p_к := 10 MPa
# Давление на срезе сопла
p_a := 0.7 atm = 0.0709275 MPa
# Показатель процесса расширения для топливной пары АТ + НДМГ
n := 1.2
# Площадь критического сечения
# Пустотная тяга
P_п := P_п(M_0) = 923.991 kN
S_кр := β_Т*P_п/(p_к*J_п) = 0.0481544 m^2
# Диаметр критического сечения
d_кр := sqrt(4*S_кр/π) = 0.247613 m
# Радиус критического сечения
r_кр := d_кр/2 = 0.123806 m
# Площадь выходного сечения сопла
S_a := S_кр*((n - 1)/2*(2/(n + 1))^((n + 1)/(n - 1))/((p_a/p_к)^(2/n) - (p_a/p_к)^((n + 1)/n)))^(1/2) = 0.743402 m^2
# Диаметр выходного сечения
d_a := sqrt(4*S_a/π) = 0.972897 m
d_a/d_кр = 3.92911
# Радиус выходного сечения
r_a := d_a/2 = 0.486449 m
# Расчет закритической части сопла
# Первое приближение - конической профиль
# Угол раскрытия сопла
β := 20 deg
2*β = 40 deg
# Длина конуса
l_к := (r_a - r_кр)/tan(β) = 0.996351 m
# Второе приближение - параболическое сопло
# Длина закритической части
l_закр := 0.8*l_к = 0.797081 m
# Расчет докритической части сопла
# Диаметр камеры сгорания
d_кам := 2*d_кр = 0.495226 m
# Радиус камеры сгорания
r_кам := d_кам/2 = 0.247613 m
# Длина камеры сгорания
l_кам := 3*d_кр = 0.742838 m
# Угол сужения докритической части
β_докр := 90 deg/2 = 45 deg
# Длина докритической части сопла
l_докр := (r_кам - r_кр)/tan(β_докр) = 0.123806 m
# Длина сопла
l_С := l_докр + l_закр = 0.920887 m
# Длина двигательной установки
l_ДУ := 2*l_С = 1.84177 m
# Длина хвостового отсека
L_ХО := l_ДУ = 1.84177 m
# Длина всей ракеты
L := L_ГЧ + L_ПО + L_ЦО + L_меж + L_ЦГ + 4*h + L_ХО = 19.0082 m
# Удлинение ракеты
λ := L/d = 9.50409
