# Дано
N := 4
L := 1850 + 150*N = 2450  # Дальность полета
M_PG := 1  # Масса полезной нагрузки
R_Z := 6371
M_Z := 5.97*10^24
γ := 6.67*10^-11
J_UDP := 4300  # Удельный импульс
d := 1.6  # Диаметр ракеты
ρ_G := 79  # Плотность горючего
ρ_OK := 1140  # Плотность окислителя
ρ_PO := 650/2 = 325  # Плотность приборного отсека
v := 3  # Скорость истечения компонента по трубе
ρ_GCH := 750  # Плотность головной части
β_GCH := 40 deg  # Угол наклона головной части
β_T := 220*9.77 = 2149.4  # Расходный комплекс для О2+Н2
p_K := 10*10^6  # Давление в камере сгорания с открытой схемой Па
n := 1.12  # Показатель процесса расширения
p_a := 0.7*98066.5 = 68646.6  # Давление на срезе сопла атм
# Решение
# Зависимость коэффициента дальности от дальности участка
Given
1.3 == a*400^2 + b*400 + c
1.1 == a*4000^2 + b*4000 + c
1.3 == a*(4000 + 3600)^2 + b*(4000 + 3600) + c
[a; b; c] := Find(a, b, c) → [1.54320987654e-8; -0.000123456790123; 1.34691358025]
K_D(x) := a*x^2 + b*x + c
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# Для расчета баллистического участка:
K_D := K_D(L) = 1.13708
L_ball := L/K_D = 2154.65
# Угол бетта:
β_0 := L_ball/(2*R_Z) = 0.169098
# Зависимость угла бросания от угла бетта
Given
π/4 == a_1*0 + b_1
0 == a_1*π/2 + b_1
[a_1; b_1] := Find(a_1, b_1) → [-1/2; π/4]
φ_A(β) := a_1*β + b_1
# Угол бросания:
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φ_A := φ_A(β_0) = 0.700849
# Завсимость скорости от угла бетта- геоцентрический угол
Given
tan(β_0) == ν_A*tan(φ_A)/(1 - ν_A + tan(φ_A)^2)
ν_A := Find(ν_A) → 0.288101462296
# Зависимость высоты конца активного участка траектории от дальности
Given
150 == a_2*4000 + b_2
60 == a_2*1000 + b_2
[a_2; b_2] := Find(a_2, b_2) → [3/100; 30]
h_A(x) := a_2*x + b_2
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# Конец АУТ:
h_A := h_A(L) = 103.5
# Геоцентрический радиус конца АУТ:
r_A := (R_Z + h_A)*1 = 6474.5
# Гравитационный параметр земли:
μ := γ*M_Z = 3.98199e14
# Круговая скорость :
V_krug := sqrt(μ/(1000*r_A)) = 7842.36
# Скорость в конце АУТ
V_A := sqrt(ν_A*V_krug^2) = 4209.4
# Для второго приближения
Given
tan(φ_aOPT) == sqrt(ν_A/2*(2*R_Z - (r_A + R_Z)*ν_A)/(R_Z*ν_A + 2*(r_A - R_Z)))
φ_AOPT := Find(φ_aOPT) → 0.673842744916  # Угол бросания
# Определение безразмерной скорости
Given
tan(β_0) == ν_A*tan(φ_AOPT)/(1 - ν_A + tan(φ_AOPT)^2)
ν_A := Find(ν_A) → 0.288461534969
# Определение скорости в конце АУТ
V_A := sqrt(ν_A*V_krug^2) = 4212.02
# Определение характеристической скорости
V_x := 1.25*V_A = 5265.03
# Относительная конечная масса
μ_K := exp(-V_x/J_UDP) = 0.293926
# МАССОВЫЙ РАСЧЕТ
g_0 := 9.77
k_M := 5.9
ν_0 := 0.6
k_p := 1.12
# Время полета
t_k := J_UDP*ν_0/(k_p*g_0)*(1 - μ_K) = 166.478
t_V := 0.037*J_UDP*ν_0/(k_p*g_0) = 8.72386
t_k := t_k + t_V = 175.202
# Массовый рсход
M_T(M_0) := M_0*(1 - μ_K)
m(M_0) := M_T(M_0)/t_k
# Тяга двигателя в пустоте
P_P(M_0) := m(M_0)*J_UDP
# Стартовая тяга:
P_0(M_0) := M_0*g_0/ν_0
P_1(M_0) := 1.15*P_0(M_0)
# Коэффициенты весовые
a_TO(M_0) := 0.105*(1 + 1.6*exp(-0.28*M_T(M_0)))
a_TO1(M_00) := 0.097*(1 + 0.21*exp(-0.045*M_T(M_00)))
γ_DU1(M_00) := 0.025*(1 + 1*exp(-0.0021*P_P(M_00)))
γ_DU(M_0) := 0.049*(1 + 4.1*exp(-0.023*P_P(M_0)))
μ_PR1(M_00) := (0.013*(1 + 0.59*exp(-0.0048*M_00)) + 0.25/M_00)
μ_PR(M_0) := (0.013*(1 + 0.59*exp(-0.0048*M_0)) + 0.25/M_0)
Given
M_00 == M_PG/(μ_K*(1 + a_TO1(M_00)) - a_TO1(M_00) - γ_DU1(M_00)/ν_0 - μ_PR1(M_00))  # disabled
Find(M_00)  # error: Решение не было найдено.
Given
M_0 == M_PG/(μ_K*(1 + a_TO(M_0)) - a_TO(M_0) - γ_DU(M_0)/ν_0 - μ_PR(M_0))
# Стартовая масса
M_0 := Find(M_0) → 12.0125439959
# Масса топлива | Весовые коэффициенты
M_T := M_T(M_0) → 8.48173994405
a_TO(M_0) = 0.120628
# Масса горючего
γ_DU(M_0) = 0.0506735
M_G := M_T/(1 + k_M) = 1.22924
μ_PR(M_0) = 0.0410518
# Масса окислителя
M_OK := M_T*k_M/(1 + k_M) = 7.2525
# Масса топливного отсека
M_TO := a_TO(M_0)*M_T = 1.02314
# Масса двигательной установки
M_DU := γ_DU(M_0)*M_0/ν_0 = 1.01453
# Масса прочая
M_Σ := μ_PR(M_0)*M_0 = 0.493137
# Выполним проверку
M_0 = 12.0125
M_Σ + M_DU + M_TO + M_OK + M_G + M_PG = 12.0125  # Выполняется
# Объемно - габаритный расчет
# Длина межбакового отсека
L_MGB := 0.1*d = 0.16
# Расчет тоннельной трубы
# Расход окислителя по тоннельной трубе:
m_OK := m(M_0)*k_M*1000/(1 + k_M) = 41.3951
# Диаметр тоннельной трубы:
d_TR := sqrt(m_OK/(0.785*v*ρ_OK)) = 0.124173
# Диаметр всей магистральной трубы:
d_TON := d_TR + 0.060 = 0.184173
# Расчет  всех баков
# Объем окислителя:
V_OK := M_OK*1000/ρ_OK = 6.36184
# Объем горючего:
V_G := M_G*1000/ρ_G = 15.56
# Расчет объема бака окислителя
# 5 % на гарантию
V_BO := 1.1*V_OK = 6.99803  # 5 % на подушку
# Расчет объема бака горючего
V_BG := 1.1*V_G = 17.116
# Нахождение  диаметра днища
Given
R_DN == ((R_DN - 0.25*d)^2 + (d^2/4))^(1/2)
R_DN := Find(R_DN) → 1.0
# Длина днища
L_DN := 0.25*d = 0.4
# Объем днища
V_DN := 1/3*π*L_DN^2*(3*R_DN - L_DN) = 0.435634
# Объем цилиндрической части бака окислителя
V_CO := V_BO - 2*V_DN = 6.12676
# Нахождение длины цилиндрической части бака окислителя
L_CO := 4*V_CO/(π*d^2) = 3.0472
# Нахождение длины цилиндрической части бака горючего
Given
V_BG == π/4*(d^2 - d_TON^2)*L_CG + 2*V_DN - 2*L_DN*π/4*d_TON^2
L_CG := Find(L_CG) → 8.19868181091
# Объем приборного отсека
# Допущение
M_PO := M_Σ*1000/2 = 246.568
V_PO := M_PO/ρ_PO = 0.758672
Given
V_PO == π*d^2/4*L_PO
L_PO := Find(L_PO) → 0.377332612914
# ДЛЯ БОЛЕЕ ТОЧНОГО РАСЧЕТА
# Объем части приборного отсека, занимаемой днищем бака окислителя (без его учета)
V_PODN := 0.25*d*π/4*d^2 - V_DN → 0.368613538021
# Длина приборного отсека:
Given
V_PO == π*d^2/4*L_PO + V_PODN
L_PO1 := Find(L_PO) → 0.193999279581  # ПОМЕНЯТЬ ЗНАЧЕНИЕ В ДЛИНЕ ВСЕЙ РАКЕТЫ
# Объем головной части
L_GCH := d/(2*tan(β_GCH/2)) = 2.19798
V_GCH := 1/3*L_GCH*0.785*d^2 = 1.47235
# Плотность головной части
ρ_GCH1 := M_PG*1000/V_GCH = 679.184
# Сделаем цилиндрическую прибавку к головной части
L_CGCH := 0.1*d = 0.16  # ПРОВЕРИТЬ НУЖНА ЛИ ЦИЛИНДРИЧЕСКАЯ ЧАСТЬГЧ
V_CGCH := π*d^2/4*L_CGCH = 0.321699
# Перерасчет  плотности
ρ_GCH2 := M_PG*1000/(V_CGCH + V_GCH) = 557.397
L_CGCH + L_GCH = 2.35798
# Определение размеров хвостового отсека
P_0 := P_0(M_0) = 195.604
# Длина камеры сгорания:
L_K := 0.125*(P_0*1000/9.8)^0.25 = 1.48576  # [M]
# Длина двигателя
k_DV := 1.35  # коэффициент
L_DV := k_DV*L_K = 2.00577
# Зависимость длины хвостового отсека от тяги двиателя
L_XO(P) := 0.0005*P + 2.8867
L_XO := L_XO(P_0) = 2.9845
# Длина всей ракеты: | ПРОВЕРИТЬ, есть ли цилиндрическая часть ГЧ
L := L_MGB + L_CO + L_CG + L_PO1 + 4*L_DN + L_XO + (L_CGCH*0 + L_GCH) = 18.3824
# Удлинение ракеты
λ := L/d = 11.489
# Другой расчет хвостовой части ракеты
# Диаметр критического сечения
d_kr := (4/π)^0.5*β_T^0.5*(P_P(M_0)*1000/(p_K*J_UDP))^0.5 = 0.115103
# Радиус критического сечения
r_kr := d_kr/2 = 0.0575515
# Площадь критического сечения
S_kr := β_T*P_P(M_0)*1000/(p_K*J_UDP) = 0.0104055
# Площадь выходного сечения
S_a := S_kr*(((n - 1)/2*(2/(n + 1))^((n + 1)/(n - 1)))/((p_a/p_K)^(2/n) - (p_a/p_K)^((n + 1)/n)))^0.5 = 0.202355
# Диаметр выходного сечения
d_a := S_a^0.5*(4/π)^0.5 = 0.507589
# Радиус выходного сечения
r_a := d_a/2 = 0.253795
# Закритическая часть сопла
# Первое приближение: конус
# Длина конуса
l_k := (r_a - r_kr)/tan(20 deg) = 0.539174
# Второе приближение: парабола
l_zakr := 0.8*l_k = 0.431339
# Докритическая часть
# радиус камеры сгорания
r_kam := 2*r_kr = 0.115103
β_dokr := 45 deg
l_dokr := r_kr = 0.0575515
d_kam := 2*d_kr = 0.230206
l_dokr = 0.0575515
l_kam := 3*d_kr = 0.345309
# Длина двигатея
l_c := l_dokr + l_zakr = 0.48889  # Длина сопла
l_DU := 2*l_c = 0.977781  # Длина двигательной установки
l_XO := l_DU = 0.977781  # Длина хвостового отсека
# Длина всей ракеты:
L_1 := L_MGB + L_CO + L_CG + L_PO + 4*L_DN + l_XO + (L_CGCH*0 + L_GCH) = 16.559
# Удлинение ракеты
L_PO = 0.377333
λ := L_1/d = 10.3494
# Выполнение домашнего задания №2
V_x = 5265.03  # Характеристическая скорость
ν_0 = 0.6  # Стартовая нагрузка на тягу для первой ступени
ν_P2 := ν_0 = 0.6  # Стартовая нагрузка на тягу для второй ступени
J_UDP = 4300
J_UDP1 := J_UDP = 4300  # Удельный импульс второй и первой ступеней
J_UDP2 := J_UDP = 4300
M_PG = 1  # Масса полезного груза
g_0 := 9.77  # Ускорение свободного падения
# Решение
Введем понятие соотношения стартовых масс ступеней
M_02(M_01, λ) := λ*M_01
относительная масса полезного груза первой ступени
μ_PG1(λ) := λ
относительная масса полезного груза второй ступени
μ_PG2(M_01, λ) := M_PG/(M_01*λ)
V_x == -J_UDP1*ln(μ_K1) - J_UDP2*ln(μ_K2)
# Масса топлива для первой ступени | Масса топлива для второй ступени
M_T1(M_01, μ_K1) := M_01*(1 - μ_K1)
M_T2(M_01, μ_K2, λ) := M_02(M_01, λ)*(1 - μ_K2)
# Стартовая тяга двигателя в пустоте для первой ступени | Стартовая тяга двигателя в пустоте для второй ступени
a_TO2(M_01, μ_K2, λ) := 0.105*(1 + 1.6*exp(-0.28*M_T2(M_01, μ_K2, λ)))
a_TO1(M_01, μ_K1) := 0.105*(1 + 1.6*exp(-0.28*M_T1(M_01, μ_K1)))
P_02(M_01, λ) := M_02(M_01, λ)*g_0/ν_P2
γ_DU2(M_01, λ) := 0.049*(1 + 4.1*exp(-0.023*P_12(M_01, λ)))  # error: Эта переменная не определена.
P_01(M_01) := M_01*g_0/ν_0
γ_DU1(M_01) := 0.049*(1 + 4.1*exp(-0.023*P_11(M_01)))  # error: Эта переменная не определена.
μ_PR2(M_01, λ) := (0.013*(1 + 0.59*exp(-0.0048*M_02(M_01, λ))) + 0.25/M_02(M_01, λ))
# Пустотная тяга для двигателя первой ступени
# Пустотная тяга для двигателя второй ступени
μ_PR1(M_01) := (0.013*(1 + 0.59*exp(-0.0048*M_01)))
P_11(M_01) := 1.15*P_01(M_01)
P_12(M_01, λ) := 1.15*P_02(M_01, λ)
# Задаемся весовыми коэффициентами
a_TO2(M_01, μ_K2, λ) := 0.097*(1 + 0.21*exp(-0.045*M_T2(M_01, μ_K2, λ)))
a_TO1(M_01, μ_K1) := 0.097*(1 + 0.21*exp(-0.045*M_T1(M_01, μ_K1)))
γ_DU2(M_01, λ) := 0.025*(1 + 1*exp(-0.0021*P_12(M_01, λ)))
γ_DU1(M_01) := 0.025*(1 + 1*exp(-0.0021*P_11(M_01)))
μ_PR2(M_01, λ) := (0.013*(1 + 0.59*exp(-0.0048*M_02(M_01, λ))) + 0.25/M_02(M_01, λ))
μ_PR1(M_01) := (0.013*(1 + 0.59*exp(-0.0048*M_01)))
# Задаемся значениями лямбда
V_x1(μ_K1, μ_K2, λ, M_01) := -J_UDP1*ln(1*(λ + (a_TO1(M_01, μ_K1) + γ_DU1(M_01)/ν_0 + μ_PR1(M_01)))/(1 + a_TO1(M_01, μ_K1))) - J_UDP2*ln(1*(μ_PG2(M_01, λ) + (a_TO2(M_01, μ_K2, λ) + γ_DU2(M_01, λ)/ν_P2 + μ_PR2(M_01, λ)))/(1 + a_TO2(M_01, μ_K2, λ)))
μ_K_ := 1 - sqrt(exp(-V_x/J_UDP)) = 0.45785
μ_K1 := 0.9*μ_K_ = 0.412065
Given
V_x == -J_UDP1*ln(μ_K1) - J_UDP2*ln(μ_K2)
μ_K2 := Find(μ_K2) → 0.713300814458
λ_11 := 0.25
M_01 := 11.5
λ_12 := λ_11 + 0.05 = 0.3
λ_13 := λ_12 + 0.05 = 0.35
λ_14 := λ_13 + 0.05 = 0.4
λ_15 := λ_14 + 0.05 = 0.45
λ_16 := λ_15 + 0.05 = 0.5
λ_17 := λ_16 + 0.05 = 0.55
V_x11 := [
    V_x1(μ_K1, μ_K2, λ_11, M_01);
    V_x1(μ_K1, μ_K2, λ_12, M_01);
    V_x1(μ_K1, μ_K2, λ_13, M_01);
    V_x1(μ_K1, μ_K2, λ_14, M_01);
    V_x1(μ_K1, μ_K2, λ_15, M_01);
    V_x1(μ_K1, μ_K2, λ_16, M_01);
    V_x1(μ_K1, μ_K2, λ_17, M_01)
] = [6206.85; 6268.66; 6270.49; 6235.13; 6176.02; 6101.49; 6016.93]
λ := [λ_11; λ_11 + 0.05; λ_11 + 0.1; λ_11 + 0.15; λ_11 + 0.2; λ_11 + 0.25; λ_11 + 0.3] = [0.25; 0.3; 0.35; 0.4; 0.45; 0.5; 0.55]
s := cspline(λ, V_x11)
z := 0, 0.01 .. 0.55
V(z) := interp(s, λ, V_x11, z)
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# Оптимальное значение лямбда
λ_opt := 0.4
# Варирование массы М0
M_011 := M_01 - 3 = 8.5
M_012 := M_011 + 0.15 = 8.65
M_013 := M_012 + 0.15 = 8.8
M_014 := M_013 + 0.15 = 8.95
M_015 := M_014 + 0.015 = 8.965
V_x11 := [
    V_x1(μ_K1, μ_K2, λ_opt, M_011);
    V_x1(μ_K1, μ_K2, λ_opt, M_012);
    V_x1(μ_K1, μ_K2, λ_opt, M_013);
    V_x1(μ_K1, μ_K2, λ_opt, M_014);
    V_x1(μ_K1, μ_K2, λ_opt, M_015)
] = [5416.76; 5466.26; 5514.66; 5561.99; 5566.67]
M_00 := [M_011; M_012; M_013; M_014; M_015] = [8.5; 8.65; 8.8; 8.95; 8.965]
V_x = 5265.03
# Тогда оптимальная стартовая масса  М0
M_01 := M_015 = 8.965
# Масса второй ступени
M_02(M_01, λ_opt) = 3.586
# Весовые коэффициенты
a_TO1(M_01, μ_K1) = 0.113069
a_TO2(M_01, μ_K2, λ_opt) = 0.116449
γ_DU1(M_01) = 0.0425725
γ_DU2(M_01, λ_opt) = 0.0467119
μ_PR1(M_01) = 0.0203469
μ_PR2(M_01, λ_opt) = 0.0902547
# Масса топлива для первой ступени | Масса топлива для второй ступени
M_T1(M_01, μ_K1) = 5.27084
M_T2(M_01, μ_K2, λ_opt) = 1.0281
# Стартовая тяга двигателя в пустоте для первой ступени | Стартовая тяга двигателя в пустоте для второй ступени
P_02(M_01, λ_opt) = 58.392
P_01(M_01) = 145.98
# Пустотная тяга для двигателя первой ступени | Пустотная тяга для двигателя второй ступени
P_11(M_01) = 167.877
P_12(M_01, λ_opt) = 67.1508
# _____________________________________________________________________
# Выполним другой расчет
V_x = 5265.03  # Характеристическая скорость
ν_0 = 0.6  # Стартовая нагрузка на тягу для первой ступени
ν_P2 := ν_0 = 0.6  # Стартовая нагрузка на тягу для второй ступени
J_UDP = 4300
J_UDP1 := J_UDP = 4300  # Удельный импульс второй и первой ступеней
J_UDP2 := J_UDP = 4300
M_PG = 1  # Масса полезного груза
g_0 := 9.77  # Ускорение свободного падения
# Решение
Введем понятие соотношения стартовых масс ступеней
M_02(M_01, λ) := λ*M_01
относительная масса полезного груза первой ступени
μ_PG1(λ) := λ
относительная масса полезного груза второй ступени
μ_PG2(M_01, λ) := M_PG/(M_01*λ)
V_x == -J_UDP1*ln(μ_K1) - J_UDP2*ln(μ_K2)
# Масса топлива для первой ступени | Масса топлива для второй ступени
M_T1(M_01, μ_K1) := M_01*(1 - μ_K1)
M_T2(M_01, μ_K2, λ) := M_02(M_01, λ)*(1 - μ_K2)
# Стартовая тяга двигателя в пустоте для первой ступени | Стартовая тяга двигателя в пустоте для второй ступени
P_02(M_01, λ) := M_02(M_01, λ)*g_0/ν_P2
P_01(M_01) := M_01*g_0/ν_0
# Пустотная тяга для двигателя первой ступени | Пустотная тяга для двигателя второй ступени
P_11(M_01) := 1.15*P_01(M_01)
P_12(M_01, λ) := 1.15*P_02(M_01, λ)
# Задаемся весовыми коэффициентами
a_TO11(M_T0001) := 0.097*(1 + 0.21*exp(-0.045*M_T0001))
γ_DU11(M_0001) := 0.025*(1 + 1*exp(-0.0021*P_P0001))  # error: Для скобки "(" необходима соответствующая скобка ")".
μ_PR11(M_0001) := (0.013*(1 + 0.59*exp(-0.0048*M_00)) + 0.25/M_00)
Given
μ_K1 == 1*(λ + (a_TO1(M_01, μ_K1) + γ_DU1(M_01)/ν_0 + μ_PR1(M_01)))/(1 + a_TO1(M_01, μ_K1))
μ_K2 == 1*(μ_PG2(M_01, λ) + (a_TO2(M_01, μ_K2, λ) + γ_DU2(M_01, λ)/ν_P2 + μ_PR2(M_01, λ)))/(1 + a_TO2(M_01, μ_K2, λ))
[M_01; λ] := Find(M_01, λ) → [8.50808417637; 0.25362502419]
