# Выполнение второго дмашнего задания по ПЛА
V_x := 4293  # Характеристическая скорость
ν_0 := 0.6  # Стартовая нагрузка на тягу для первой ступени
ν_P2 := ν_0 = 0.6  # Стартовая нагрузка на тягу для второй ступени
J_UDP := 4150
J_UDP1 := J_UDP = 4150  # Удельный импульс второй и первой ступеней
J_UDP2 := J_UDP = 4150
M_PG := 1.6  # Масса полезного груза
ORIGIN := 1
g_0 := 9.77  # Ускорение свободного падения
# Решение
Введем понятие соотношения стартовых масс ступеней
M_02(M_01, λ) := λ*M_01
относительная масса полезного груза первой ступени
μ_PG1(λ) := λ
относительная масса полезного груза второй ступени
μ_PG2(M_01, λ) := M_PG/(M_01*λ)
V_x == -J_UDP1*ln(μ_K1) - J_UDP2*ln(μ_K2)
# Масса топлива для первой ступени | Масса топлива для второй ступени
M_T1(M_01, μ_K1) := M_01*(1 - μ_K1)
M_T2(M_01, μ_K2, λ) := M_02(M_01, λ)*(1 - μ_K2)
# Стартовая тяга двигателя в пустоте для первой ступени | Стартовая тяга двигателя в пустоте для второй ступени
P_02(M_01, λ) := M_02(M_01, λ)*g_0/ν_P2
P_01(M_01) := M_01*g_0/ν_0
# Пустотная тяга для двигателя первой ступени | Пустотная тяга для двигателя второй ступени
P_11(M_01) := 1.15*P_01(M_01)
P_12(M_01, λ) := 1.15*P_02(M_01, λ)
# Задаемся весовыми коэффициентами
# Для первой ступени
a_TO1(M_01, μ_K1) := 0.097*(1 + 0.21*exp(-0.045*M_T1(M_01, μ_K1)))
γ_DU1(M_01) := 0.025*(1 + 1*exp(-0.0021*P_11(M_01)))
μ_PR1(M_01) := (0.013*(1 + 0.59*exp(-0.0048*M_01)))
# Для второй ступени
a_TO2(M_01, μ_K2, λ) := 0.097*(1 + 0.21*exp(-0.045*M_T2(M_01, μ_K2, λ)))
γ_DU2(M_01, λ) := 0.025*(1 + 1*exp(-0.0021*P_12(M_01, λ)))
μ_PR2(M_01, λ) := (0.013*(1 + 0.59*exp(-0.0048*M_02(M_01, λ))) + 0.25/M_02(M_01, λ))
# Вариант 1 | Определяем  относительную массу второй ступени
μ_K1 := [0.300; 0.350; 0.400; 0.450; 0.500; 0.550; 0.600; 0.650; 0.700; 0.750]
μ_K2 := exp(-V_x/J_UDP)/μ_K1 = [1.18473; 1.01548; 0.888548; 0.78982; 0.710838; 0.646216; 0.592365; 0.546799; 0.507741; 0.473892]
μ_K1(i) := μ_K1[i]
μ_K2(i) := μ_K2[i]
# Задаемся условной стартовой массой первой ступени
# Задаемся значениями коэффициента лямбда
M_01 := [7.5; 8.0; 8.5; 8.85; 8.95; 9.0; 9.05; 9.5; 10.0; 10.5] = [7.5; 8; 8.5; 8.85; 8.95; 9; 9.05; 9.5; 10; 10.5]
λ := [0.20; 0.25; 0.30; 0.35; 0.40; 0.43; 0.45; 0.48; 0.50; 0.55] = [0.2; 0.25; 0.3; 0.35; 0.4; 0.43; 0.45; 0.48; 0.5; 0.55]
M_01(j) := M_01[j]
λ(k) := λ[k]
# Уравнение характеристической скорости
V_x1(i, k, j) := -J_UDP1*ln(1*(λ(k) + (a_TO1(M_01(j), μ_K1(i)) + γ_DU1(M_01(j))/ν_0 + μ_PR1(M_01(j))))/(1 + a_TO1(M_01(j), μ_K1(i)))) - J_UDP2*ln(1*(μ_PG2(M_01(j), λ(k)) + (a_TO2(M_01(j), μ_K2(i), λ(k)) + γ_DU2(M_01(j), λ(k))/ν_P2 + μ_PR2(M_01(j), λ(k))))/(1 + a_TO2(M_01(j), μ_K2(i), λ(k))))
i := 1
j := 1
V_x11 := [
    V_x1(i, 1, j);
    V_x1(i, 2, j);
    V_x1(i, 3, j);
    V_x1(i, 4, j);
    V_x1(i, 5, j);
    V_x1(i, 6, j);
    V_x1(i, 7, j);
    V_x1(i, 8, j);
    V_x1(i, 9, j);
    V_x1(i, 10, j)
] = [3095.96; 3388.59; 3567.99; 3676.75; 3738.79; 3759.88; 3768.63; 3775.09; 3775.57; 3765.86]
λ_0 := [λ(1); λ(2); λ(3); λ(4); λ(5); λ(6); λ(7); λ(8); λ(9); λ(10)] = [0.2; 0.25; 0.3; 0.35; 0.4; 0.43; 0.45; 0.48; 0.5; 0.55]
s := cspline(λ_0, V_x11)
z := 0, 0.01 .. 0.65
V(z) := interp(s, λ_0, V_x11, z)
V_x = 4293
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# Варирование массы стартовой
V_x11M0 := [
    V_x1(i, 7, 1);
    V_x1(i, 7, 2);
    V_x1(i, 7, 3);
    V_x1(i, 7, 4);
    V_x1(i, 7, 5);
    V_x1(i, 7, 6);
    V_x1(i, 7, 7);
    V_x1(i, 7, 8);
    V_x1(i, 7, 9);
    V_x1(i, 7, 10)
] = [3768.63; 3965.2; 4147.01; 4266.46; 4299.5; 4315.85; 4332.08; 4473.21; 4620.38; 4758.4]
j := 5
λ_0 := [λ(1); λ(2); λ(3); λ(4); λ(5); λ(6); λ(7); λ(8); λ(9); λ(10)] = [0.2; 0.25; 0.3; 0.35; 0.4; 0.43; 0.45; 0.48; 0.5; 0.55]
V_x11 := [
    V_x1(i, 1, j);
    V_x1(i, 2, j);
    V_x1(i, 3, j);
    V_x1(i, 4, j);
    V_x1(i, 5, j);
    V_x1(i, 6, j);
    V_x1(i, 7, j);
    V_x1(i, 8, j);
    V_x1(i, 9, j);
    V_x1(i, 10, j)
] = [3734.5; 4001.28; 4157.33; 4244.86; 4287.49; 4297.71; 4299.5; 4295.94; 4290.01; 4265.09]
s := cspline(λ_0, V_x11)
z := 0, 0.01 .. 0.65
V(z) := interp(s, λ_0, V_x11, z)
V_x = 4293
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λ := λ(9) = 0.5
M_01 := M_01(6) = 9
M_02(M_01, λ) = 4.5
μ_K1(i) = 0.3
μ_K2(i) = 1.18473
# Масса топлива для первой ступени | Масса топлива для второй ступени
M_T2(M_01, μ_K2(i), λ) = -0.831285
M_T1(M_01, μ_K1(i)) = 6.3
# Стартовая тяга двигателя в пустоте для первой ступени | Стартовая тяга двигателя в пустоте для второй ступени
P_02(M_01, λ) = 73.275
P_01(M_01) = 146.55
# Пустотная тяга для двигателя первой ступени | Пустотная тяга для двигателя второй ступени
P_12(M_01, λ) = 84.2662
P_11(M_01) = 168.532
# Задаемся весовыми коэффициентами
# Для первой ступени | Для второй ступени
a_TO1(M_01, μ_K1(i)) = 0.112342
a_TO2(M_01, μ_K2(i), λ) = 0.118146
γ_DU1(M_01) = 0.0425483
γ_DU2(M_01, λ) = 0.0459454
μ_PR1(M_01) = 0.0203457
μ_PR2(M_01, λ) = 0.0760617
# ПРОВЕРКА
# (оказалась неверной, что как бы и должно быть на самом деле)
Given
μ_K1(i) == 1*(λ + (a_TO1(M_01, μ_K1(i)) + γ_DU1(M_01)/ν_0 + μ_PR1(M_01)))/(1 + a_TO1(M_01, μ_K1(i)))
μ_K2(i) == 1*(μ_PG2(M_01, λ) + (a_TO2(M_01, μ_K2(i), λ) + γ_DU2(M_01, λ)/ν_P2 + μ_PR2(M_01, λ)))/(1 + a_TO2(M_01, μ_K2(i), λ))
[M_01; λ_1] := Find(M_01, λ) → [12.4019535362; 0.134973888811]
μ_K1 := μ_K1(i) = 0.3
μ_K2 := μ_K2(i) = 1.18473
V_x111(μ_K1, μ_K2, λ, M_01) := -J_UDP1*ln(1*(λ + (a_TO1(M_01, μ_K1) + γ_DU1(M_01)/ν_0 + μ_PR1(M_01)))/(1 + a_TO1(M_01, μ_K1))) - J_UDP2*ln(1*(μ_PG2(M_01, λ) + (a_TO2(M_01, μ_K2, λ) + γ_DU2(M_01, λ)/ν_P2 + μ_PR2(M_01, λ)))/(1 + a_TO2(M_01, μ_K2, λ)))
V_xx := [
    V_x111(μ_K1, μ_K2, λ_0[1], M_01);
    V_x111(μ_K1, μ_K2, λ_0[2], M_01);
    V_x111(μ_K1, μ_K2, λ_0[3], M_01);
    V_x111(μ_K1, μ_K2, λ_0[4], M_01);
    V_x111(μ_K1, μ_K2, λ_0[5], M_01);
    V_x111(μ_K1, μ_K2, λ_0[6], M_01);
    V_x111(μ_K1, μ_K2, λ_0[7], M_01);
    V_x111(μ_K1, μ_K2, λ_0[8], M_01);
    V_x111(μ_K1, μ_K2, λ_0[9], M_01);
    V_x111(μ_K1, μ_K2, λ_0[10], M_01)
] = [4872.35; 5084.06; 5191.25; 5235.09; 5238.39; 5226.82; 5214.79; 5191.43; 5172.89; 5118.35]
λ_0 := [λ_0[1]; λ_0[2]; λ_0[3]; λ_0[4]; λ_0[5]; λ_0[6]; λ_0[7]; λ_0[8]; λ_0[9]; λ_0[10]] = [0.2; 0.25; 0.3; 0.35; 0.4; 0.43; 0.45; 0.48; 0.5; 0.55]
s := cspline(λ_0, V_xx)
z := 0, 0.01 .. 0.65
V(z) := interp(s, λ_0, V_xx, z)
V_x = 4293
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# Обратный расчет
a_TO1 := 0.114589
Given
a_TO1 == 0.097*(1 + 0.21*exp(-0.045*M_T1(M_01, μ_K1)))
μ_K1 := Find(μ_K1) → 0.736977775029
Given
V_x == -J_UDP1*ln(μ_K1) - J_UDP2*ln(μ_K2)
μ_K2 := Find(μ_K2) → 0.482265595791
