# Выполнение второго дмашнего задания по ПЛА
V_x := 5265  # Характеристическая скорость
ν_0 := 0.6  # Стартовая нагрузка на тягу для первой ступени
ν_P2 := ν_0 = 0.6  # Стартовая нагрузка на тягу для второй ступени
J_UDP := 4300
J_UDP1 := J_UDP = 4300  # Удельный импульс второй и первой ступеней
J_UDP2 := J_UDP = 4300
M_PG := 1  # Масса полезного груза
ORIGIN := 1
g_0 := 9.77  # Ускорение свободного падения
# Решение
Введем понятие соотношения стартовых масс ступеней
M_02(M_01, λ) := λ*M_01
относительная масса полезного груза первой ступени
μ_PG1(λ) := λ
относительная масса полезного груза второй ступени
μ_PG2(M_01, λ) := M_PG/(M_01*λ)
V_x == -J_UDP1*ln(μ_K1) - J_UDP2*ln(μ_K2)
# Масса топлива для первой ступени | Масса топлива для второй ступени
M_T1(M_01, μ_K1) := M_01*(1 - μ_K1)
M_T2(M_01, μ_K2, λ) := M_02(M_01, λ)*(1 - μ_K2)
# Стартовая тяга двигателя в пустоте для первой ступени | Стартовая тяга двигателя в пустоте для второй ступени
P_02(M_01, λ) := M_02(M_01, λ)*g_0/ν_P2
P_01(M_01) := M_01*g_0/ν_0
# Пустотная тяга для двигателя первой ступени | Пустотная тяга для двигателя второй ступени
P_11(M_01) := 1.15*P_01(M_01)
P_12(M_01, λ) := 1.15*P_02(M_01, λ)
# Задаемся весовыми коэффициентами
# Для первой ступени
a_TO1(M_01, μ_K1) := 0.097*(1 + 0.21*exp(-0.045*M_T1(M_01, μ_K1)))
γ_DU1(M_01) := 0.025*(1 + 1*exp(-0.0021*P_11(M_01)))
μ_PR1(M_01) := (0.013*(1 + 0.59*exp(-0.0048*M_01)))
# Для второй ступени
a_TO2(M_01, μ_K2, λ) := 0.097*(1 + 0.21*exp(-0.045*M_T2(M_01, μ_K2, λ)))
γ_DU2(M_01, λ) := 0.025*(1 + 1*exp(-0.0021*P_12(M_01, λ)))
μ_PR2(M_01, λ) := (0.013*(1 + 0.59*exp(-0.0048*M_02(M_01, λ))) + 0.25/M_02(M_01, λ))
# Вариант 1 | Определяем  относительную массу второй ступени
μ_K1 := [0.300; 0.350; 0.400; 0.450; 0.500; 0.550; 0.600; 0.650; 0.700; 0.750]
μ_K2 := exp(-V_x/J_UDP)/μ_K1 = [0.979762; 0.839796; 0.734821; 0.653175; 0.587857; 0.534416; 0.489881; 0.452198; 0.419898; 0.391905]
μ_K1(i) := μ_K1[i]
μ_K2(i) := μ_K2[i]
# Задаемся условной стартовой массой первой ступени
# Задаемся значениями коэффициента лямбда
M_01 := [7.5; 8.0; 8.5; 9.0; 9.5; 10.0; 10.5; 11.0; 11.5; 12.0] = [7.5; 8; 8.5; 9; 9.5; 10; 10.5; 11; 11.5; 12]
λ := [0.20; 0.25; 0.30; 0.35; 0.40; 0.45; 0.50; 0.55; 0.60; 0.65] = [0.2; 0.25; 0.3; 0.35; 0.4; 0.45; 0.5; 0.55; 0.6; 0.65]
M_01(j) := M_01[j]
λ(k) := λ[k]
# Уравнение характеристической скорости
V_x1(i, k, j) := -J_UDP1*ln(1*(λ(k) + (a_TO1(M_01(j), μ_K1(i)) + γ_DU1(M_01(j))/ν_0 + μ_PR1(M_01(j))))/(1 + a_TO1(M_01(j), μ_K1(i)))) - J_UDP2*ln(1*(μ_PG2(M_01(j), λ(k)) + (a_TO2(M_01(j), μ_K2(i), λ(k)) + γ_DU2(M_01(j), λ(k))/ν_P2 + μ_PR2(M_01(j), λ(k))))/(1 + a_TO2(M_01(j), μ_K2(i), λ(k))))
i := 1
j := 1
V_x11 := [
    V_x1(i, 1, j);
    V_x1(i, 2, j);
    V_x1(i, 3, j);
    V_x1(i, 4, j);
    V_x1(i, 5, j);
    V_x1(i, 6, j);
    V_x1(i, 7, j);
    V_x1(i, 8, j);
    V_x1(i, 9, j);
    V_x1(i, 10, j)
] = [4593.02; 4838.18; 4971.1; 5035.25; 5054.91; 5044.65; 5013.75; 4968.34; 4912.64; 4849.58]
λ_0 := [λ(1); λ(2); λ(3); λ(4); λ(5); λ(6); λ(7); λ(8); λ(9); λ(10)] = [0.2; 0.25; 0.3; 0.35; 0.4; 0.45; 0.5; 0.55; 0.6; 0.65]
s := cspline(λ_0, V_x11)
z := 0, 0.01 .. 0.65
V(z) := interp(s, λ_0, V_x11, z)
V_x = 5265
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# Варирование массы стартовой
V_x11M0 := [
    V_x1(i, 5, 1);
    V_x1(i, 5, 2);
    V_x1(i, 5, 3);
    V_x1(i, 5, 4);
    V_x1(i, 5, 5);
    V_x1(i, 5, 6);
    V_x1(i, 5, 7);
    V_x1(i, 5, 8);
    V_x1(i, 5, 9);
    V_x1(i, 5, 10)
] = [5054.91; 5242.83; 5416.12; 5576.61; 5725.8; 5864.98; 5995.23; 6117.46; 6232.48; 6340.96]
j := 2
λ_0 := [λ(1); λ(2); λ(3); λ(4); λ(5); λ(6); λ(7); λ(8); λ(9); λ(10)] = [0.2; 0.25; 0.3; 0.35; 0.4; 0.45; 0.5; 0.55; 0.6; 0.65]
V_x11 := [
    V_x1(i, 1, j);
    V_x1(i, 2, j);
    V_x1(i, 3, j);
    V_x1(i, 4, j);
    V_x1(i, 5, j);
    V_x1(i, 6, j);
    V_x1(i, 7, j);
    V_x1(i, 8, j);
    V_x1(i, 9, j);
    V_x1(i, 10, j)
] = [4820.27; 5053.82; 5176.44; 5231.42; 5242.83; 5225.13; 5187.47; 5135.92; 5074.59; 5006.38]
s := cspline(λ_0, V_x11)
z := 0, 0.01 .. 0.65
V(z) := interp(s, λ_0, V_x11, z)
V_x = 5265
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λ := λ(5) = 0.4
M_01 := M_01(2) = 8
M_02(M_01, λ) = 3.2
μ_K1(i) = 0.3
μ_K2(i) = 0.979762
# Масса топлива для первой ступени | Масса топлива для второй ступени
M_T2(M_01, μ_K2(i), λ) = 0.0647622
M_T1(M_01, μ_K1(i)) = 5.6
# Стартовая тяга двигателя в пустоте для первой ступени | Стартовая тяга двигателя в пустоте для второй ступени
P_02(M_01, λ) = 52.1067
P_01(M_01) = 130.267
# Пустотная тяга для двигателя первой ступени | Пустотная тяга для двигателя второй ступени
P_12(M_01, λ) = 59.9227
P_11(M_01) = 149.807
# Задаемся весовыми коэффициентами
# Для первой ступени | Для второй ступени
a_TO1(M_01, μ_K1(i)) = 0.112832
a_TO2(M_01, μ_K2(i), λ) = 0.117311
γ_DU1(M_01) = 0.0432521
γ_DU2(M_01, λ) = 0.047044
μ_PR1(M_01) = 0.0203811
μ_PR2(M_01, λ) = 0.0986781
# ПРОВЕРКА
# (оказалась неверной, что как бы и должно быть на самом деле)
i := 5
Given
μ_K1(i) == 1*(λ + (a_TO1(M_01, μ_K1(i)) + γ_DU1(M_01)/ν_0 + μ_PR1(M_01)))/(1 + a_TO1(M_01, μ_K1(i)))
μ_K2(i) == 1*(μ_PG2(M_01, λ) + (a_TO2(M_01, μ_K2(i), λ) + γ_DU2(M_01, λ)/ν_P2 + μ_PR2(M_01, λ)))/(1 + a_TO2(M_01, μ_K2(i), λ))
[M_01; λ_1] := Find(M_01, λ) → [8.09400625377; 0.350658385482]
μ_K1 := μ_K1(i) = 0.5
μ_K2 := μ_K2(i) = 0.587857
V_x111(μ_K1, μ_K2, λ, M_01) := -J_UDP1*ln(1*(λ + (a_TO1(M_01, μ_K1) + γ_DU1(M_01)/ν_0 + μ_PR1(M_01)))/(1 + a_TO1(M_01, μ_K1))) - J_UDP2*ln(1*(μ_PG2(M_01, λ) + (a_TO2(M_01, μ_K2, λ) + γ_DU2(M_01, λ)/ν_P2 + μ_PR2(M_01, λ)))/(1 + a_TO2(M_01, μ_K2, λ)))
V_xx := [
    V_x111(μ_K1, μ_K2, λ_0[1], M_01);
    V_x111(μ_K1, μ_K2, λ_0[2], M_01);
    V_x111(μ_K1, μ_K2, λ_0[3], M_01);
    V_x111(μ_K1, μ_K2, λ_0[4], M_01);
    V_x111(μ_K1, μ_K2, λ_0[5], M_01);
    V_x111(μ_K1, μ_K2, λ_0[6], M_01);
    V_x111(μ_K1, μ_K2, λ_0[7], M_01);
    V_x111(μ_K1, μ_K2, λ_0[8], M_01);
    V_x111(μ_K1, μ_K2, λ_0[9], M_01);
    V_x111(μ_K1, μ_K2, λ_0[10], M_01)
] = [4853.38; 5086.82; 5209.47; 5264.6; 5276.32; 5259.06; 5221.97; 5171.09; 5110.55; 5043.22]
λ_0 := [λ_0[1]; λ_0[2]; λ_0[3]; λ_0[4]; λ_0[5]; λ_0[6]; λ_0[7]; λ_0[8]; λ_0[9]; λ_0[10]] = [0.2; 0.25; 0.3; 0.35; 0.4; 0.45; 0.5; 0.55; 0.6; 0.65]
s := cspline(λ_0, V_xx)
z := 0, 0.01 .. 0.65
V(z) := interp(s, λ_0, V_xx, z)
V_x = 5265
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# Обратный расчет
a_TO1 := 0.114589
Given
a_TO1 == 0.097*(1 + 0.21*exp(-0.045*M_T1(M_01, μ_K1)))
μ_K1 := Find(μ_K1) → 0.596987040681
Given
V_x == -J_UDP1*ln(μ_K1) - J_UDP2*ln(μ_K2)
μ_K2 := Find(μ_K2) → 0.492353299674
