integral(x*sin(x), x) → sin(x) - x*cos(x)
integral(4*q_0/π*sin(φ)*sin(φ)*R, φ = 0 .. 2*π) → 4*q_0*R
-(d/dφ(C_1*cos(φ) + C_2*sin(φ) - 2*q_0/π*R*φ*cos(φ))) → ((C_1*π - 2*q_0*φ*R)*sin(φ) + (2*q_0*R - C_2*π)*cos(φ))/π
Q_1(φ, C_1) := C_1*cos(φ) + C_2*sin(φ) - 2*q_0/π*R*φ*cos(φ) → -2*q_0*φ*R*cos(φ)/π + C_2*sin(φ) + C_1*cos(φ)
M_1(φ, C_1) := integral(R*Q_1(φ, C_1), φ) + C_3 → R*((C_1*π - 2*q_0*φ*R)*sin(φ) - (C_2*π + 2*q_0*R)*cos(φ))/π + C_3
N_1(φ, C_1) := -(d/dφ(Q_1(φ, C_1))) + q_0*R → ((C_1*π - 2*q_0*φ*R)*sin(φ) + (2*q_0*R - C_2*π)*cos(φ))/π + q_0*R
Q_2(φ, C_4) := C_4*cos(φ) + C_5*sin(φ) - 2*q_0/π*R*φ*cos(φ) → -2*q_0*φ*R*cos(φ)/π + C_5*sin(φ) + C_4*cos(φ)
M_2(φ, C_4) := integral(R*Q_2(φ, C_4), φ) + C_6 → R*((C_4*π - 2*q_0*φ*R)*sin(φ) - (C_5*π + 2*q_0*R)*cos(φ))/π + C_6
N_2(φ, C_4) := -(d/dφ(Q_2(φ, C_4))) → ((C_4*π - 2*q_0*φ*R)*sin(φ) + (2*q_0*R - C_5*π)*cos(φ))/π
# Применение симметрии:
Q_1(φ) := Q_1(φ, 0) → -2*q_0*φ*R*cos(φ)/π + C_2*sin(φ)
M_1(φ) := M_1(φ, 0) → R*(-(2*q_0*φ*R*sin(φ)) - (C_2*π + 2*q_0*R)*cos(φ))/π + C_3
N_1(φ) := N_1(φ, 0) → -(2*q_0*φ*R*sin(φ) - (2*q_0*R - C_2*π)*cos(φ))/π + q_0*R
Q_2(π, C_4) → 2*q_0*R - C_4
Q_2(φ) := Q_2(φ, 2*q_0*R) → -2*q_0*φ*R*cos(φ)/π + C_5*sin(φ) + 2*q_0*R*cos(φ)
M_2(φ) := M_2(φ, 2*q_0*R) → R*((2*q_0*R*π - 2*q_0*φ*R)*sin(φ) - (C_5*π + 2*q_0*R)*cos(φ))/π + C_6
N_2(φ) := N_2(φ, 2*q_0*R) → ((2*q_0*R*π - 2*q_0*φ*R)*sin(φ) + (2*q_0*R - C_5*π)*cos(φ))/π
# Равновесие стыка:
Q_1(π/2) - Q_2(π/2) → -C_5 + C_2
C_2 == C_5
M_1(π/2) - M_2(π/2) → -(2*q_0*R^2) + (C_3 - C_6)
N_1(π/2) + q_0*R - N_2(π/2) → 0
integral(M_1(φ), φ = 0 .. π/2) + integral(M_2(φ), φ = π/2 .. π) → C_6*π/2 + C_3*π/2 + (C_5*R - C_2*R)
# C2 = C5:
Q_2(φ, C_5) := Q_2(φ) → -2*q_0*φ*R*cos(φ)/π + C_5*sin(φ) + 2*q_0*R*cos(φ)
Q_2(φ) := Q_2(φ, C_2) → -2*q_0*φ*R*cos(φ)/π + C_2*sin(φ) + 2*q_0*R*cos(φ)
M_2(φ, C_5) := M_2(φ) → R*((2*q_0*R*π - 2*q_0*φ*R)*sin(φ) - (C_5*π + 2*q_0*R)*cos(φ))/π + C_6
M_2(φ) := M_2(φ, C_2) → R*((2*q_0*R*π - 2*q_0*φ*R)*sin(φ) - (C_2*π + 2*q_0*R)*cos(φ))/π + C_6
N_2(φ, C_5) := N_2(φ) → ((2*q_0*R*π - 2*q_0*φ*R)*sin(φ) + (2*q_0*R - C_5*π)*cos(φ))/π
N_2(φ) := N_2(φ, C_2) → ((2*q_0*R*π - 2*q_0*φ*R)*sin(φ) + (2*q_0*R - C_2*π)*cos(φ))/π
integral(M_1(φ), φ = 0 .. π/2) + integral(M_2(φ), φ = π/2 .. π) → C_6*π/2 + C_3*π/2
C_3 + C_6 == 0
M_2(φ, C_6) := M_2(φ) → R*((2*q_0*R*π - 2*q_0*φ*R)*sin(φ) - (C_2*π + 2*q_0*R)*cos(φ))/π + C_6
M_2(φ) := M_2(φ, C_3 - 2*q_0*R^2) → R*((2*q_0*R*π - 2*q_0*φ*R)*sin(φ) - (C_2*π + 2*q_0*R)*cos(φ))/π + (C_3 - 2*q_0*R^2)
# Интегральные соотношения:
integral(M_1(φ), φ = 0 .. π/2) + integral(M_2(φ), φ = π/2 .. π) → -(q_0*R^2*π) + C_3*π
C_3 := q_0*R^2 → q_0*R^2
C_6 := -C_3 → -(q_0*R^2)
M_1(φ, C_3) := M_1(φ) → R*(-(2*q_0*φ*R*sin(φ)) - (C_2*π + 2*q_0*R)*cos(φ))/π + C_3
M_1(φ) := M_1(φ, q_0*R^2) → R*(-(2*q_0*φ*R*sin(φ)) - (C_2*π + 2*q_0*R)*cos(φ))/π + q_0*R^2
M_2(φ, C_3) := M_2(φ) → R*((2*q_0*R*π - 2*q_0*φ*R)*sin(φ) - (C_2*π + 2*q_0*R)*cos(φ))/π + (C_3 - 2*q_0*R^2)
M_2(φ) := M_2(φ, q_0*R^2) → R*((2*q_0*R*π - 2*q_0*φ*R)*sin(φ) - (C_2*π + 2*q_0*R)*cos(φ))/π - q_0*R^2
Q_1(φ) → -2*q_0*φ*R*cos(φ)/π + C_2*sin(φ)
M_1(φ) → R*(-(2*q_0*φ*R*sin(φ)) - (C_2*π + 2*q_0*R)*cos(φ))/π + q_0*R^2
N_1(φ) → -(2*q_0*φ*R*sin(φ) - (2*q_0*R - C_2*π)*cos(φ))/π + q_0*R
Q_2(φ) → -2*q_0*φ*R*cos(φ)/π + C_2*sin(φ) + 2*q_0*R*cos(φ)
M_2(φ) → R*((2*q_0*R*π - 2*q_0*φ*R)*sin(φ) - (C_2*π + 2*q_0*R)*cos(φ))/π - q_0*R^2
N_2(φ) → ((2*q_0*R*π - 2*q_0*φ*R)*sin(φ) + (2*q_0*R - C_2*π)*cos(φ))/π
integral(M_1(φ)*cos(φ), φ = 0 .. π/2) + integral(M_2(φ)*cos(φ), φ = π/2 .. π) → -(R*(C_2*π - q_0*R))/2
-(R*(C_2*π - q_0*R))/2 == 0 solve, C_2 → q_0*R/π
C_2 := q_0*R/π → q_0*R/π
C_5 := C_2 → q_0*R/π
Q_1(φ, C_2) := Q_1(φ) → -2*q_0*φ*R*cos(φ)/π + C_2*sin(φ)
Q_1(φ) := Q_1(φ, C_2) → q_0*R*sin(φ)/π - 2*q_0*φ*R*cos(φ)/π
M_1(φ, C_2) := M_1(φ) → R*(-(2*q_0*φ*R*sin(φ)) - (C_2*π + 2*q_0*R)*cos(φ))/π + q_0*R^2
M_1(φ) := M_1(φ, C_2) → R*(-(2*q_0*φ*R*sin(φ)) - 3*q_0*R*cos(φ))/π + q_0*R^2
N_1(φ, C_2) := N_1(φ) → -(2*q_0*φ*R*sin(φ) - (2*q_0*R - C_2*π)*cos(φ))/π + q_0*R
N_1(φ) := N_1(φ, C_2) → -(2*q_0*φ*R*sin(φ) - q_0*R*cos(φ))/π + q_0*R
Q_2(φ, C_2) := Q_2(φ) → -2*q_0*φ*R*cos(φ)/π + C_2*sin(φ) + 2*q_0*R*cos(φ)
Q_2(φ) := Q_2(φ, C_2) → q_0*R*sin(φ)/π + (2*q_0*R*cos(φ) - 2*q_0*φ*R*cos(φ)/π)
M_2(φ, C_2) := M_2(φ) → R*((2*q_0*R*π - 2*q_0*φ*R)*sin(φ) - (C_2*π + 2*q_0*R)*cos(φ))/π - q_0*R^2
M_2(φ) := M_2(φ, C_2) → R*((2*q_0*R*π - 2*q_0*φ*R)*sin(φ) - 3*q_0*R*cos(φ))/π - q_0*R^2
N_2(φ, C_2) := N_2(φ) → ((2*q_0*R*π - 2*q_0*φ*R)*sin(φ) + (2*q_0*R - C_2*π)*cos(φ))/π
N_2(φ) := N_2(φ, C_2) → ((2*q_0*R*π - 2*q_0*φ*R)*sin(φ) + q_0*R*cos(φ))/π
# Графики
φ_1 := 0, 0.01 .. π/2
φ_2 := π/2, π/2 + 0.01 .. 3*π/2
φ_3 := 3*π/2, 3*π/2 + 0.01 .. 2*π
Q_1(φ) := 1/π*(sin(φ) - 2*φ*cos(φ))
Q_2(φ) := 1/π*(sin(φ) - 2*φ*cos(φ) + 2*π*cos(φ))
# [chart]
    X[1] := φ_1
    Y[1] := Q_1(φ_1)
    X[2] := φ_2
    Y[2] := Q_2(φ_2)
    X[3] := 2*π - φ_1
    Y[3] := Q_1(-φ_1)
M_1(φ) := 1 - 3/π*cos(φ) - 2/π*φ*sin(φ)
M_1(π/2) = -1.11022e-16
M_2(φ) := 2*sin(φ) - 3/π*cos(φ) - 2/π*φ*sin(φ) - 1
M_2(π/2) = 0
# [chart]
    X[1] := φ_1
    Y[1] := M_1(φ_1)
    X[2] := φ_2
    Y[2] := M_2(φ_2)
    X[3] := 2*π - φ_1
    Y[3] := M_1(φ_1)
N_1(φ) := 1 - 2/π*φ*sin(φ) + 1/π*cos(φ)
N_1(π/2) = 1.94902e-17
N_2(φ) := 2*sin(φ) - 2/π*φ*sin(φ) + 1/π*cos(φ)
N_2(π/2) = 1
# [chart]
    X[1] := φ_1
    Y[1] := N_1(φ_1)
    X[2] := φ_2
    Y[2] := N_2(φ_2)
    X[3] := 2*π - φ_1
    Y[3] := N_1(φ_1)
N(φ) :=
    if φ ≤ π/2
        N_1(φ)
    else if φ ≥ 3*π/2
        N_1(φ - 2*π)
    else
        N_2(φ)
integral(N(φ)*sin(φ), φ = 0 .. 2*π) = -3.21081e-16
