t := A + B*cos(φ) + C*sin(φ) → C*sin(φ) + B*cos(φ) + A
A := 0
B := 0
C := 4*q_0/π → 4*q_0/π
t := t → C*sin(φ) + B*cos(φ) + A
t → 4*q_0*sin(φ)/π
a_0'' := 1/(2*π)*(integral(t, φ = 0 .. 2*π) - q_0 + q_0) → 0
a_n'' := 1/π*(integral(t*cos(n*φ), φ = 0 .. 2*π) - q_0*cos(n*π/2) + q_0*cos(3*n*π/2)) → (-8*q_0*sin(n*π)^2/((n^2 - 1)*π) + (q_0*cos(3*n*π/2) - q_0*cos(n*π/2)))/π
a_1'' := a_n'' substitute, n == 1 → 0
a_n'' == (q_0*cos(3*n*π/2) - q_0*cos(n*π/2))/π assume, n == integer → 1
b_n'' := 1/π*(integral(t*sin(n*φ), φ = 0 .. 2*π) - q_0*sin(n*π/2) + q_0*sin(3*n*π/2)) assume, n > 1, n == integer → (q_0*sin(3*n*π/2) - q_0*sin(n*π/2))/π
b_1'' := 1/π*(integral(t*sin(φ), φ = 0 .. 2*π) - q_0*sin(n*π/2) + q_0*sin(3*n*π/2)) substitute, n == 1 → 2*q_0/π
b_n'' == 2*q_0/π*sin(n*π/2)*cos(n*π) → 1
a_n' := 1/π*(integral(q_0*cos(n*φ), φ = 0 .. π/2) + integral(q_0*cos(n*φ), φ = 3*π/2 .. 2*π)) assume, n == integer → (-(q_0*sin(3*n*π/2)) + q_0*sin(n*π/2))/(n*π)
a_1' := a_n' substitute, n == 1 → 2*q_0/π
a_n' == -2*q_0/(n*π)*sin(n*π/2)*cos(n*π) → 1
b_n' := 1/π*(integral(q_0*sin(n*φ), φ = 0 .. π/2) + integral(q_0*sin(n*φ), φ = 3*π/2 .. 2*π)) assume, n == integer → (q_0*cos(3*n*π/2) - q_0*cos(n*π/2))/(n*π)
b_1' := b_n' substitute, n == 1 → 0
b_n' == -q_0/(n*π)*sin(n*π/2)*sin(n*π) substitute, n == 1 → 1
b_n' == -q_0/(n*π)*sin(n*π/2)*sin(n*π) substitute, n == 2 → 1
b_n' == -q_0/(n*π)*sin(n*π/2)*sin(n*π) substitute, n == 3 → 1
b_n' == -q_0/(n*π)*sin(n*π/2)*sin(n*π) substitute, n == 4 → 1
B - a_1'' - b_1' → 0
C - b_1'' - a_1' → 0
A_n := R^4/(E*J*n^2*(n^2 - 1)^2)*(a_n'' + n*b_n') assume, n == integer → (2*q_0*R^4*cos(3*n*π/2) - 2*q_0*R^4*cos(n*π/2))/((E*J*n^6 - 2*E*J*n^4 + E*J*n^2)*π)
A_n substitute, n == 2 → 0
A_n substitute, n == 3 → 0
A_n substitute, n == 4 → 0
B_n := R^4/(E*J*n^2*(n^2 - 1)^2)*(b_n'' - n*a_n') assume, n == integer → R^4*(-(q_0*sin(n*π/2) - q_0*sin(3*n*π/2))/π + (q_0*sin(3*n*π/2) - q_0*sin(n*π/2))/π)/(E*J*n^2*(n^2 - 1)^2)
B_n → R^4*(2*q_0*sin(3*n*π/2) - 2*q_0*sin(n*π/2))/(E*J*n^2*π*(n^2 - 1)^2)
B_n == 4*q_0*R^4/(π*E*J*n^2*(n^2 - 1)^2)*sin(n*π/2)*cos(n*π) → 1
v := B_n*sin(n*φ) → R^4*sin(φ*n)*(2*q_0*sin(3*n*π/2) - 2*q_0*sin(n*π/2))/(E*J*n^2*π*(n^2 - 1)^2)
w := -d/dφ(v) → (-(2*q_0*R^4*cos(φ*n)*sin(3*n*π/2)) + 2*q_0*R^4*cos(φ*n)*sin(n*π/2))/((E*J*n^5 - 2*E*J*n^3 + E*J*n)*π) simplify → -(2*q_0*R^4*cos(φ*n)*(sin(3*n*π/2) - sin(n*π/2)))/(E*J*n*π*(n - 1)^2*(n + 1)^2)
M := E*J/R^2*(d^2/dφ^2(w) + w) → E*J*(-2*q_0*R^4*cos(φ*n)*(sin(3*n*π/2) - sin(n*π/2))/(E*J*n*π*(n - 1)^2*(n + 1)^2) + (2*q_0*R^4*n*cos(φ*n)*sin(3*n*π/2) - 2*q_0*R^4*n*cos(φ*n)*sin(n*π/2))/((E*J*n^4 - 2*E*J*n^2 + E*J)*π))/R^2 simplify → 2*q_0*R^2*cos(φ*n)*(sin(3*n*π/2) - sin(n*π/2))/(n*π*(n - 1)*(n + 1))
