N := 5
q_n(φ) := 1 → 1
q_t(φ) := 1/π*(4*sin(φ) + 1 + sum(2*cos(n*φ)*cos(π*n/2), n = 1 .. N)) → (4*sin(φ) + 2*cos(4*φ) + (1 - 2*cos(2*φ)))/π
a'_n(n) := 1/π*(integral(q_n(φ)*cos(n*φ), φ = 0 .. π/2) + integral(q_n(φ)*cos(n*φ), φ = 3*π/2 .. 2*π)) → ((sin(2*n*π) - sin(3*n*π/2))/n + sin(n*π/2)/n)/π simplify → (sin(2*n*π) + (sin(n*π/2) - sin(3*n*π/2)))/(n*π)
a''_n(n) := 1/π*integral(q_t(φ)*cos(n*φ), φ = 0 .. 2*π)
a''_n(4) → 2/π
