N := 20
q_n(φ) :=
    if φ ≤ π/2 and φ ≥ 3*π/2
        1
    else
        0  # disabled
q_n(φ) := 1
q_t(φ) := 1/π*(4*sin(φ) + sum(cos(n*(φ + π/2)) - cos(n*(φ - π/2)), n = 1 .. N))
a'_n(n) := 1/π*(integral(q_n(φ)*cos(n*φ), φ = 0 .. π/2) + integral(q_n(φ)*cos(n*φ), φ = 3*π/2 .. 2*π))
a''_n(n) := 1/π*integral(q_t(φ)*cos(n*φ), φ = 0 .. 2*π)
b'_n(n) := 1/π*integral(q_n(φ)*sin(n*φ), φ = 0 .. 2*π)
b''_n(n) := 1/π*integral(q_t(φ)*sin(n*φ), φ = 0 .. 2*π)
A_n(n) := 1/(n^2*(n^2 - 1)^2)*(a''_n(n) + n*b'_n(n))
B_n(n) := 1/(n^2*(n^2 - 1)^2)*(b''_n(n) - n*a'_n(n))
v(φ) := sum(A_n(n)*cos(n*φ) + B_n(n)*sin(n*φ), n = 2 .. N)
φ := 0, 0.01 .. 2*π
# [plot: v(φ) vs φ]
w(φ) := -(d/dφ(v(φ)))
Δφ := 0.00005
w(φ) := -((v(φ + Δφ) - v(φ))/Δφ)
# [plot: w(φ) vs φ]
M(φ) := (d^2/dφ^2(w(φ)) + w(φ))  # disabled
Δφ = 5e-5
M(φ) := ((w(φ + 2*Δφ) - 2*w(φ + Δφ) + w(φ))/Δφ^2 + w(φ))
M_1(φ) := 1 - 3/π*cos(φ) - 2/π*φ*sin(φ)
φ_1 := 0, 0.01 .. π/2
M_2(φ) := 2*sin(φ) - 3/π*cos(φ) - 2/π*φ*sin(φ) - 1
φ_2 := π/2, π/2 + 0.01 .. 3*π/2
φ_3 := 3*π/2, 3*π/2 + 0.01 .. 2*π
# [plot: M(φ), M_1(φ_1), M_2(φ_2) vs φ, φ_1, φ_2]
# [chart]
    X[1] := φ
    Y[1] := v(φ)
# pic2
# [chart]
    X[1] := φ
    Y[1] := w(φ)
# pic3
# [chart]
    X[1] := φ
    Y[1] := M(φ)
    X[2] := φ_1
    Y[2] := M_1(φ_1)
    X[3] := φ_2
    Y[3] := M_2(φ_2)
    X[4] := 2*π - φ_1
    Y[4] := M_1(φ_1)
# pic4
M_1(0) = 0.0450703
M(0) = 0.0451489
M_1(π/4) = -0.0287906
M(π/4) = -0.0289149
M_1(π/2) = -1.11022e-16
M(π/2) = 2.71796e-5
M_2(3*π/4) = 0.0287906
M(3*π/4) = 0.0288948
M_2(π) = -0.0450703
M(π) = -0.0451485
M_2(5*π/4) = 0.0287906
M(5*π/4) = 0.0288455
M_2(3*π/2) = 2.22045e-16
M(3*π/2) = -2.71796e-5
M_1(-π/4) = -0.0287906
M(7*π/4) = -0.0289868
