q_n(φ) :=
    if φ ≤ π/2 and φ ≥ 3*π/2
        return q_0
    else
        0  # disabled
q_n(φ) := q_0 → q_0
N := 5
q_t(φ) := q_0/π*(4*sin(φ) + 1) → q_0*(4*sin(φ) + 1)/π
q_t(φ) := q_0/π*(4*sin(φ) + 1 + sum(cos(n*(φ - π/2)), n = 1 .. N) + sum(cos(n*(φ + π/2)), n = 1 .. N)) → q_0*(cos(9*π/2 + 9*φ) + cos(9*π/2 - 9*φ) + cos(7*π/2 + 7*φ) + cos(7*π/2 - 7*φ) + cos(5*π/2 + 5*φ) + cos(5*π/2 - 5*φ) + cos(3*π/2 + 3*φ) + cos(3*π/2 - 3*φ) + cos(π/2 + φ) + cos(π/2 - φ) + 4*sin(φ) + cos(5*π + 10*φ) + cos(5*π - 10*φ) + cos(4*π + 8*φ) + cos(4*π - 8*φ) + cos(3*π + 6*φ) + cos(3*π - 6*φ) + cos(2*π + 4*φ) + cos(2*π - 4*φ) + cos(π + 2*φ) + cos(π - 2*φ) + 1)/π  # disabled
q_t(φ) := q_0/π*(4*sin(φ) - sum(2*sin(n*φ)*sin(π*n/2), n = 1 .. N)) → q_0*(-(2*sin(5*φ)) + 2*sin(3*φ) + 2*sin(φ))/π
a'_n(n) := 1/π*(integral(q_n(φ)*cos(n*φ), φ = 0 .. π/2) + integral(q_n(φ)*cos(n*φ), φ = 3*π/2 .. 2*π)) → (q_0*(sin(2*n*π) - sin(3*n*π/2))/n + q_0*sin(n*π/2)/n)/π simplify → q_0*(sin(2*n*π) + (sin(n*π/2) - sin(3*n*π/2)))/(n*π)
a'_n(1) → 2*q_0/π
a''_n(n) := 1/π*integral(q_t(φ)*cos(n*φ), φ = 0 .. 2*π) → 4*q_0*(n^4 + 62*n^2 - 255)*sin(n*π)^2/(π^2*(n - 5)*(n - 3)*(n - 1)*(n + 1)*(n + 3)*(n + 5))
b'_n(n) := 1/π*(integral(q_n(φ)*sin(n*φ), φ = 0 .. π/2) + integral(q_n(φ)*sin(n*φ), φ = 3*π/2 .. 2*π)) → (-q_0*(cos(2*n*π) - cos(3*n*π/2))/n - q_0*(cos(n*π/2) - 1)/n)/π
b''_n(n) := 1/π*integral(q_t(φ)*sin(n*φ), φ = 0 .. 2*π) → -(2*q_0*(n^4 + 62*n^2 - 255)*sin(2*n*π))/(π^2*(n - 5)*(n - 3)*(n - 1)*(n + 1)*(n + 3)*(n + 5))
A_n(n) := R^4/(E*J*n^2*(n^2 - 1)^2)*(a''_n(n) + n*b'_n(n)) → R^4*(n*(-q_0*(cos(2*n*π) - cos(3*n*π/2))/n - q_0*(cos(n*π/2) - 1)/n)/π + 4*q_0*(n^4 + 62*n^2 - 255)*sin(n*π)^2/(π^2*(n - 5)*(n - 3)*(n - 1)*(n + 1)*(n + 3)*(n + 5)))/(E*J*n^2*(n^2 - 1)^2)
B_n(n) := R^4/(E*J*n^2*(n^2 - 1)^2)*(b''_n(n) - n*a'_n(n)) → R^4*(-q_0*(sin(2*n*π) + (sin(n*π/2) - sin(3*n*π/2)))/π - 2*q_0*(n^4 + 62*n^2 - 255)*sin(2*n*π)/(π^2*(n - 5)*(n - 3)*(n - 1)*(n + 1)*(n + 3)*(n + 5)))/(E*J*n^2*(n^2 - 1)^2)
A_n_безр(n) := A_n(n)/(q_0*R^4/(E*J)) → (n*(-q_0*(cos(2*n*π) - cos(3*n*π/2))/n - q_0*(cos(n*π/2) - 1)/n)/π + 4*q_0*(n^4 + 62*n^2 - 255)*sin(n*π)^2/(π^2*(n - 5)*(n - 3)*(n - 1)*(n + 1)*(n + 3)*(n + 5)))/(q_0*n^2*(n^2 - 1)^2)
B_n_безр(n) := B_n(n)/(q_0*R^4/(E*J)) → (-q_0*(sin(2*n*π) + (sin(n*π/2) - sin(3*n*π/2)))/π - 2*q_0*(n^4 + 62*n^2 - 255)*sin(2*n*π)/(π^2*(n - 5)*(n - 3)*(n - 1)*(n + 1)*(n + 3)*(n + 5)))/(q_0*n^2*(n^2 - 1)^2) simplify → (((-n^6 + 35*n^4 - 259*n^2 + 225)*π + (510 - (2*n^4 + 124*n^2)))*sin(2*n*π) + (n^6 - 35*n^4 + 259*n^2 - 225)*π*sin(3*n*π/2) + (35*n^4 - n^6 - 259*n^2 + 225)*π*sin(n*π/2))/(n^2*π^2*(n - 5)*(n - 3)*(n - 1)^3*(n + 1)^3*(n + 3)*(n + 5))
A_n_безр(n) := A_n_безр(n) expand → 4*q_0*n^4*sin(n*π)^2/(q_0*n^12*π^2 - 35*q_0*n^10*π^2 + 259*q_0*n^8*π^2 - 225*q_0*n^6*π^2 - 2*q_0*n^10*π^2 + 70*q_0*n^8*π^2 - 518*q_0*n^6*π^2 + 450*q_0*n^4*π^2 + q_0*n^8*π^2 - 35*q_0*n^6*π^2 + 259*q_0*n^4*π^2 - 225*q_0*n^2*π^2) + (248*q_0*n^2*sin(n*π)^2/(q_0*n^12*π^2 - 35*q_0*n^10*π^2 + 259*q_0*n^8*π^2 - 225*q_0*n^6*π^2 - 2*q_0*n^10*π^2 + 70*q_0*n^8*π^2 - 518*q_0*n^6*π^2 + 450*q_0*n^4*π^2 + q_0*n^8*π^2 - 35*q_0*n^6*π^2 + 259*q_0*n^4*π^2 - 225*q_0*n^2*π^2) - 1020*q_0*sin(n*π)^2/(q_0*n^12*π^2 - 35*q_0*n^10*π^2 + 259*q_0*n^8*π^2 - 225*q_0*n^6*π^2 - 2*q_0*n^10*π^2 + 70*q_0*n^8*π^2 - 518*q_0*n^6*π^2 + 450*q_0*n^4*π^2 + q_0*n^8*π^2 - 35*q_0*n^6*π^2 + 259*q_0*n^4*π^2 - 225*q_0*n^2*π^2)) + q_0*cos(3*n*π/2)/(q_0*n^6*π - 2*q_0*n^4*π + q_0*n^2*π) + (2*q_0/(q_0*n^6*π - 2*q_0*n^4*π + q_0*n^2*π) - (q_0*cos(n*π/2)/(q_0*n^6*π - 2*q_0*n^4*π + q_0*n^2*π) + 2*q_0*cos(n*π)^2/(q_0*n^6*π - 2*q_0*n^4*π + q_0*n^2*π)))
B_n_безр(n) := B_n_безр(n) expand →  # error: Полученный результат этой символьной операции слишком длинный для отображения, но он может использоваться в последующих расчетах, если будет присвоен функции или переменной.
N := 20  # disabled
1/((n^2 + 1)*(n - 1)) expand → 1/(n^3 - n^2 + n - 1)
v(φ) := sum(A_n(n)*cos(n*φ) + B_n(n)*sin(n*φ), n = 2 .. N)  # error: Ошибка деления на ноль.
v_безразмерное(φ) := v(φ)/(q_0*R^4/(E*J))
v_безразмерное(φ) := sum(A_n_безр(n)*cos(n*φ) + B_n_безр(n)*sin(n*φ), n = 2 .. N)  # error: Ошибка деления на ноль.
φ := 0, 0.02 .. 2*π
v_безразмерное(π/4) =  # error: Эта переменная не определена. Проверьте правильность установки обозначения.
# [plot: v_безразмерное(φ) vs φ]
w(φ) := -(d/dφ(v(φ)))
w_безразмерное(φ) := -(d/dφ(v_безразмерное(φ)))  # error: Ошибка деления на ноль.; disabled
Δφ := 0.001
w_безразмерное(φ) := -((v_безразмерное(φ + Δφ) - v_безразмерное(φ))/Δφ)
# [plot: w_безразмерное(φ) vs φ]
M(φ) := E*J/R^2*(d^2/dφ^2(w(φ)) + w(φ))
M_безразмерный(φ) := M(φ)/(q_0*R^2)
M_безразмерный(φ) := (d^2/dφ^2(w_безразмерное(φ)) + w_безразмерное(φ))  # error: Ошибка деления на ноль.; disabled
Δφ := 0.001
M_безразмерный(φ) := (((w_безразмерное(φ + 2*Δφ) - w_безразмерное(φ + Δφ))/Δφ - (w_безразмерное(φ + Δφ) - w_безразмерное(φ))/Δφ)/Δφ + w_безразмерное(φ))
M_1(φ) := 1 - 3/π*cos(φ) - 2/π*φ*sin(φ)
φ_1 := 0, 0.01 .. π/2
M_2(φ) := 2*sin(φ) - 3/π*cos(φ) - 2/π*φ*sin(φ) - 1
φ_2 := π/2, π/2 + 0.01 .. 3*π/2
# [plot: M_безразмерный(φ), M_1(φ_1), M_2(φ_2) vs φ, φ_1, φ_2]
M_1(π/6)/M_безразмерный(π/6) =  # error
N := 100
f(φ) := sum(2*cos(n*φ)*cos(π*n/2), n = 1 .. N)
# [plot: f(φ) vs φ]
integral(f(φ), φ = 0 .. 2*π) = 5.79259e-14
