a_n' := 1/π*integral(q_0*cos(n*φ), φ) → q_0*sin(φ*n)/(n*π)
b_n' := 1/π*integral(q_0*sin(n*φ), φ) → -(q_0*cos(φ*n))/(n*π)
integral(sin(φ)*cos(n*φ), φ = 0 .. 2*π) → -(2*sin(n*π)^2)/(n^2 - 1)
integral(cos(n*φ), φ = 0 .. 2*π) → sin(2*n*π)/n
integral(sin(φ)*sin(n*φ), φ = 0 .. 2*π) → sin(2*n*π)/(n^2 - 1)
integral(sin(φ)*sin(φ), φ = 0 .. 2*π) → π
integral(sin(n*φ), φ = 0 .. 2*π) → 2*sin(n*π)^2/n
integral(sin(n*φ)^2, φ = 0 .. 2*π) → -sin(4*n*π)/(4*n) + π
a_n' := 1/π*integral(q_0*cos(n*φ), φ = 0 .. 2*π) → q_0*sin(2*n*π)/(n*π)
a_n' := 0
b_n' := 1/π*integral(q_0*sin(n*φ), φ = 0 .. 2*π) → 2*q_0*sin(n*π)^2/(n*π)
b_n' := 0
q_t(φ) := q_0/π*(4*sin(φ) - 2*sum(sin(π*n/2)*sin(n*φ), n = 1 .. 10)) → q_0*(-(2*sin(9*φ)) + 2*sin(7*φ) + (2*sin(3*φ) + 2*sin(φ) - 2*sin(5*φ)))/π
integral(sum(sin(π*k/2)*sin(k*φ), k = 1 .. 10)*cos(5*φ), φ = 0 .. 2*π) = -3.6019e-15
a_n'' := 1/π*integral(q_0/π*4*sin(φ)*cos(n*φ), φ = 0 .. 2*π) → -(8*q_0*sin(n*π)^2)/(π*(n^2 - 1)*π)
a_n'' := 0
a_1'' := 1/π*integral(q_0/π*4*sin(φ)*cos(φ), φ = 0 .. 2*π) → 0
integral(sum(sin(π*k/2)*sin(k*φ), k = 1 .. 10)*sin(3*φ), φ = 0 .. 2*π) = -3.14159
4
N := 50
v(φ) := 4*q_0*R^4/(π*E*J)*sum(1/(n^2*(n^2 - 1)^2)*sin(π*n/2)*cos(n*π)*sin(n*φ), n = 2 .. N) → 4*q_0*R^4*(-sin(49*φ)/13829760000 + sin(47*φ)/10769458176 + (sin(43*φ)/6314527296 + (sin(39*φ)/3514118400 + (sin(35*φ)/1835265600 + (sin(31*φ)/885657600 + (sin(27*φ)/386358336 + (sin(23*φ)/147476736 + (sin(19*φ)/46785600 + (sin(15*φ)/11289600 + (sin(11*φ)/1742400 + (sin(7*φ)/112896 + (sin(3*φ)/576 - sin(5*φ)/14400) - sin(9*φ)/518400) - sin(13*φ)/4769856) - sin(17*φ)/23970816) - sin(21*φ)/85377600) - sin(25*φ)/243360000) - sin(29*φ)/593409600) - sin(33*φ)/1289097216) - sin(37*φ)/2561979456) - sin(41*φ)/4744454400) - sin(45*φ)/8295566400))/(E*J*π)
v(φ) := v(φ)/(q_0*R^4/(E*J)) → 4*(-sin(49*φ)/13829760000 + sin(47*φ)/10769458176 + (sin(43*φ)/6314527296 + (sin(39*φ)/3514118400 + (sin(35*φ)/1835265600 + (sin(31*φ)/885657600 + (sin(27*φ)/386358336 + (sin(23*φ)/147476736 + (sin(19*φ)/46785600 + (sin(15*φ)/11289600 + (sin(11*φ)/1742400 + (sin(7*φ)/112896 + (sin(3*φ)/576 - sin(5*φ)/14400) - sin(9*φ)/518400) - sin(13*φ)/4769856) - sin(17*φ)/23970816) - sin(21*φ)/85377600) - sin(25*φ)/243360000) - sin(29*φ)/593409600) - sin(33*φ)/1289097216) - sin(37*φ)/2561979456) - sin(41*φ)/4744454400) - sin(45*φ)/8295566400))/π
φ := 0, 0.01 .. 2*π
# [plot: v(φ) vs φ]
v_n(φ) := -4/(π*n^2*(n^2 - 1)^2)*sin(π*n/2)*sin(n*φ) → -(4*sin(φ*n)*sin(n*π/2))/(n^2*π*(n^2 - 1)^2)
w_n(φ) := -(d/dφ(v_n(φ))) → 4*cos(φ*n)*sin(n*π/2)/((n^5 - 2*n^3 + n)*π) simplify → 4*cos(φ*n)*sin(n*π/2)/(n*π*(n - 1)^2*(n + 1)^2)
w(φ) := -(d/dφ(v(φ))) → (111981654148034757246732*cos(49*φ) + (171447798067574969304000*cos(45*φ) + (273125985726914042065200*cos(41*φ) + (456448225504205294360000*cos(37*φ) + (809084183300620739386875*cos(33*φ) + (1544574539972893203403200*cos(29*φ) + (3246805356954853908337200*cos(25*φ) + (7773933015235470751012800*cos(21*φ) + (22414628485513493076347500*cos(17*φ) + (86139733960026736343640000*cos(13*φ) + (548710105325370310508986800*cos(9*φ) + (10974202106507406210179736000*cos(5*φ) - 164613031597611093152696040000*cos(3*φ) - 1959678947590608251817810000*cos(7*φ)) - 199530947391043749275995200*cos(11*φ)) - 41993120305513033967524500*cos(15*φ)) - 12835324101178252877403200*cos(19*φ)) - 4929124194442780367490000*cos(23*φ)) - 2208711127180172726760000*cos(27*φ)) - 1106270373639859496993925*cos(31*φ)) - 602746312215488889448000*cos(35*φ)) - 350762905599000837742800*cos(39*φ)) - 215225166534758326440000*cos(43*φ)) - 137933401370854862272500*cos(47*φ)))/(7901425516685332471329409920000*π)
M_n(φ) := d^2/dφ^2(w_n(φ)) + w_n(φ) → -4*n*cos(φ*n)*sin(n*π/2)/((n^4 - 2*n^2 + 1)*π) + 4*cos(φ*n)*sin(n*π/2)/(n*π*(n - 1)^2*(n + 1)^2) simplify → -(4*cos(φ*n)*sin(n*π/2))/((n^3 - n)*π)
M(φ) := d^2/dφ^2(w(φ)) + w(φ) → (-(52704838507584978*cos(49*φ)) + 59725649557624050*cos(47*φ) + (77998703922430200*cos(43*φ) + (104556157363225260*cos(39*φ) + (144679948844350920*cos(35*φ) + (208269119909005155*cos(31*φ) + (315328093635123800*cos(27*φ) + (510382823492423700*cos(23*φ) + (906153363814618920*cos(19*φ) + (1844669347765474230*cos(15*φ) + (4695521976130298040*cos(11*φ) + (18446693477654742300*cos(7*φ) + (258253708687166392200*cos(3*φ) - 51650741737433278440*cos(5*φ)) - 8608456956238879740*cos(9*φ)) - 2837952842716114200*cos(13*φ)) - 1265949552388070550*cos(17*φ)) - 670788853732899720*cos(21*φ)) - 397313397980255988*cos(25*φ)) - 254437151415927480*cos(29*φ)) - 172629484416555075*cos(33*φ)) - 122453157272245800*cos(37*φ)) - 89983870622706060*cos(41*φ)) - 68051043132323160*cos(45*φ)))/(1549522252122998353200*π)
# [plot: M(φ) vs φ]
