# Вариант 29
# Боковая проекция
x_A := 0
x_E := 400
x_C := 820
t_A := 1
y_A := 45
y_E := 265
y_C := 360
t_C := 0
# Найдем координаты точки B:
x_B := (y_C - y_A + x_A*t_A - x_C*t_C)/(t_A - t_C) = 315
y_B := y_A + (x_B - x_A)*t_A = 360
# Сечение сопла описывается уравнением второго порядка, которое описывается уравнением
y^2 + a_1*x*y + a_2*x^2 + a_3*y + a_4*x + a_5 == 0
# Продифференцируем его по x:
2*y*dy/dx + a_1*(y + x*dy/dx) + 2*a_2*x + a_3*dy/dx + a_4 == 0
# где | dy/dx | равен тангенсу угла наклона касательной к кривой
# После подстановки трех точек и двух касательных получим систему уравнений
y_A^2 + a_1*x_A*y_A + a_2*x_A^2 + a_3*y_A + a_4*x_A + a_5 == 0
y_E^2 + a_1*x_E*y_E + a_2*x_E^2 + a_3*y_E + a_4*x_E + a_5 == 0
y_C^2 + a_1*x_C*y_C + a_2*x_C^2 + a_3*y_C + a_4*x_C + a_5 == 0
2*y_A*t_A + a_1*(y_A + x_A*t_A) + 2*a_2*x_A + a_3*t_A + a_4 == 0
2*y_C*t_C + a_1*(y_C + x_C*t_C) + 2*a_2*x_C + a_3*t_C + a_4 == 0
# Решим систему методом Крамера
Δ := [
    x_A*y_A, x_A^2, y_A, x_A, 1;
    x_E*y_E, x_E^2, y_E, x_E, 1;
    x_C*y_C, x_C^2, y_C, x_C, 1;
    y_A + x_A*t_A, 2*x_A, t_A, 1, 0;
    y_C + x_C*t_C, 2*x_C, t_C, 1, 0
]
δ := [-y_A^2; -y_E^2; -y_C^2; -2*y_A*t_A; -2*y_C*t_C]
a := lsolve(Δ, δ) = [-0.687987; 0.198713; 19.1736; -78.2142; -2887.81]
a_1 := a[0] = -0.687987
a_2 := a[1] = 0.198713
a_3 := a[2] = 19.1736
a_4 := a[3] = -78.2142
a_5 := a[4] = -2887.81
# Выразим y через x:
y(x) := (-(a_1*x + a_3) + sqrt((a_1*x + a_3)^2 - 4*(a_2*x^2 + a_4*x + a_5)))/2
x := x_A, x_A + 100 .. x_C
y_tgA(x) := y_A + t_A*(x - x_A)
x_1 := x_A, x_A + 1 .. x_B
y_tgC(x) := y_C + t_C*(x - x_C)
x_2 := x_C, x_C - 1 .. x_B
x = [0; 100; 200; 300; 400; 500; 600; 700; 800]
y(x) = [45; 121.445; 177.906; 224.878; 265; 299.135; 327.245; 348.366; 359.578]
# [chart]
    X[1] := x
    Y[1] := y(x)
    X[2] := x_1
    Y[2] := y_tgA(x_1)
    X[3] := x_2
    Y[3] := y_tgC(x_2)
# Плановая проекция
x_A := 0
x_E := 400
x_C := 820
t_A := -0.88
y_A := -45
y_E := -260
y_C := -350
t_C := 0
# Найдем координаты точки B:
x_B := (y_C - y_A + x_A*t_A - x_C*t_C)/(t_A - t_C) = 346.591
y_B := y_A + (x_B - x_A)*t_A = -350
# Получим систему уравнений
y_A^2 + a_1*x_A*y_A + a_2*x_A^2 + a_3*y_A + a_4*x_A + a_5 == 0
y_E^2 + a_1*x_E*y_E + a_2*x_E^2 + a_3*y_E + a_4*x_E + a_5 == 0
y_C^2 + a_1*x_C*y_C + a_2*x_C^2 + a_3*y_C + a_4*x_C + a_5 == 0
2*y_A*t_A + a_1*(y_A + x_A*t_A) + 2*a_2*x_A + a_3*t_A + a_4 == 0
2*y_C*t_C + a_1*(y_C + x_C*t_C) + 2*a_2*x_C + a_3*t_C + a_4 == 0
# Решим систему методом Крамера
Δ := [
    x_A*y_A, x_A^2, y_A, x_A, 1;
    x_E*y_E, x_E^2, y_E, x_E, 1;
    x_C*y_C, x_C^2, y_C, x_C, 1;
    y_A + x_A*t_A, 2*x_A, t_A, 1, 0;
    y_C + x_C*t_C, 2*x_C, t_C, 1, 0
]
δ := [-y_A^2; -y_E^2; -y_C^2; -2*y_A*t_A; -2*y_C*t_C]
a := lsolve(Δ, δ) = [0.668787; 0.214705; -78.3368; -118.041; -5550.16]
a_1 := a[0] = 0.668787
a_2 := a[1] = 0.214705
a_3 := a[2] = -78.3368
a_4 := a[3] = -118.041
a_5 := a[4] = -5550.16
# Выразим y через x:
y(x) := (-(a_1*x + a_3) - sqrt((a_1*x + a_3)^2 - 4*(a_2*x^2 + a_4*x + a_5)))/2
x := x_A, x_A + 100 .. x_C
y_tgA(x) := y_A + t_A*(x - x_A)
x_1 := x_A, x_A + 1 .. x_B
y_tgC(x) := y_C + t_C*(x - x_C)
x_2 := x_C, x_C - 1 .. x_B
# [chart]
    X[1] := x
    Y[1] := y(x)
    X[2] := x_1
    Y[2] := y_tgA(x_1)
    X[3] := x_2
    Y[3] := y_tgC(x_2)
x = [0; 100; 200; 300; 400; 500; 600; 700; 800]
y(x) = [-45; -117.721; -173.786; -220.455; -260; -293.212; -320.064; -339.69; -349.647]
