X(x) := C_1*cos(λ*x) + C_2*sin(λ*x) → C_2*sin(λ*x) + C_1*cos(λ*x)
T(t) := C_3*cos(ω*t) + C_4*sin(ω*t) → C_4*sin(ω*t) + C_3*cos(ω*t)
U(x, t) := X(x)*T(t) → (C_4*sin(ω*t) + C_3*cos(ω*t))*(C_2*sin(λ*x) + C_1*cos(λ*x))
C_2 := ∂/∂x(X(x)) == 0 substitute, x == 0 → C_2*λ == 0 solve, C_2 → 0
X(x) := X(x) → C_2*sin(λ*x) + C_1*cos(λ*x)
X(x) → C_1*cos(λ*x)
U(x, t) := U(x, t) → (C_4*sin(ω*t) + C_3*cos(ω*t))*(C_2*sin(λ*x) + C_1*cos(λ*x))
U(x, t) → C_1*cos(λ*x)*(C_4*sin(ω*t) + C_3*cos(ω*t)) expand → C_1*C_4*cos(λ*x)*sin(ω*t) + C_1*C_3*cos(ω*t)*cos(λ*x)
U(x, t) == φ(x) substitute, t == 0 → C_1*C_3*cos(λ*x) == φ(x)
∂/∂t(U(x, t)) == ψ(x) substitute, t == 0 → C_1*C_4*ω*cos(λ*x) == ψ(x)
