U_1 := -C_1/r + C_2 → -C_1/r + C_2
U_2 := -C_3/r + C_4 → -C_3/r + C_4
d/dr(U_1) → C_1/r^2
d/dr(r^2*(d/dr(U_1))) → 0
d/dr(U_2) → C_3/r^2
d/dr(r^2*(d/dr(U_2))) → 0
# 1. Условие сопряжения на стыке
expr_1 := U_1 == U_2 substitute, r == R_ст → C_2 - C_1/R_ст == C_4 - C_3/R_ст
# 2. Условие равенства тепловых потоков
expr_2 := λ_1*(∂/∂r(U_1)) == λ_2*(∂/∂r(U_2)) substitute, r == R_ст → C_1*λ_1/R_ст^2 == C_3*λ_2/R_ст^2
# 3. Граничное условие для внешней поверхности
expr_3 := U_2 == U_20 substitute, r == R_2 → C_4 - C_3/R_2 == U_20
# 4. Граничное условие на внутренней поверхности
expr_4 := λ_1*(∂/∂r(U_1)) == α*(U_1 - U_10) substitute, r == R_1 → C_1*λ_1/R_1^2 == -(U_10*α) + (C_2*α - C_1*α/R_1)
# Из 2 выразим:
C_3 := expr_2 solve, C_3 → C_1*λ_1/λ_2
# Из 3 выразим:
C_4 := expr_3 solve, C_4 → (R_2*U_20 + C_3)/R_2
C_4 := C_4 → (C_1*λ_1/λ_2 + R_2*U_20)/R_2 simplify → U_20 + C_1*λ_1/(R_2*λ_2)
# Из 1 выразим:
C_2 := expr_1 solve, C_2 → (C_4*R_ст + (C_1 - C_3))/R_ст
C_2 := C_2 → (R_ст*(C_1*λ_1/(R_2*λ_2) + U_20) + (C_1 - C_1*λ_1/λ_2))/R_ст simplify → U_20 + C_1/R_ст + (C_1*λ_1/(R_2*λ_2) - C_1*λ_1/(R_ст*λ_2))
# Из 4 выразим:
expr_4 := expr_4 → C_1*λ_1/R_1^2 == -C_1*α/R_1 + α*(C_2 - U_10)
C_1 := expr_4 solve, C_1 → (R_1^2*R_2*R_ст*U_20 - R_1^2*R_2*R_ст*U_10)*α*λ_2/((R_2*R_ст*λ_1 + (R_1*R_2*R_ст - R_1^2*R_2)*α)*λ_2 + (R_1^2*R_2 - R_1^2*R_ст)*α*λ_1)
C_1 := C_1 → α*λ_2*(R_1^2*R_2*R_ст*U_20 - R_1^2*R_2*R_ст*U_10)/(λ_2*(α*(R_1*R_2*R_ст - R_1^2*R_2) + R_2*R_ст*λ_1) + α*λ_1*(R_1^2*R_2 - R_1^2*R_ст)) → α*λ_2*(R_1^2*R_2*R_ст*U_20 - R_1^2*R_2*R_ст*U_10)/(λ_2*(α*(R_1*R_2*R_ст - R_1^2*R_2) + R_2*R_ст*λ_1) + α*λ_1*(R_1^2*R_2 - R_1^2*R_ст))
C_2 := C_2 → C_1/R_ст + C_1*λ_1/(R_2*λ_2) + (U_20 - C_1*λ_1/(R_ст*λ_2))
C_2 → α*λ_2*(R_1^2*R_2*R_ст*U_20 - R_1^2*R_2*R_ст*U_10)/(R_ст*(λ_2*(α*(R_1*R_2*R_ст - R_1^2*R_2) + R_2*R_ст*λ_1) + α*λ_1*(R_1^2*R_2 - R_1^2*R_ст))) + α*λ_1*(R_1^2*R_2*R_ст*U_20 - R_1^2*R_2*R_ст*U_10)/(R_2*(λ_2*(α*(R_1*R_2*R_ст - R_1^2*R_2) + R_2*R_ст*λ_1) + α*λ_1*(R_1^2*R_2 - R_1^2*R_ст))) + (U_20 - α*λ_1*(R_1^2*R_2*R_ст*U_20 - R_1^2*R_2*R_ст*U_10)/(R_ст*(λ_2*(α*(R_1*R_2*R_ст - R_1^2*R_2) + R_2*R_ст*λ_1) + α*λ_1*(R_1^2*R_2 - R_1^2*R_ст))))
U_ст := U_1 substitute, r == R_ст → C_2 - C_1/R_ст
U_ст → α*λ_1*(R_1^2*R_2*R_ст*U_20 - R_1^2*R_2*R_ст*U_10)/(R_2*(λ_2*(α*(R_1*R_2*R_ст - R_1^2*R_2) + R_2*R_ст*λ_1) + α*λ_1*(R_1^2*R_2 - R_1^2*R_ст))) + (U_20 - α*λ_1*(R_1^2*R_2*R_ст*U_20 - R_1^2*R_2*R_ст*U_10)/(R_ст*(λ_2*(α*(R_1*R_2*R_ст - R_1^2*R_2) + R_2*R_ст*λ_1) + α*λ_1*(R_1^2*R_2 - R_1^2*R_ст))))
U_ст := U_ст simplify → R_1^2*α*λ_1*(R_ст - R_2)*(U_20 - U_10)/((R_2*R_ст*λ_1 + (R_1*R_2*R_ст - R_1^2*R_2)*α)*λ_2 + (R_1^2*R_2 - R_1^2*R_ст)*α*λ_1) + U_20
U_ст → R_1^2*α*λ_1*(R_ст - R_2)*(U_20 - U_10)/(λ_2*(α*(R_1*R_2*R_ст - R_1^2*R_2) + R_2*R_ст*λ_1) + α*λ_1*(R_1^2*R_2 - R_1^2*R_ст)) + U_20
U_1 := U_1 → -C_1/r + C_2
U_1 := U_1 simplify → (((R_2*R_ст*U_20*λ_1 + (R_1*R_2*R_ст*U_20 - R_1^2*R_2*U_10)*α)*λ_2 + (R_1^2*R_2 - R_1^2*R_ст)*U_10*α*λ_1)*r + (R_1^2*R_2*R_ст*U_10 - R_1^2*R_2*R_ст*U_20)*α*λ_2)/(r*((R_2*R_ст*λ_1 + (R_1*R_2*R_ст - R_1^2*R_2)*α)*λ_2 + (R_1^2*R_2 - R_1^2*R_ст)*α*λ_1))
U_2 := U_2 → -C_3/r + C_4
U_2 := U_2 → C_1*λ_1/(R_2*λ_2) + (U_20 - C_1*λ_1/(λ_2*r))
U_2 := U_2 simplify → (((R_2*R_ст*U_20*λ_1 + (R_1*R_2*R_ст - R_1^2*R_2)*U_20*α)*λ_2 + (R_1^2*R_2*U_20 - R_1^2*R_ст*U_10)*α*λ_1)*r + (R_1^2*R_2*R_ст*U_10 - R_1^2*R_2*R_ст*U_20)*α*λ_1)/(r*((R_2*R_ст*λ_1 + (R_1*R_2*R_ст - R_1^2*R_2)*α)*λ_2 + (R_1^2*R_2 - R_1^2*R_ст)*α*λ_1))
R_1 := 1 m
R_ст := 2.5 m
R_2 := 3 m
λ_1 := 1/m
λ_2 := 2/m
α := 1/m^2
U_10 := 100
U_20 := 200
U_1(r) := U_1 → (r*(λ_2*(α*(R_1*R_2*R_ст*U_20 - R_1^2*R_2*U_10) + R_2*R_ст*U_20*λ_1) + U_10*α*λ_1*(R_1^2*R_2 - R_1^2*R_ст)) + α*λ_2*(R_1^2*R_2*R_ст*U_10 - R_1^2*R_2*R_ст*U_20))/(r*(λ_2*(α*(R_1*R_2*R_ст - R_1^2*R_2) + R_2*R_ст*λ_1) + α*λ_1*(R_1^2*R_2 - R_1^2*R_ст)))
U_1(r) → (222.448979592*r - 61.2244897959*m)/r
U_2(r) := U_2 → (r*(λ_2*(U_20*α*(R_1*R_2*R_ст - R_1^2*R_2) + R_2*R_ст*U_20*λ_1) + α*λ_1*(R_1^2*R_2*U_20 - R_1^2*R_ст*U_10)) + α*λ_1*(R_1^2*R_2*R_ст*U_10 - R_1^2*R_2*R_ст*U_20))/(r*(λ_2*(α*(R_1*R_2*R_ст - R_1^2*R_2) + R_2*R_ст*λ_1) + α*λ_1*(R_1^2*R_2 - R_1^2*R_ст)))
U_2(r) → (210.204081633*r - 30.612244898*m)/r
U_ст := U_20 - λ_1*(1 - R_ст/R_2)*(U_20 - U_10)/(λ_1*(1 - R_ст/R_2) + λ_2*(R_ст/R_1 - 1) + λ_1*λ_2/α*R_ст/R_1^2) → 197.959183673
r_1 := R_1, R_1 + 1 mm .. R_ст
r_2 := R_ст, R_ст + 1 mm .. R_2
r := R_1, R_1 + 1 mm .. R_2
# [plot: U_1(r_1), U_2(r_2), U_ст vs r_1, r_2, r]
