C_3 := λ_1*C_1/R_ст^2 == λ_2*C_3/R_ст^2 solve, C_3 → C_1*λ_1/λ_2
C_4 := -C_3/R_2 + C_4 == U_2 solve, C_4 → (R_2*U_2*λ_2 + C_1*λ_1)/(R_2*λ_2)
C_2 := -C_1/R_ст + C_2 == -C_3/R_ст + C_4 solve, C_2 → ((R_2*R_ст*U_2 + C_1*R_2)*λ_2 + (C_1*R_ст - C_1*R_2)*λ_1)/(R_2*R_ст*λ_2)
C_1 := λ_1*C_1/R_1^2 == α*(C_2 - C_1/R_1 - U_1) solve, C_1 → (R_1^2*R_2*R_ст*U_2 - R_1^2*R_2*R_ст*U_1)*α*λ_2/((R_2*R_ст*λ_1 + (R_1*R_2*R_ст - R_1^2*R_2)*α)*λ_2 + (R_1^2*R_2 - R_1^2*R_ст)*α*λ_1) simplify → R_1^2*R_2*R_ст*α*λ_2*(U_2 - U_1)/((R_2*R_ст*λ_1 + (R_1*R_2*R_ст - R_1^2*R_2)*α)*λ_2 + (R_1^2*R_2 - R_1^2*R_ст)*α*λ_1)
C_2 := C_2 → (λ_2*(R_2*R_ст*U_2 + C_1*R_2) + λ_1*(C_1*R_ст - C_1*R_2))/(R_2*R_ст*λ_2)
C_2 simplify → ((R_2*R_ст*U_2*λ_1 + (R_1*R_2*R_ст*U_2 - R_1^2*R_2*U_1)*α)*λ_2 + (R_1^2*R_2 - R_1^2*R_ст)*U_1*α*λ_1)/((R_2*R_ст*λ_1 + (R_1*R_2*R_ст - R_1^2*R_2)*α)*λ_2 + (R_1^2*R_2 - R_1^2*R_ст)*α*λ_1)
C_4 := C_4 → (R_2*U_2*λ_2 + C_1*λ_1)/(R_2*λ_2)
C_4 → (α*λ_1*λ_2*(R_1^2*R_2*R_ст*U_2 - R_1^2*R_2*R_ст*U_1)/(λ_2*(α*(R_1*R_2*R_ст - R_1^2*R_2) + R_2*R_ст*λ_1) + α*λ_1*(R_1^2*R_2 - R_1^2*R_ст)) + R_2*U_2*λ_2)/(R_2*λ_2)
C_3 := C_3 → C_1*λ_1/λ_2
C_3 → α*λ_1*(R_1^2*R_2*R_ст*U_2 - R_1^2*R_2*R_ст*U_1)/(λ_2*(α*(R_1*R_2*R_ст - R_1^2*R_2) + R_2*R_ст*λ_1) + α*λ_1*(R_1^2*R_2 - R_1^2*R_ст))
U_1 := -C_1/r + C_2 → (λ_1*(R_1^2*R_2*R_ст^2*α*λ_2*(U_2 - U_1)/(λ_2*(α*(R_1*R_2*R_ст - R_1^2*R_2) + R_2*R_ст*λ_1) + α*λ_1*(R_1^2*R_2 - R_1^2*R_ст)) - R_1^2*R_2^2*R_ст*α*λ_2*(U_2 - U_1)/(λ_2*(α*(R_1*R_2*R_ст - R_1^2*R_2) + R_2*R_ст*λ_1) + α*λ_1*(R_1^2*R_2 - R_1^2*R_ст))) + λ_2*(R_1^2*R_2^2*R_ст*α*λ_2*(U_2 - U_1)/(λ_2*(α*(R_1*R_2*R_ст - R_1^2*R_2) + R_2*R_ст*λ_1) + α*λ_1*(R_1^2*R_2 - R_1^2*R_ст)) + R_2*R_ст*U_2))/(R_2*R_ст*λ_2) - R_1^2*R_2*R_ст*α*λ_2*(U_2 - U_1)/(r*(λ_2*(α*(R_1*R_2*R_ст - R_1^2*R_2) + R_2*R_ст*λ_1) + α*λ_1*(R_1^2*R_2 - R_1^2*R_ст)))
U_ст1 := U_1 substitute, r == R_ст → R_1^2*α*λ_1*(R_ст - R_2)*(U_2 - U_1)/((R_2*R_ст*λ_1 + (R_1*R_2*R_ст - R_1^2*R_2)*α)*λ_2 + (R_1^2*R_2 - R_1^2*R_ст)*α*λ_1) + U_2
U_ст1 := U_ст1 expand →  # error: Полученный результат этой символьной операции слишком длинный для отображения, но он может использоваться в последующих расчетах, если будет присвоен функции или переменной.
U_ст2 := U_2 - λ_1*(1 - R_ст/R_2)*(U_2 - U_1)/(λ_1*(1 - R_ст/R_2) + λ_2*(R_ст/R_1 - 1) + λ_1*λ_2/α*R_ст/R_1^2) simplify → (((R_2^2*R_ст^2*U_2*λ_1^2 + (2*R_1*R_2^2*R_ст^2 - 2*R_1^2*R_2^2*R_ст)*U_2*α*λ_1 + (R_1^2*R_2^2*R_ст^2 - 2*R_1^3*R_2^2*R_ст + R_1^4*R_2^2)*U_2*α^2)*λ_2^2 + ((2*R_1^2*R_2^2*R_ст - 2*R_1^2*R_2*R_ст^2)*U_2*α*λ_1^2 + (((2*R_1^3*R_2^2 + R_1^4*R_2)*R_ст - 2*R_1^3*R_2*R_ст^2 - R_1^4*R_2^2)*U_2 + (R_1^4*R_2*R_ст - R_1^4*R_2^2)*U_1)*α^2*λ_1)*λ_2 + (R_1^4*R_ст^2 - 2*R_1^4*R_2*R_ст + R_1^4*R_2^2)*U_1*α^2*λ_1^2)*r + ((R_1^4*R_2*R_ст^2 - R_1^4*R_2^2*R_ст)*U_2 + (R_1^4*R_2^2*R_ст - R_1^4*R_2*R_ст^2)*U_1)*α^2*λ_1*λ_2)/(r*((R_2*R_ст*λ_1 + (R_1*R_2*R_ст - R_1^2*R_2)*α)*λ_2 + (R_1^2*R_2 - R_1^2*R_ст)*α*λ_1)^2)
U_ст1 == U_ст2 simplify → 1
# Задача 2
X := A*cos(λ*x) + B*sin(λ*x) → B*sin(λ*x) + A*cos(λ*x)
T := C*e^(-λ^2*a*t) → C*e^(-(λ^2*a*t))
U := X*T → C*e^(-(λ^2*a*t))*(B*sin(λ*x) + A*cos(λ*x))
∂/∂t(U) == a*(∂^2/∂x^2(U)) → 1
B := ∂/∂x(X) == 0 substitute, x == 0 → λ*B == 0 solve, B → 0
X := X → B*sin(λ*x) + A*cos(λ*x)
X → A*cos(λ*x)
∂/∂x(X) + β*X == 0 substitute, x == l → -(A*(λ*sin(λ*l) - β*cos(λ*l))) == 0
λ*sin(λ*l) - β*cos(λ*l) == 0
φ(x) := cos(x)
N := 0
U(x, t) := sum((2/l*integral(φ(x)*cos(λ_n*x), x = 0 .. l))*cos(λ_n*x)*exp(-λ_n^2*a*t), n = 0 .. N) → ((λ_n - 1)*cos(λ_n*x)*e^(-(λ_n^2*a*t))*sin((λ_n + 1)*l) + (λ_n + 1)*cos(λ_n*x)*e^(-(λ_n^2*a*t))*sin((λ_n - 1)*l))/((λ_n^2 - 1)*l)
U(x, 0) == φ(x) → ((λ_n - 1)*cos(λ_n*x)*sin(l*(λ_n + 1)) + (λ_n + 1)*cos(λ_n*x)*sin(l*(λ_n - 1)))/(l*(λ_n^2 - 1)) == cos(x)
