# Расчет соединений
# Соединение фланец - верхняя полусфера
# Минимальная величина зазора - перекос 5 градусов
D := 54 mm
d := 53.49 mm
Δ_min := D - d = 0.51 mm
# Максимальная величина зазора - допуск сварного шва
b := 1.0 mm
Δ_max := 2*b = 2 mm
